<!--
    Generated by vsp2jsbsim.py
    Author: Jüttner Domokos
-->
<aerodynamics>

    <function name="aero/beta-deg-abs">
	<description>Beta absolute value</description>
	<abs>
	    <property>aero/beta-deg</property>
	</abs>
    </function>

    <function name="aero/pb">
	<description>PB Denormalization</description>
	<product>
	    <property>aero/bi2vel</property>
	    <property>velocities/p-aero-rad_sec</property>
	</product>
    </function>

    <function name="aero/qb">
	<description>For denormalization</description>
	<product>
	    <property>aero/ci2vel</property>
	    <property>velocities/q-aero-rad_sec</property>
	</product>
    </function>

    <function name="aero/rb">
	<description>For denormalization</description>
	<product>
	    <property>aero/bi2vel</property>
	    <property>velocities/r-aero-rad_sec</property>
	</product>
    </function>

    <!-- CL -->
    <!-- base -->
    <function name="aero/CL_base">
	<table>
	    <independentVar lookup="row">velocities/mach</independentVar>
	    <independentVar lookup="column">aero/alpha-deg</independentVar>
	    <independentVar lookup="table">aero/beta-deg</independentVar>
	    <tableData breakPoint="-10.00000">
                -10.00     -5.00      0.00      5.00     10.00     15.00     20.00     25.00     30.00     40.00
		0.20000  -0.46643  -0.14142   0.18630   0.50292   0.80325   1.06807   1.27811   1.43605   1.53862   1.55642
		0.50000  -0.49007  -0.14836   0.19769   0.53331   0.84695   1.12911   1.35169   1.51772   1.62497   1.64320
		0.90000  -0.59928  -0.17903   0.24913   0.66382   1.05774   1.41121   1.70159   1.91033   2.04363   2.03864
	    </tableData>

	    <tableData breakPoint="0.00000">
                -10.00     -5.00      0.00      5.00     10.00     15.00     20.00     25.00     30.00     40.00
		0.20000  -0.47423  -0.14206   0.18758   0.51449   0.81323   1.09104   1.32141   1.48553   1.58447   1.61277
		0.50000  -0.49973  -0.14899   0.19880   0.54672   0.86239   1.15211   1.39582   1.56827   1.67842   1.70043
		0.90000  -0.61760  -0.18222   0.24979   0.68395   1.09106   1.45466   1.75621   1.96666   2.11116   2.12323
	    </tableData>

	    <tableData breakPoint="10.00000">
                -10.00     -5.00      0.00      5.00     10.00     15.00     20.00     25.00     30.00     40.00
		0.20000  -0.46639  -0.14142   0.18630   0.50293   0.80329   1.06802   1.27776   1.43564   1.53853   1.55738
		0.50000  -0.49007  -0.14836   0.19767   0.53330   0.84696   1.12889   1.35161   1.51747   1.62482   1.64319
		0.90000  -0.59928  -0.17903   0.24913   0.66377   1.05786   1.41093   1.70163   1.91037   2.04365   2.03870
	    </tableData>

	</table>
    </function>

    <!-- elevator -->
    <function name="aero/CL_elevator_-24">
	<table>
	    <independentVar lookup="row">velocities/mach</independentVar>
	    <independentVar lookup="column">aero/alpha-deg</independentVar>
	    <independentVar lookup="table">aero/beta-deg</independentVar>
	    <tableData breakPoint="-10.00000">
                -10.00     -5.00      0.00      5.00     10.00     15.00     20.00     25.00     30.00     40.00
		0.20000  -0.17601  -0.21142  -0.23890  -0.25680  -0.27194  -0.27878  -0.27192  -0.25876  -0.23643  -0.17304
		0.50000  -0.17771  -0.21396  -0.24430  -0.26383  -0.27560  -0.28942  -0.28277  -0.27260  -0.24891  -0.18641
		0.90000  -0.18894  -0.23103  -0.27435  -0.28493  -0.30749  -0.31231  -0.31742  -0.31670  -0.31338  -0.24641
	    </tableData>

	    <tableData breakPoint="0.00000">
                -10.00     -5.00      0.00      5.00     10.00     15.00     20.00     25.00     30.00     40.00
		0.20000  -0.18497  -0.21479  -0.23815  -0.26125  -0.27340  -0.28484  -0.28259  -0.26928  -0.24881  -0.18236
		0.50000  -0.18601  -0.21768  -0.24261  -0.26728  -0.28022  -0.29314  -0.29358  -0.27755  -0.26049  -0.19242
		0.90000  -0.18947  -0.23542  -0.26568  -0.30376  -0.31695  -0.32943  -0.33732  -0.32993  -0.32750  -0.25603
	    </tableData>

	    <tableData breakPoint="10.00000">
                -10.00     -5.00      0.00      5.00     10.00     15.00     20.00     25.00     30.00     40.00
		0.20000  -0.17601  -0.21147  -0.23880  -0.25726  -0.27205  -0.27824  -0.27162  -0.25878  -0.23686  -0.17091
		0.50000  -0.17766  -0.21393  -0.24416  -0.26381  -0.27563  -0.28939  -0.28276  -0.27274  -0.24878  -0.18610
		0.90000  -0.18906  -0.23105  -0.27437  -0.28479  -0.30763  -0.31191  -0.31733  -0.31683  -0.31312  -0.24593
	    </tableData>

	</table>
    </function>

    <function name="aero/CL_elevator_-9.5">
	<table>
	    <independentVar lookup="row">velocities/mach</independentVar>
	    <independentVar lookup="column">aero/alpha-deg</independentVar>
	    <independentVar lookup="table">aero/beta-deg</independentVar>
	    <tableData breakPoint="-10.00000">
                -10.00     -5.00      0.00      5.00     10.00     15.00     20.00     25.00     30.00     40.00
		0.20000  -0.09712  -0.10481  -0.11021  -0.10555  -0.11264  -0.10830  -0.10400  -0.08918  -0.07711  -0.04169
		0.50000  -0.10158  -0.10850  -0.11459  -0.10616  -0.11400  -0.11458  -0.10842  -0.09783  -0.08355  -0.04612
		0.90000  -0.11794  -0.12601  -0.13547  -0.12816  -0.13492  -0.13510  -0.12889  -0.11900  -0.11649  -0.07326
	    </tableData>

	    <tableData breakPoint="0.00000">
                -10.00     -5.00      0.00      5.00     10.00     15.00     20.00     25.00     30.00     40.00
		0.20000  -0.09883  -0.10571  -0.10994  -0.11485  -0.10905  -0.11827  -0.10644  -0.09502  -0.07815  -0.03929
		0.50000  -0.10219  -0.10947  -0.11361  -0.12011  -0.11371  -0.12178  -0.11204  -0.09746  -0.08303  -0.04552
		0.90000  -0.12084  -0.12841  -0.13100  -0.14047  -0.13837  -0.14185  -0.12827  -0.12265  -0.11167  -0.06815
	    </tableData>

	    <tableData breakPoint="10.00000">
                -10.00     -5.00      0.00      5.00     10.00     15.00     20.00     25.00     30.00     40.00
		0.20000  -0.09718  -0.10480  -0.11014  -0.10553  -0.11266  -0.10820  -0.10339  -0.08879  -0.07711  -0.04057
		0.50000  -0.10158  -0.10849  -0.11456  -0.10615  -0.11397  -0.11420  -0.10841  -0.09807  -0.08317  -0.04600
		0.90000  -0.11789  -0.12600  -0.13548  -0.12809  -0.13501  -0.13491  -0.12879  -0.11892  -0.11648  -0.07357
	    </tableData>

	</table>
    </function>

    <function name="aero/CL_elevator_1.5">
	<table>
	    <independentVar lookup="row">velocities/mach</independentVar>
	    <independentVar lookup="column">aero/alpha-deg</independentVar>
	    <independentVar lookup="table">aero/beta-deg</independentVar>
	    <tableData breakPoint="-10.00000">
                -10.00     -5.00      0.00      5.00     10.00     15.00     20.00     25.00     30.00     40.00
		0.20000  -0.00049   0.00020   0.00092   0.00099   0.00000   0.00118   0.00149   0.00141   0.00017   0.00019
		0.50000  -0.00157   0.00018   0.00063   0.00030   0.00133  -0.00046   0.00029   0.00201   0.00092   0.00204
		0.90000   0.00000   0.00000   0.00068   0.00000   0.00134  -0.00081   0.00028   0.00143  -0.00270   0.00101
	    </tableData>

	    <tableData breakPoint="0.00000">
                -10.00     -5.00      0.00      5.00     10.00     15.00     20.00     25.00     30.00     40.00
		0.20000  -0.00013   0.00000  -0.00037  -0.00013   0.00024  -0.00095   0.00046  -0.00015   0.00064   0.00197
		0.50000   0.00000   0.00000  -0.00026   0.00000   0.00037   0.00138   0.00041   0.00000   0.00000   0.00217
		0.90000   0.00067   0.00000   0.00028   0.00000   0.00029   0.00013  -0.00014   0.00152   0.00210  -0.00047
	    </tableData>

	    <tableData breakPoint="10.00000">
                -10.00     -5.00      0.00      5.00     10.00     15.00     20.00     25.00     30.00     40.00
		0.20000  -0.00053   0.00020   0.00094   0.00098   0.00000   0.00106   0.00155   0.00146   0.00019   0.00131
		0.50000  -0.00160   0.00018   0.00064   0.00034   0.00150   0.00000   0.00023   0.00197   0.00092   0.00184
		0.90000   0.00000   0.00000   0.00065   0.00000   0.00120  -0.00142   0.00018   0.00134  -0.00208  -0.00026
	    </tableData>

	</table>
    </function>

    <function name="aero/CL_elevator">
	<interpolate1d>
	    <property>fcs/surfaces/elevator-pos-deg</property>
	    <value>-24</value> <property>aero/CL_elevator_-24</property>
	    <value>-9.5</value> <property>aero/CL_elevator_-9.5</property>
	    <value>0</value> <value>0</value>
	    <value>1.5</value> <property>aero/CL_elevator_1.5</property>
	</interpolate1d>
    </function>

    <!-- flap -->
    <function name="aero/CL_flap_30">
	<table>
	    <independentVar lookup="row">velocities/mach</independentVar>
	    <independentVar lookup="column">aero/alpha-deg</independentVar>
	    <independentVar lookup="table">aero/beta-deg</independentVar>
	    <tableData breakPoint="-10.00000">
                -10.00     -5.00      0.00      5.00     10.00     15.00     20.00     25.00     30.00     40.00
		0.20000   0.63961   0.62483   0.60252   0.59038   0.54076   0.48998   0.44184   0.36998   0.31387   0.21846
		0.50000   0.68577   0.67166   0.64388   0.62258   0.57810   0.51096   0.46210   0.39557   0.33470   0.23027
		0.90000   0.95118   0.93043   0.90276   0.85667   0.79205   0.72038   0.63447   0.54323   0.44602   0.28658
	    </tableData>

	    <tableData breakPoint="0.00000">
                -10.00     -5.00      0.00      5.00     10.00     15.00     20.00     25.00     30.00     40.00
		0.20000   0.65163   0.63384   0.60678   0.57594   0.54150   0.50156   0.44753   0.39443   0.34351   0.23065
		0.50000   0.70039   0.68117   0.65545   0.62074   0.59338   0.53339   0.48142   0.42245   0.35904   0.24593
		0.90000   0.97692   0.94440   0.91679   0.87802   0.81988   0.74730   0.65020   0.55388   0.46610   0.28906
	    </tableData>

	    <tableData breakPoint="10.00000">
                -10.00     -5.00      0.00      5.00     10.00     15.00     20.00     25.00     30.00     40.00
		0.20000   0.63957   0.62476   0.60261   0.59084   0.54053   0.49002   0.44195   0.36924   0.31388   0.21812
		0.50000   0.68571   0.67173   0.64382   0.62353   0.57610   0.51181   0.46263   0.39559   0.33391   0.23080
		0.90000   0.95116   0.93058   0.90275   0.85700   0.79191   0.72028   0.63499   0.54276   0.44631   0.28577
	    </tableData>

	</table>
    </function>

    <function name="aero/CL_flap_40">
	<table>
	    <independentVar lookup="row">velocities/mach</independentVar>
	    <independentVar lookup="column">aero/alpha-deg</independentVar>
	    <independentVar lookup="table">aero/beta-deg</independentVar>
	    <tableData breakPoint="-10.00000">
                -10.00     -5.00      0.00      5.00     10.00     15.00     20.00     25.00     30.00     40.00
		0.20000   0.74962   0.72736   0.69736   0.67751   0.62099   0.55834   0.50113   0.41772   0.35052   0.23826
		0.50000   0.80078   0.78350   0.74651   0.71932   0.67221   0.58716   0.52373   0.44480   0.37325   0.25011
		0.90000   1.11315   1.08595   1.04520   0.98680   0.90718   0.81623   0.72025   0.61156   0.49794   0.30998
	    </tableData>

	    <tableData breakPoint="0.00000">
                -10.00     -5.00      0.00      5.00     10.00     15.00     20.00     25.00     30.00     40.00
		0.20000   0.76135   0.73780   0.70393   0.66559   0.62004   0.56842   0.50665   0.44706   0.38460   0.24858
		0.50000   0.81893   0.79214   0.76104   0.71379   0.66884   0.60560   0.54254   0.47682   0.40034   0.25954
		0.90000   1.14491   1.10184   1.06463   1.01260   0.93788   0.84927   0.73385   0.62173   0.51781   0.31716
	    </tableData>

	    <tableData breakPoint="10.00000">
                -10.00     -5.00      0.00      5.00     10.00     15.00     20.00     25.00     30.00     40.00
		0.20000   0.74941   0.72698   0.69761   0.67744   0.62080   0.55747   0.50117   0.41698   0.35047   0.23767
		0.50000   0.80073   0.78348   0.74680   0.71942   0.67271   0.58785   0.52441   0.44482   0.37366   0.25141
		0.90000   1.11317   1.08626   1.04503   0.98685   0.90750   0.81525   0.72071   0.61034   0.49816   0.30979
	    </tableData>

	</table>
    </function>

    <function name="aero/CL_flap">
	<interpolate1d>
	    <property>fcs/surfaces/flap-pos-deg</property>
	    <value>0</value> <value>0</value>
	    <value>30</value> <property>aero/CL_flap_30</property>
	    <value>40</value> <property>aero/CL_flap_40</property>
	</interpolate1d>
    </function>

    <!-- left-flaperon -->
    <function name="aero/CL_left-flaperon_-51">
	<table>
	    <independentVar lookup="row">velocities/mach</independentVar>
	    <independentVar lookup="column">aero/alpha-deg</independentVar>
	    <independentVar lookup="table">aero/beta-deg</independentVar>
	    <tableData breakPoint="-10.00000">
                -10.00     -5.00      0.00      5.00     10.00     15.00     20.00     25.00     30.00     40.00
		0.20000  -0.30868  -0.33117  -0.33817  -0.34277  -0.34147  -0.32551  -0.31238  -0.29149  -0.27177  -0.21857
		0.50000  -0.33323  -0.35615  -0.36848  -0.37431  -0.36780  -0.35231  -0.33718  -0.31596  -0.29562  -0.24503
		0.90000  -0.46716  -0.48496  -0.53155  -0.52619  -0.52191  -0.51352  -0.49544  -0.46371  -0.43104  -0.33147
	    </tableData>

	    <tableData breakPoint="0.00000">
                -10.00     -5.00      0.00      5.00     10.00     15.00     20.00     25.00     30.00     40.00
		0.20000  -0.32253  -0.33675  -0.34137  -0.35345  -0.34943  -0.34559  -0.33112  -0.30961  -0.27906  -0.22837
		0.50000  -0.34952  -0.36219  -0.36799  -0.38313  -0.37783  -0.37092  -0.35811  -0.33420  -0.30773  -0.24712
		0.90000  -0.49480  -0.51128  -0.52440  -0.54363  -0.54875  -0.53850  -0.51404  -0.48316  -0.44745  -0.35580
	    </tableData>

	    <tableData breakPoint="10.00000">
                -10.00     -5.00      0.00      5.00     10.00     15.00     20.00     25.00     30.00     40.00
		0.20000  -0.32485  -0.33219  -0.33902  -0.35160  -0.35557  -0.34906  -0.32910  -0.31107  -0.27935  -0.21560
		0.50000  -0.34868  -0.35703  -0.36378  -0.37825  -0.38074  -0.37366  -0.35649  -0.33289  -0.30223  -0.23587
		0.90000  -0.49105  -0.50791  -0.52116  -0.53725  -0.54011  -0.52867  -0.51229  -0.47614  -0.43490  -0.32550
	    </tableData>

	</table>
    </function>

    <function name="aero/CL_left-flaperon">
	<interpolate1d>
	    <property>fcs/surfaces/left-flaperon-pos-deg</property>
	    <value>-51</value> <property>aero/CL_left-flaperon_-51</property>
	    <value>0</value> <value>0</value>
	</interpolate1d>
    </function>

    <!-- right-flaperon -->
    <function name="aero/CL_right-flaperon_-51">
	<table>
	    <independentVar lookup="row">velocities/mach</independentVar>
	    <independentVar lookup="column">aero/alpha-deg</independentVar>
	    <independentVar lookup="table">aero/beta-deg</independentVar>
	    <tableData breakPoint="-10.00000">
                -10.00     -5.00      0.00      5.00     10.00     15.00     20.00     25.00     30.00     40.00
		0.20000  -0.27471  -0.28141  -0.28552  -0.29796  -0.30198  -0.29613  -0.28085  -0.26447  -0.23769  -0.18523
		0.50000  -0.29462  -0.30240  -0.30588  -0.32047  -0.32277  -0.31753  -0.30206  -0.28397  -0.25603  -0.20346
		0.90000  -0.42112  -0.43519  -0.44606  -0.46148  -0.46365  -0.45614  -0.43959  -0.40811  -0.37066  -0.28072
	    </tableData>

	    <tableData breakPoint="0.00000">
                -10.00     -5.00      0.00      5.00     10.00     15.00     20.00     25.00     30.00     40.00
		0.20000  -0.27122  -0.28192  -0.28608  -0.29645  -0.29349  -0.29065  -0.27864  -0.26138  -0.23518  -0.19531
		0.50000  -0.29369  -0.30500  -0.30875  -0.32321  -0.31821  -0.31257  -0.30161  -0.28179  -0.26131  -0.21467
		0.90000  -0.42349  -0.43746  -0.44762  -0.46509  -0.47006  -0.46090  -0.43979  -0.41236  -0.38197  -0.30703
	    </tableData>

	    <tableData breakPoint="10.00000">
                -10.00     -5.00      0.00      5.00     10.00     15.00     20.00     25.00     30.00     40.00
		0.20000  -0.25952  -0.27943  -0.28462  -0.28491  -0.28559  -0.27324  -0.26061  -0.24593  -0.22998  -0.18957
		0.50000  -0.27965  -0.30076  -0.31129  -0.31197  -0.30360  -0.29617  -0.28339  -0.26812  -0.25031  -0.20821
		0.90000  -0.40001  -0.41693  -0.45789  -0.45051  -0.44590  -0.43927  -0.42290  -0.39771  -0.36852  -0.28494
	    </tableData>

	</table>
    </function>

    <function name="aero/CL_right-flaperon">
	<interpolate1d>
	    <property>fcs/surfaces/right-flaperon-pos-deg</property>
	    <value>-51</value> <property>aero/CL_right-flaperon_-51</property>
	    <value>0</value> <value>0</value>
	</interpolate1d>
    </function>

    <!-- rudder -->
    <function name="aero/CL_rudder_-35">
	<table>
	    <independentVar lookup="row">velocities/mach</independentVar>
	    <independentVar lookup="column">aero/alpha-deg</independentVar>
	    <independentVar lookup="table">aero/beta-deg</independentVar>
	    <tableData breakPoint="-10.00000">
                -10.00     -5.00      0.00      5.00     10.00     15.00     20.00     25.00     30.00     40.00
		0.20000   0.00690   0.00560   0.00519   0.00228   0.00083  -0.01013  -0.01207  -0.00990  -0.00926  -0.00613
		0.50000   0.00559   0.00624   0.00645   0.00366   0.00174  -0.00644  -0.01074  -0.01326  -0.01441  -0.00875
		0.90000   0.00899   0.00850   0.01385   0.00724   0.00322  -0.00323  -0.00851  -0.00386  -0.00828  -0.00805
	    </tableData>

	    <tableData breakPoint="0.00000">
                -10.00     -5.00      0.00      5.00     10.00     15.00     20.00     25.00     30.00     40.00
		0.20000   0.01852   0.01623   0.01246   0.01143   0.00789   0.00928   0.00416   0.00519   0.00570   0.00443
		0.50000   0.01821   0.01663   0.01377   0.01089   0.00754   0.01115   0.00540   0.00547   0.00378   0.00186
		0.90000   0.01958   0.01842   0.01656   0.01413   0.01210   0.00879   0.00584   0.00426   0.00250   0.00020
	    </tableData>

	    <tableData breakPoint="10.00000">
                -10.00     -5.00      0.00      5.00     10.00     15.00     20.00     25.00     30.00     40.00
		0.20000   0.02485   0.02133   0.02519   0.02475   0.01772   0.01799   0.02402   0.02008   0.01502   0.01030
		0.50000   0.02601   0.02241   0.02180   0.01699   0.01684   0.02256   0.01711   0.01614   0.01319   0.01015
		0.90000   0.02716   0.02575   0.01815   0.02006   0.01511   0.01861   0.01901   0.01002   0.01069   0.00949
	    </tableData>

	</table>
    </function>

    <function name="aero/CL_rudder_4">
	<table>
	    <independentVar lookup="row">velocities/mach</independentVar>
	    <independentVar lookup="column">aero/alpha-deg</independentVar>
	    <independentVar lookup="table">aero/beta-deg</independentVar>
	    <tableData breakPoint="-10.00000">
                -10.00     -5.00      0.00      5.00     10.00     15.00     20.00     25.00     30.00     40.00
		0.20000   0.00256   0.00175   0.00259   0.00256   0.00285   0.00094   0.00400   0.00396   0.00168   0.00099
		0.50000   0.00164   0.00173   0.00183   0.00258   0.00204   0.00204   0.00249   0.00143   0.00238   0.00170
		0.90000   0.00204   0.00187   0.00126   0.00112   0.00033   0.00178   0.00265   0.00065   0.00157   0.00177
	    </tableData>

	    <tableData breakPoint="0.00000">
                -10.00     -5.00      0.00      5.00     10.00     15.00     20.00     25.00     30.00     40.00
		0.20000   0.00039   0.00033   0.00000   0.00032   0.00084   0.00069   0.00000  -0.00073   0.00110   0.00077
		0.50000   0.00038   0.00032   0.00037   0.00022   0.00075   0.00098   0.00000  -0.00020   0.00034  -0.00119
		0.90000   0.00033   0.00040   0.00033   0.00034   0.00027   0.00024   0.00029   0.00000   0.00025   0.00000
	    </tableData>

	    <tableData breakPoint="10.00000">
                -10.00     -5.00      0.00      5.00     10.00     15.00     20.00     25.00     30.00     40.00
		0.20000  -0.00174  -0.00115  -0.00150  -0.00171  -0.00173  -0.00323  -0.00196  -0.00241  -0.00220  -0.00064
		0.50000  -0.00066  -0.00112  -0.00125  -0.00118  -0.00016  -0.00435  -0.00279  -0.00262  -0.00202  -0.00072
		0.90000  -0.00146  -0.00107  -0.00074  -0.00046  -0.00138  -0.00106  -0.00166   0.00000  -0.00114  -0.00083
	    </tableData>

	</table>
    </function>

    <function name="aero/CL_rudder_-4">
	<table>
	    <independentVar lookup="row">velocities/mach</independentVar>
	    <independentVar lookup="column">aero/alpha-deg</independentVar>
	    <independentVar lookup="table">aero/beta-deg</independentVar>
	    <tableData breakPoint="-10.00000">
                -10.00     -5.00      0.00      5.00     10.00     15.00     20.00     25.00     30.00     40.00
		0.20000  -0.00173  -0.00115  -0.00150  -0.00165  -0.00174  -0.00327  -0.00267  -0.00229  -0.00238  -0.00099
		0.50000  -0.00067  -0.00112  -0.00128  -0.00119  -0.00027  -0.00453  -0.00269  -0.00254  -0.00201  -0.00096
		0.90000  -0.00147  -0.00107  -0.00075  -0.00056  -0.00136  -0.00117  -0.00202   0.00023  -0.00152  -0.00087
	    </tableData>

	    <tableData breakPoint="0.00000">
                -10.00     -5.00      0.00      5.00     10.00     15.00     20.00     25.00     30.00     40.00
		0.20000   0.00037   0.00033   0.00000   0.00033   0.00085   0.00065  -0.00010  -0.00058   0.00047   0.00000
		0.50000   0.00038   0.00032   0.00037   0.00023   0.00075   0.00096   0.00000  -0.00027   0.00024   0.00000
		0.90000   0.00033   0.00040   0.00033   0.00034   0.00026   0.00022   0.00028   0.00035   0.00036   0.00014
	    </tableData>

	    <tableData breakPoint="10.00000">
                -10.00     -5.00      0.00      5.00     10.00     15.00     20.00     25.00     30.00     40.00
		0.20000   0.00256   0.00175   0.00256   0.00257   0.00288   0.00104   0.00435   0.00399   0.00197   0.00231
		0.50000   0.00170   0.00173   0.00184   0.00255   0.00207   0.00217   0.00258   0.00123   0.00245   0.00193
		0.90000   0.00204   0.00187   0.00127   0.00118   0.00027   0.00170   0.00251   0.00063   0.00108   0.00296
	    </tableData>

	</table>
    </function>

    <function name="aero/CL_rudder_35">
	<table>
	    <independentVar lookup="row">velocities/mach</independentVar>
	    <independentVar lookup="column">aero/alpha-deg</independentVar>
	    <independentVar lookup="table">aero/beta-deg</independentVar>
	    <tableData breakPoint="-10.00000">
                -10.00     -5.00      0.00      5.00     10.00     15.00     20.00     25.00     30.00     40.00
		0.20000   0.02521   0.02139   0.02526   0.02477   0.01768   0.01798   0.02386   0.02004   0.01486   0.01125
		0.50000   0.02603   0.02247   0.02180   0.01696   0.01686   0.02191   0.01600   0.01595   0.01327   0.01012
		0.90000   0.02717   0.02578   0.01815   0.02005   0.01516   0.01822   0.01923   0.00964   0.01093   0.00912
	    </tableData>

	    <tableData breakPoint="0.00000">
                -10.00     -5.00      0.00      5.00     10.00     15.00     20.00     25.00     30.00     40.00
		0.20000   0.01852   0.01623   0.01246   0.01141   0.00789   0.00923   0.00433   0.00491   0.00577   0.00348
		0.50000   0.01822   0.01663   0.01377   0.01089   0.00794   0.01121   0.00554   0.00558   0.00398  -0.00012
		0.90000   0.01956   0.01839   0.01653   0.01414   0.01211   0.00869   0.00561   0.00393   0.00240   0.00017
	    </tableData>

	    <tableData breakPoint="10.00000">
                -10.00     -5.00      0.00      5.00     10.00     15.00     20.00     25.00     30.00     40.00
		0.20000   0.00688   0.00560   0.00519   0.00224   0.00076  -0.00997  -0.01174  -0.00983  -0.00909  -0.00725
		0.50000   0.00563   0.00626   0.00649   0.00372   0.00166  -0.00616  -0.01046  -0.01321  -0.01460  -0.00870
		0.90000   0.00899   0.00851   0.01385   0.00736   0.00306  -0.00305  -0.00831  -0.00402  -0.00824  -0.00828
	    </tableData>

	</table>
    </function>

    <function name="aero/CL_rudder">
	<interpolate1d>
	    <property>fcs/surfaces/rudder-pos-deg</property>
	    <value>-35</value> <property>aero/CL_rudder_-35</property>
	    <value>-4</value> <property>aero/CL_rudder_-4</property>
	    <value>0</value> <value>0</value>
	    <value>4</value> <property>aero/CL_rudder_4</property>
	    <value>35</value> <property>aero/CL_rudder_35</property>
	</interpolate1d>
    </function>

    <!-- slats -->
    <function name="aero/CL_slats_27.5">
	<table>
	    <independentVar lookup="row">velocities/mach</independentVar>
	    <independentVar lookup="column">aero/alpha-deg</independentVar>
	    <independentVar lookup="table">aero/beta-deg</independentVar>
	    <tableData breakPoint="-10.00000">
                -10.00     -5.00      0.00      5.00     10.00     15.00     20.00     25.00     30.00     40.00
		0.20000  -0.00319  -0.01086  -0.01162  -0.00585   0.00783   0.02915   0.05568   0.08742   0.11909   0.18453
		0.50000  -0.00279  -0.01099  -0.01246  -0.00579   0.00903   0.03042   0.05948   0.09115   0.12707   0.19493
		0.90000   0.00130  -0.00940  -0.01130  -0.00384   0.01424   0.04198   0.07801   0.11913   0.16404   0.25163
	    </tableData>

	    <tableData breakPoint="0.00000">
                -10.00     -5.00      0.00      5.00     10.00     15.00     20.00     25.00     30.00     40.00
		0.20000  -0.00299  -0.01125  -0.01229  -0.00580   0.00845   0.03015   0.05720   0.08910   0.12357   0.18773
		0.50000  -0.00275  -0.01145  -0.01251  -0.00590   0.00960   0.03219   0.06096   0.09491   0.13107   0.19922
		0.90000   0.00111  -0.00965  -0.01159  -0.00388   0.01468   0.04302   0.08026   0.12284   0.16881   0.25765
	    </tableData>

	    <tableData breakPoint="10.00000">
                -10.00     -5.00      0.00      5.00     10.00     15.00     20.00     25.00     30.00     40.00
		0.20000  -0.00324  -0.01085  -0.01162  -0.00583   0.00787   0.02926   0.05598   0.08721   0.11946   0.18416
		0.50000  -0.00280  -0.01099  -0.01243  -0.00576   0.00896   0.03073   0.05938   0.09079   0.12730   0.19521
		0.90000   0.00125  -0.00940  -0.01133  -0.00361   0.01409   0.04150   0.07793   0.11920   0.16379   0.25112
	    </tableData>

	</table>
    </function>

    <function name="aero/CL_slats">
	<interpolate1d>
	    <property>fcs/surfaces/slats-pos-deg</property>
	    <value>0</value> <value>0</value>
	    <value>27.5</value> <property>aero/CL_slats_27.5</property>
	</interpolate1d>
    </function>

    <!-- speedbrake -->
    <function name="aero/CL_speedbrake_60">
	<table>
	    <independentVar lookup="row">velocities/mach</independentVar>
	    <independentVar lookup="column">aero/alpha-deg</independentVar>
	    <independentVar lookup="table">aero/beta-deg</independentVar>
	    <tableData breakPoint="-10.00000">
                -10.00     -5.00      0.00      5.00     10.00     15.00     20.00     25.00     30.00     40.00
		0.20000  -0.25264  -0.26037  -0.27003  -0.27165  -0.27538  -0.26233  -0.24517  -0.21854  -0.19062  -0.13137
		0.50000  -0.27011  -0.27821  -0.28953  -0.28915  -0.29322  -0.28030  -0.26300  -0.23712  -0.20805  -0.14624
		0.90000  -0.34930  -0.36234  -0.37802  -0.37830  -0.37647  -0.36251  -0.34666  -0.32000  -0.29038  -0.20948
	    </tableData>

	    <tableData breakPoint="0.00000">
                -10.00     -5.00      0.00      5.00     10.00     15.00     20.00     25.00     30.00     40.00
		0.20000  -0.25576  -0.27339  -0.28299  -0.28783  -0.27988  -0.27361  -0.25280  -0.22358  -0.19113  -0.13475
		0.50000  -0.27391  -0.29296  -0.30196  -0.30955  -0.30098  -0.29255  -0.27314  -0.24428  -0.21094  -0.15810
		0.90000  -0.36457  -0.38135  -0.39104  -0.40107  -0.39667  -0.38915  -0.36216  -0.33140  -0.29307  -0.22116
	    </tableData>

	    <tableData breakPoint="10.00000">
                -10.00     -5.00      0.00      5.00     10.00     15.00     20.00     25.00     30.00     40.00
		0.20000  -0.25262  -0.26036  -0.27003  -0.27169  -0.27531  -0.26232  -0.24474  -0.21827  -0.19024  -0.13169
		0.50000  -0.27012  -0.27824  -0.28950  -0.28912  -0.29324  -0.28012  -0.26307  -0.23675  -0.20782  -0.14546
		0.90000  -0.34950  -0.36237  -0.37802  -0.37820  -0.37661  -0.36223  -0.34655  -0.32003  -0.29020  -0.20937
	    </tableData>

	</table>
    </function>

    <function name="aero/CL_speedbrake">
	<interpolate1d>
	    <property>fcs/surfaces/speedbrake-pos-deg</property>
	    <value>0</value> <value>0</value>
	    <value>60</value> <property>aero/CL_speedbrake_60</property>
	</interpolate1d>
    </function>

    <!-- CDTOT -->
    <!-- base -->
    <function name="aero/CDtot_base">
	<table>
	    <independentVar lookup="row">velocities/mach</independentVar>
	    <independentVar lookup="column">aero/alpha-deg</independentVar>
	    <independentVar lookup="table">aero/beta-deg</independentVar>
	    <tableData breakPoint="-10.00000">
                -10.00     -5.00      0.00      5.00     10.00     15.00     20.00     25.00     30.00     40.00
		0.20000   0.04913   0.02743   0.02723   0.05060   0.09731   0.16064   0.23474   0.34629   0.47526   0.73206
		0.50000   0.05163   0.02783   0.02786   0.05405   0.10548   0.17696   0.25965   0.38780   0.53284   0.84323
		0.90000   0.06437   0.02910   0.03098   0.07183   0.14869   0.25843   0.39049   0.60163   0.85296   1.45089
	    </tableData>

	    <tableData breakPoint="0.00000">
                -10.00     -5.00      0.00      5.00     10.00     15.00     20.00     25.00     30.00     40.00
		0.20000   0.04549   0.02339   0.02704   0.04936   0.09574   0.16360   0.25065   0.35597   0.47140   0.74493
		0.50000   0.04829   0.02369   0.02779   0.05289   0.10483   0.18117   0.28019   0.39982   0.53296   0.86334
		0.90000   0.06348   0.02551   0.03183   0.07054   0.15210   0.27351   0.43521   0.63482   0.88145   1.51315
	    </tableData>

	    <tableData breakPoint="10.00000">
                -10.00     -5.00      0.00      5.00     10.00     15.00     20.00     25.00     30.00     40.00
		0.20000   0.04913   0.02743   0.02723   0.05060   0.09731   0.16064   0.23474   0.34629   0.47526   0.73200
		0.50000   0.05163   0.02783   0.02786   0.05405   0.10549   0.17690   0.25964   0.38788   0.53281   0.84319
		0.90000   0.06437   0.02910   0.03098   0.07182   0.14870   0.25842   0.39052   0.60160   0.85317   1.45068
	    </tableData>

	</table>
    </function>

    <!-- elevator -->
    <function name="aero/CDtot_elevator_-24">
	<table>
	    <independentVar lookup="row">velocities/mach</independentVar>
	    <independentVar lookup="column">aero/alpha-deg</independentVar>
	    <independentVar lookup="table">aero/beta-deg</independentVar>
	    <tableData breakPoint="-10.00000">
                -10.00     -5.00      0.00      5.00     10.00     15.00     20.00     25.00     30.00     40.00
		0.20000   0.06933   0.04973   0.04492   0.01209  -0.00245  -0.02925  -0.03144  -0.05928  -0.09239  -0.11241
		0.50000   0.07141   0.05154   0.04693   0.01239  -0.00128  -0.02983  -0.03233  -0.06359  -0.09622  -0.12422
		0.90000   0.08884   0.06546   0.06000   0.01560   0.00792  -0.02504  -0.03847  -0.07685  -0.11655  -0.16596
	    </tableData>

	    <tableData breakPoint="0.00000">
                -10.00     -5.00      0.00      5.00     10.00     15.00     20.00     25.00     30.00     40.00
		0.20000   0.07904   0.06165   0.03832   0.03693  -0.00232  -0.01783  -0.03811  -0.05973  -0.07838  -0.11647
		0.50000   0.08249   0.06446   0.03990   0.03972  -0.00289  -0.01944  -0.04101  -0.06300  -0.08363  -0.12737
		0.90000   0.10441   0.08370   0.05348   0.06423   0.00032  -0.02241  -0.05198  -0.07892  -0.11325  -0.18100
	    </tableData>

	    <tableData breakPoint="10.00000">
                -10.00     -5.00      0.00      5.00     10.00     15.00     20.00     25.00     30.00     40.00
		0.20000   0.06926   0.04975   0.04488   0.01207  -0.00245  -0.02927  -0.03143  -0.05930  -0.09244  -0.11234
		0.50000   0.07141   0.05153   0.04689   0.01238  -0.00129  -0.02980  -0.03230  -0.06371  -0.09578  -0.12427
		0.90000   0.08885   0.06545   0.05999   0.01561   0.00793  -0.02502  -0.03843  -0.07681  -0.11675  -0.16543
	    </tableData>

	</table>
    </function>

    <function name="aero/CDtot_elevator_-9.5">
	<table>
	    <independentVar lookup="row">velocities/mach</independentVar>
	    <independentVar lookup="column">aero/alpha-deg</independentVar>
	    <independentVar lookup="table">aero/beta-deg</independentVar>
	    <tableData breakPoint="-10.00000">
                -10.00     -5.00      0.00      5.00     10.00     15.00     20.00     25.00     30.00     40.00
		0.20000   0.02116   0.01272   0.00558  -0.00587  -0.00948  -0.01835  -0.02546  -0.03428  -0.05470  -0.11643
		0.50000   0.02261   0.01356   0.00613  -0.00582  -0.00996  -0.01998  -0.02709  -0.03690  -0.05619  -0.12993
		0.90000   0.03105   0.01863   0.00926  -0.00575  -0.01293  -0.02650  -0.03588  -0.04859  -0.07196  -0.17596
	    </tableData>

	    <tableData breakPoint="0.00000">
                -10.00     -5.00      0.00      5.00     10.00     15.00     20.00     25.00     30.00     40.00
		0.20000   0.02339   0.01524   0.00325  -0.00409  -0.01015  -0.01914  -0.02693  -0.03546  -0.04102  -0.05300
		0.50000   0.02514   0.01646   0.00353  -0.00452  -0.01104  -0.02035  -0.02905  -0.03765  -0.04402  -0.05702
		0.90000   0.03661   0.02428   0.00645  -0.00427  -0.01483  -0.02715  -0.03765  -0.04997  -0.06333  -0.08685
	    </tableData>

	    <tableData breakPoint="10.00000">
                -10.00     -5.00      0.00      5.00     10.00     15.00     20.00     25.00     30.00     40.00
		0.20000   0.02116   0.01272   0.00558  -0.00587  -0.00949  -0.01835  -0.02545  -0.03428  -0.05465  -0.11642
		0.50000   0.02261   0.01356   0.00614  -0.00583  -0.00997  -0.01992  -0.02708  -0.03694  -0.05613  -0.12989
		0.90000   0.03105   0.01863   0.00926  -0.00574  -0.01293  -0.02649  -0.03591  -0.04848  -0.07229  -0.17593
	    </tableData>

	</table>
    </function>

    <function name="aero/CDtot_elevator_1.5">
	<table>
	    <independentVar lookup="row">velocities/mach</independentVar>
	    <independentVar lookup="column">aero/alpha-deg</independentVar>
	    <independentVar lookup="table">aero/beta-deg</independentVar>
	    <tableData breakPoint="-10.00000">
                -10.00     -5.00      0.00      5.00     10.00     15.00     20.00     25.00     30.00     40.00
		0.20000   0.00000   0.00000  -0.00037   0.00000  -0.00013   0.00000   0.00023   0.00010   0.00042   0.00022
		0.50000   0.00000   0.00000  -0.00042   0.00000   0.00000  -0.00015  -0.00012   0.00020   0.00056  -0.00011
		0.90000   0.00000   0.00000  -0.00043   0.00000   0.00000  -0.00067  -0.00012  -0.00014  -0.00038   0.00000
	    </tableData>

	    <tableData breakPoint="0.00000">
                -10.00     -5.00      0.00      5.00     10.00     15.00     20.00     25.00     30.00     40.00
		0.20000   0.00000   0.00000  -0.00256   0.00000   0.00000  -0.00034   0.00000   0.00000   0.00060   0.00036
		0.50000   0.00000   0.00000  -0.00275   0.00000   0.00000   0.00015   0.00016   0.00000   0.00015   0.00023
		0.90000   0.00000   0.00000  -0.00345  -0.00012  -0.00020  -0.00022   0.00000   0.00030   0.00103   0.00079
	    </tableData>

	    <tableData breakPoint="10.00000">
                -10.00     -5.00      0.00      5.00     10.00     15.00     20.00     25.00     30.00     40.00
		0.20000   0.00000   0.00000  -0.00038   0.00000  -0.00013   0.00000   0.00022   0.00010   0.00041   0.00130
		0.50000   0.00000   0.00000  -0.00042   0.00000   0.00000   0.00000  -0.00010   0.00014   0.00054   0.00000
		0.90000   0.00000   0.00000  -0.00043   0.00000   0.00000  -0.00062  -0.00023  -0.00014  -0.00040   0.00016
	    </tableData>

	</table>
    </function>

    <function name="aero/CDtot_elevator">
	<interpolate1d>
	    <property>fcs/surfaces/elevator-pos-deg</property>
	    <value>-24</value> <property>aero/CDtot_elevator_-24</property>
	    <value>-9.5</value> <property>aero/CDtot_elevator_-9.5</property>
	    <value>0</value> <value>0</value>
	    <value>1.5</value> <property>aero/CDtot_elevator_1.5</property>
	</interpolate1d>
    </function>

    <!-- flap -->
    <function name="aero/CDtot_flap_30">
	<table>
	    <independentVar lookup="row">velocities/mach</independentVar>
	    <independentVar lookup="column">aero/alpha-deg</independentVar>
	    <independentVar lookup="table">aero/beta-deg</independentVar>
	    <tableData breakPoint="-10.00000">
                -10.00     -5.00      0.00      5.00     10.00     15.00     20.00     25.00     30.00     40.00
		0.20000   0.00703   0.04595   0.05102   0.11805   0.15090   0.17664   0.18878   0.20858   0.22500   0.21411
		0.50000   0.00887   0.05294   0.05789   0.13369   0.17151   0.20031   0.21891   0.24421   0.26446   0.25277
		0.90000   0.02944   0.10741   0.11546   0.24706   0.31470   0.37475   0.41223   0.47339   0.50829   0.54371
	    </tableData>

	    <tableData breakPoint="0.00000">
                -10.00     -5.00      0.00      5.00     10.00     15.00     20.00     25.00     30.00     40.00
		0.20000   0.00794   0.04926   0.16763   0.12560   0.15870   0.18712   0.20897   0.22001   0.23031   0.22500
		0.50000   0.00968   0.05676   0.18969   0.14334   0.18211   0.21484   0.24139   0.25765   0.27244   0.27426
		0.90000   0.02844   0.11118   0.33471   0.26356   0.33868   0.40373   0.45734   0.49861   0.53512   0.57116
	    </tableData>

	    <tableData breakPoint="10.00000">
                -10.00     -5.00      0.00      5.00     10.00     15.00     20.00     25.00     30.00     40.00
		0.20000   0.00703   0.04595   0.05102   0.11808   0.15088   0.17657   0.18889   0.20858   0.22541   0.21451
		0.50000   0.00887   0.05294   0.05786   0.13367   0.17145   0.20030   0.21898   0.24431   0.26516   0.25363
		0.90000   0.02944   0.10743   0.11548   0.24711   0.31459   0.37489   0.41242   0.47360   0.50786   0.54423
	    </tableData>

	</table>
    </function>

    <function name="aero/CDtot_flap_40">
	<table>
	    <independentVar lookup="row">velocities/mach</independentVar>
	    <independentVar lookup="column">aero/alpha-deg</independentVar>
	    <independentVar lookup="table">aero/beta-deg</independentVar>
	    <tableData breakPoint="-10.00000">
                -10.00     -5.00      0.00      5.00     10.00     15.00     20.00     25.00     30.00     40.00
		0.20000   0.02097   0.06512   0.06569   0.14563   0.18275   0.21071   0.22195   0.24216   0.25597   0.23806
		0.50000   0.02539   0.07519   0.07420   0.16549   0.20757   0.23782   0.25716   0.28224   0.30189   0.28308
		0.90000   0.06270   0.15017   0.14928   0.30807   0.38219   0.44693   0.48597   0.54958   0.58262   0.60321
	    </tableData>

	    <tableData breakPoint="0.00000">
                -10.00     -5.00      0.00      5.00     10.00     15.00     20.00     25.00     30.00     40.00
		0.20000   0.02302   0.06957   0.21665   0.15531   0.19134   0.22231   0.24377   0.25518   0.26378   0.25254
		0.50000   0.02713   0.07997   0.24517   0.17739   0.22010   0.25534   0.28210   0.29922   0.31120   0.30403
		0.90000   0.06282   0.15659   0.43323   0.32745   0.41052   0.48139   0.53612   0.58150   0.61278   0.63175
	    </tableData>

	    <tableData breakPoint="10.00000">
                -10.00     -5.00      0.00      5.00     10.00     15.00     20.00     25.00     30.00     40.00
		0.20000   0.02098   0.06512   0.06559   0.14562   0.18280   0.21072   0.22186   0.24252   0.25598   0.23811
		0.50000   0.02539   0.07520   0.07418   0.16550   0.20760   0.23791   0.25708   0.28223   0.30280   0.28397
		0.90000   0.06271   0.15021   0.14917   0.30806   0.38233   0.44686   0.48591   0.54991   0.58249   0.60344
	    </tableData>

	</table>
    </function>

    <function name="aero/CDtot_flap">
	<interpolate1d>
	    <property>fcs/surfaces/flap-pos-deg</property>
	    <value>0</value> <value>0</value>
	    <value>30</value> <property>aero/CDtot_flap_30</property>
	    <value>40</value> <property>aero/CDtot_flap_40</property>
	</interpolate1d>
    </function>

    <!-- left-flaperon -->
    <function name="aero/CDtot_left-flaperon_-51">
	<table>
	    <independentVar lookup="row">velocities/mach</independentVar>
	    <independentVar lookup="column">aero/alpha-deg</independentVar>
	    <independentVar lookup="table">aero/beta-deg</independentVar>
	    <tableData breakPoint="-10.00000">
                -10.00     -5.00      0.00      5.00     10.00     15.00     20.00     25.00     30.00     40.00
		0.20000   0.06615   0.04464   0.00777   0.00064  -0.02227  -0.04114  -0.05592  -0.08449  -0.10598  -0.14388
		0.50000   0.07598   0.04995   0.00778   0.00023  -0.02531  -0.04783  -0.06393  -0.09845  -0.12240  -0.17551
		0.90000   0.14000   0.08869   0.01040   0.00139  -0.04068  -0.08545  -0.12212  -0.18870  -0.24882  -0.36145
	    </tableData>

	    <tableData breakPoint="0.00000">
                -10.00     -5.00      0.00      5.00     10.00     15.00     20.00     25.00     30.00     40.00
		0.20000   0.06407   0.04250   0.03546  -0.00282  -0.02578  -0.04928  -0.07174  -0.09467  -0.11127  -0.14289
		0.50000   0.07336   0.04824   0.04068  -0.00325  -0.02945  -0.05661  -0.08317  -0.10964  -0.12958  -0.17566
		0.90000   0.13573   0.08992   0.08041  -0.00088  -0.04821  -0.09827  -0.14836  -0.20207  -0.25540  -0.35891
	    </tableData>

	    <tableData breakPoint="10.00000">
                -10.00     -5.00      0.00      5.00     10.00     15.00     20.00     25.00     30.00     40.00
		0.20000   0.05980   0.03908   0.01839  -0.00169  -0.02697  -0.04959  -0.06964  -0.08882  -0.10475  -0.13466
		0.50000   0.06731   0.04397   0.02047  -0.00189  -0.03000  -0.05631  -0.08018  -0.10341  -0.12093  -0.16153
		0.90000   0.12187   0.08038   0.03828   0.00073  -0.04529  -0.09208  -0.13796  -0.18449  -0.23426  -0.31921
	    </tableData>

	</table>
    </function>

    <function name="aero/CDtot_left-flaperon">
	<interpolate1d>
	    <property>fcs/surfaces/left-flaperon-pos-deg</property>
	    <value>-51</value> <property>aero/CDtot_left-flaperon_-51</property>
	    <value>0</value> <value>0</value>
	</interpolate1d>
    </function>

    <!-- right-flaperon -->
    <function name="aero/CDtot_right-flaperon_-51">
	<table>
	    <independentVar lookup="row">velocities/mach</independentVar>
	    <independentVar lookup="column">aero/alpha-deg</independentVar>
	    <independentVar lookup="table">aero/beta-deg</independentVar>
	    <tableData breakPoint="-10.00000">
                -10.00     -5.00      0.00      5.00     10.00     15.00     20.00     25.00     30.00     40.00
		0.20000   0.04672   0.02917   0.01137  -0.00581  -0.02752  -0.04695  -0.06377  -0.07962  -0.09254  -0.11498
		0.50000   0.05274   0.03289   0.01268  -0.00644  -0.03060  -0.05335  -0.07306  -0.09304  -0.10687  -0.14271
		0.90000   0.09784   0.06182   0.02563  -0.00732  -0.04731  -0.08800  -0.12762  -0.16729  -0.21042  -0.28317
	    </tableData>

	    <tableData breakPoint="0.00000">
                -10.00     -5.00      0.00      5.00     10.00     15.00     20.00     25.00     30.00     40.00
		0.20000   0.05006   0.03165   0.02284  -0.00701  -0.02653  -0.04646  -0.06552  -0.08528  -0.09965  -0.12526
		0.50000   0.05739   0.03617   0.02626  -0.00804  -0.03029  -0.05340  -0.07601  -0.09896  -0.11522  -0.15475
		0.90000   0.10885   0.06918   0.05472  -0.00976  -0.05091  -0.09413  -0.13736  -0.18381  -0.22939  -0.31785
	    </tableData>

	    <tableData breakPoint="10.00000">
                -10.00     -5.00      0.00      5.00     10.00     15.00     20.00     25.00     30.00     40.00
		0.20000   0.05193   0.03341   0.00525  -0.00397  -0.02284  -0.03900  -0.05122  -0.07590  -0.09420  -0.12749
		0.50000   0.05946   0.03746   0.00502  -0.00495  -0.02605  -0.04527  -0.05863  -0.08902  -0.10828  -0.15447
		0.90000   0.11201   0.06855   0.00711  -0.00761  -0.04350  -0.08288  -0.11397  -0.17255  -0.22434  -0.31964
	    </tableData>

	</table>
    </function>

    <function name="aero/CDtot_right-flaperon">
	<interpolate1d>
	    <property>fcs/surfaces/right-flaperon-pos-deg</property>
	    <value>-51</value> <property>aero/CDtot_right-flaperon_-51</property>
	    <value>0</value> <value>0</value>
	</interpolate1d>
    </function>

    <!-- rudder -->
    <function name="aero/CDtot_rudder_-35">
	<table>
	    <independentVar lookup="row">velocities/mach</independentVar>
	    <independentVar lookup="column">aero/alpha-deg</independentVar>
	    <independentVar lookup="table">aero/beta-deg</independentVar>
	    <tableData breakPoint="-10.00000">
                -10.00     -5.00      0.00      5.00     10.00     15.00     20.00     25.00     30.00     40.00
		0.20000   0.00024   0.00064   0.00028   0.00016  -0.00050   0.00378   0.00241  -0.00271  -0.01668  -0.00592
		0.50000   0.00085   0.00111   0.00030   0.00016   0.00065   0.00565   0.00521  -0.00298  -0.01272  -0.00479
		0.90000   0.00701   0.00557   0.00020   0.00000   0.00602   0.02129   0.03043   0.01421  -0.00355   0.00426
	    </tableData>

	    <tableData breakPoint="0.00000">
                -10.00     -5.00      0.00      5.00     10.00     15.00     20.00     25.00     30.00     40.00
		0.20000   0.01128   0.01099   0.01052   0.01057   0.00952   0.00844   0.00819   0.00521   0.00747   0.00703
		0.50000   0.01205   0.01174   0.01143   0.01134   0.01007   0.00933   0.00871   0.00578   0.00803   0.00631
		0.90000   0.01620   0.01613   0.01586   0.01549   0.01536   0.01325   0.01240   0.01116   0.00979   0.00784
	    </tableData>

	    <tableData breakPoint="10.00000">
                -10.00     -5.00      0.00      5.00     10.00     15.00     20.00     25.00     30.00     40.00
		0.20000   0.02150   0.02032   0.01978   0.01909   0.01713   0.01579   0.01461   0.01792   0.02664   0.01613
		0.50000   0.02254   0.02157   0.02148   0.02030   0.01812   0.01517   0.01424   0.01702   0.02701   0.01485
		0.90000   0.02414   0.02510   0.02829   0.02803   0.02087   0.00797  -0.00226   0.00856   0.02094   0.01104
	    </tableData>

	</table>
    </function>

    <function name="aero/CDtot_rudder_4">
	<table>
	    <independentVar lookup="row">velocities/mach</independentVar>
	    <independentVar lookup="column">aero/alpha-deg</independentVar>
	    <independentVar lookup="table">aero/beta-deg</independentVar>
	    <tableData breakPoint="-10.00000">
                -10.00     -5.00      0.00      5.00     10.00     15.00     20.00     25.00     30.00     40.00
		0.20000   0.00191   0.00174   0.00174   0.00161   0.00171   0.00113   0.00112   0.00179   0.00335   0.00184
		0.50000   0.00195   0.00182   0.00189   0.00178   0.00159   0.00097   0.00116   0.00184   0.00334   0.00160
		0.90000   0.00178   0.00195   0.00251   0.00240   0.00169  -0.00039  -0.00150   0.00014   0.00212   0.00100
	    </tableData>

	    <tableData breakPoint="0.00000">
                -10.00     -5.00      0.00      5.00     10.00     15.00     20.00     25.00     30.00     40.00
		0.20000   0.00024   0.00022   0.00024   0.00019   0.00027   0.00022   0.00017  -0.00022   0.00010   0.00000
		0.50000   0.00026   0.00025   0.00025   0.00020   0.00021   0.00025   0.00018  -0.00015   0.00013   0.00026
		0.90000   0.00036   0.00033   0.00034   0.00034   0.00037   0.00026   0.00033   0.00021   0.00020   0.00028
	    </tableData>

	    <tableData breakPoint="10.00000">
                -10.00     -5.00      0.00      5.00     10.00     15.00     20.00     25.00     30.00     40.00
		0.20000  -0.00142  -0.00130  -0.00132  -0.00118  -0.00137  -0.00078  -0.00089  -0.00149  -0.00306  -0.00160
		0.50000  -0.00147  -0.00136  -0.00144  -0.00136  -0.00115  -0.00052  -0.00100  -0.00146  -0.00310  -0.00169
		0.90000  -0.00112  -0.00131  -0.00193  -0.00192  -0.00109   0.00104   0.00250   0.00041  -0.00148  -0.00030
	    </tableData>

	</table>
    </function>

    <function name="aero/CDtot_rudder_-4">
	<table>
	    <independentVar lookup="row">velocities/mach</independentVar>
	    <independentVar lookup="column">aero/alpha-deg</independentVar>
	    <independentVar lookup="table">aero/beta-deg</independentVar>
	    <tableData breakPoint="-10.00000">
                -10.00     -5.00      0.00      5.00     10.00     15.00     20.00     25.00     30.00     40.00
		0.20000  -0.00143  -0.00130  -0.00132  -0.00118  -0.00137  -0.00081  -0.00089  -0.00147  -0.00309  -0.00179
		0.50000  -0.00147  -0.00136  -0.00144  -0.00136  -0.00114  -0.00057  -0.00091  -0.00135  -0.00312  -0.00197
		0.90000  -0.00112  -0.00131  -0.00193  -0.00193  -0.00109   0.00102   0.00242   0.00041  -0.00156  -0.00037
	    </tableData>

	    <tableData breakPoint="0.00000">
                -10.00     -5.00      0.00      5.00     10.00     15.00     20.00     25.00     30.00     40.00
		0.20000   0.00024   0.00022   0.00024   0.00019   0.00028   0.00022   0.00018  -0.00032   0.00015   0.00019
		0.50000   0.00026   0.00025   0.00025   0.00020   0.00021   0.00024   0.00020  -0.00013   0.00013   0.00017
		0.90000   0.00036   0.00033   0.00034   0.00034   0.00036   0.00026   0.00030   0.00045   0.00025   0.00033
	    </tableData>

	    <tableData breakPoint="10.00000">
                -10.00     -5.00      0.00      5.00     10.00     15.00     20.00     25.00     30.00     40.00
		0.20000   0.00190   0.00174   0.00174   0.00161   0.00171   0.00113   0.00113   0.00179   0.00334   0.00229
		0.50000   0.00195   0.00182   0.00189   0.00178   0.00157   0.00104   0.00116   0.00170   0.00334   0.00159
		0.90000   0.00178   0.00195   0.00251   0.00241   0.00169  -0.00038  -0.00157   0.00014   0.00186   0.00123
	    </tableData>

	</table>
    </function>

    <function name="aero/CDtot_rudder_35">
	<table>
	    <independentVar lookup="row">velocities/mach</independentVar>
	    <independentVar lookup="column">aero/alpha-deg</independentVar>
	    <independentVar lookup="table">aero/beta-deg</independentVar>
	    <tableData breakPoint="-10.00000">
                -10.00     -5.00      0.00      5.00     10.00     15.00     20.00     25.00     30.00     40.00
		0.20000   0.02151   0.02032   0.01976   0.01909   0.01713   0.01581   0.01458   0.01791   0.02655   0.01617
		0.50000   0.02254   0.02156   0.02148   0.02030   0.01814   0.01511   0.01422   0.01708   0.02690   0.01444
		0.90000   0.02414   0.02510   0.02830   0.02802   0.02088   0.00794  -0.00213   0.00848   0.02107   0.01023
	    </tableData>

	    <tableData breakPoint="0.00000">
                -10.00     -5.00      0.00      5.00     10.00     15.00     20.00     25.00     30.00     40.00
		0.20000   0.01128   0.01099   0.01052   0.01056   0.00948   0.00843   0.00822   0.00519   0.00746   0.00682
		0.50000   0.01205   0.01174   0.01144   0.01133   0.01013   0.00934   0.00870   0.00579   0.00798   0.00647
		0.90000   0.01617   0.01614   0.01585   0.01549   0.01535   0.01326   0.01237   0.01104   0.00978   0.00768
	    </tableData>

	    <tableData breakPoint="10.00000">
                -10.00     -5.00      0.00      5.00     10.00     15.00     20.00     25.00     30.00     40.00
		0.20000   0.00024   0.00064   0.00028   0.00016  -0.00050   0.00385   0.00242  -0.00272  -0.01669  -0.00583
		0.50000   0.00085   0.00111   0.00031   0.00016   0.00063   0.00576   0.00522  -0.00306  -0.01277  -0.00491
		0.90000   0.00701   0.00557   0.00020   0.00000   0.00601   0.02129   0.03038   0.01426  -0.00388   0.00401
	    </tableData>

	</table>
    </function>

    <function name="aero/CDtot_rudder">
	<interpolate1d>
	    <property>fcs/surfaces/rudder-pos-deg</property>
	    <value>-35</value> <property>aero/CDtot_rudder_-35</property>
	    <value>-4</value> <property>aero/CDtot_rudder_-4</property>
	    <value>0</value> <value>0</value>
	    <value>4</value> <property>aero/CDtot_rudder_4</property>
	    <value>35</value> <property>aero/CDtot_rudder_35</property>
	</interpolate1d>
    </function>

    <!-- slats -->
    <function name="aero/CDtot_slats_27.5">
	<table>
	    <independentVar lookup="row">velocities/mach</independentVar>
	    <independentVar lookup="column">aero/alpha-deg</independentVar>
	    <independentVar lookup="table">aero/beta-deg</independentVar>
	    <tableData breakPoint="-10.00000">
                -10.00     -5.00      0.00      5.00     10.00     15.00     20.00     25.00     30.00     40.00
		0.20000   0.00096   0.00026  -0.00041  -0.00117  -0.00184  -0.00222  -0.00246  -0.00282  -0.00303  -0.00411
		0.50000   0.00103   0.00027  -0.00044  -0.00128  -0.00196  -0.00260  -0.00271  -0.00312  -0.00363  -0.00484
		0.90000   0.00122   0.00029  -0.00051  -0.00155  -0.00231  -0.00285  -0.00310  -0.00382  -0.00440  -0.00612
	    </tableData>

	    <tableData breakPoint="0.00000">
                -10.00     -5.00      0.00      5.00     10.00     15.00     20.00     25.00     30.00     40.00
		0.20000   0.00100   0.00027  -0.00075  -0.00129  -0.00191  -0.00238  -0.00272  -0.00294  -0.00308  -0.00482
		0.50000   0.00109   0.00031  -0.00082  -0.00141  -0.00208  -0.00263  -0.00300  -0.00330  -0.00349  -0.00491
		0.90000   0.00129   0.00034  -0.00103  -0.00167  -0.00246  -0.00309  -0.00347  -0.00402  -0.00466  -0.00671
	    </tableData>

	    <tableData breakPoint="10.00000">
                -10.00     -5.00      0.00      5.00     10.00     15.00     20.00     25.00     30.00     40.00
		0.20000   0.00095   0.00026  -0.00041  -0.00117  -0.00185  -0.00218  -0.00247  -0.00284  -0.00305  -0.00392
		0.50000   0.00103   0.00027  -0.00044  -0.00128  -0.00197  -0.00249  -0.00269  -0.00319  -0.00354  -0.00491
		0.90000   0.00122   0.00029  -0.00051  -0.00155  -0.00232  -0.00281  -0.00317  -0.00375  -0.00458  -0.00656
	    </tableData>

	</table>
    </function>

    <function name="aero/CDtot_slats">
	<interpolate1d>
	    <property>fcs/surfaces/slats-pos-deg</property>
	    <value>0</value> <value>0</value>
	    <value>27.5</value> <property>aero/CDtot_slats_27.5</property>
	</interpolate1d>
    </function>

    <!-- speedbrake -->
    <function name="aero/CDtot_speedbrake_60">
	<table>
	    <independentVar lookup="row">velocities/mach</independentVar>
	    <independentVar lookup="column">aero/alpha-deg</independentVar>
	    <independentVar lookup="table">aero/beta-deg</independentVar>
	    <tableData breakPoint="-10.00000">
                -10.00     -5.00      0.00      5.00     10.00     15.00     20.00     25.00     30.00     40.00
		0.20000   0.04782   0.03461   0.02019   0.00664  -0.00902  -0.02289  -0.03604  -0.04912  -0.05996  -0.07962
		0.50000   0.05282   0.03769   0.02129   0.00572  -0.01171  -0.02779  -0.04335  -0.06044  -0.07184  -0.09724
		0.90000   0.07468   0.04972   0.02385  -0.00193  -0.02962  -0.05693  -0.08327  -0.11115  -0.14200  -0.18323
	    </tableData>

	    <tableData breakPoint="0.00000">
                -10.00     -5.00      0.00      5.00     10.00     15.00     20.00     25.00     30.00     40.00
		0.20000   0.05049   0.03761   0.02335   0.00670  -0.00817  -0.02395  -0.03788  -0.05081  -0.06031  -0.07926
		0.50000   0.05612   0.04131   0.02484   0.00573  -0.01142  -0.02974  -0.04616  -0.06281  -0.07239  -0.09790
		0.90000   0.08099   0.05512   0.02808  -0.00245  -0.03126  -0.06182  -0.08987  -0.11801  -0.14315  -0.19268
	    </tableData>

	    <tableData breakPoint="10.00000">
                -10.00     -5.00      0.00      5.00     10.00     15.00     20.00     25.00     30.00     40.00
		0.20000   0.04783   0.03461   0.02019   0.00664  -0.00902  -0.02288  -0.03600  -0.04912  -0.05996  -0.07961
		0.50000   0.05282   0.03770   0.02129   0.00572  -0.01173  -0.02773  -0.04341  -0.06056  -0.07178  -0.09702
		0.90000   0.07472   0.04972   0.02385  -0.00192  -0.02962  -0.05692  -0.08331  -0.11115  -0.14219  -0.18309
	    </tableData>

	</table>
    </function>

    <function name="aero/CDtot_speedbrake">
	<interpolate1d>
	    <property>fcs/surfaces/speedbrake-pos-deg</property>
	    <value>0</value> <value>0</value>
	    <value>60</value> <property>aero/CDtot_speedbrake_60</property>
	</interpolate1d>
    </function>

    <!-- CS -->
    <!-- base -->
    <function name="aero/CS_base">
	<table>
	    <independentVar lookup="row">velocities/mach</independentVar>
	    <independentVar lookup="column">aero/alpha-deg</independentVar>
	    <independentVar lookup="table">aero/beta-deg</independentVar>
	    <tableData breakPoint="-10.00000">
                -10.00     -5.00      0.00      5.00     10.00     15.00     20.00     25.00     30.00     40.00
		0.20000   0.03905   0.04939   0.04661   0.03528   0.01555   0.00195  -0.01881  -0.06088  -0.10323  -0.19205
		0.50000   0.03893   0.05021   0.04793   0.03516   0.01439  -0.00672  -0.02125  -0.06588  -0.11445  -0.19900
		0.90000   0.03312   0.04955   0.04846   0.03505   0.01371  -0.01482  -0.05997  -0.11777  -0.17023  -0.27065
	    </tableData>

	    <tableData breakPoint="0.00000">
                -10.00     -5.00      0.00      5.00     10.00     15.00     20.00     25.00     30.00     40.00
		0.20000  -0.00000  -0.00000  -0.00000   0.00000   0.00000   0.00000   0.00032   0.00015  -0.00012   0.00057
		0.50000  -0.00000  -0.00000  -0.00000   0.00000   0.00000  -0.00044   0.00000   0.00000   0.00113  -0.00051
		0.90000  -0.00000  -0.00000  -0.00000  -0.00000   0.00000   0.00000   0.00026  -0.00027   0.00000   0.00057
	    </tableData>

	    <tableData breakPoint="10.00000">
                -10.00     -5.00      0.00      5.00     10.00     15.00     20.00     25.00     30.00     40.00
		0.20000  -0.03904  -0.04939  -0.04661  -0.03528  -0.01554  -0.00185   0.01880   0.06074   0.10346   0.19221
		0.50000  -0.03893  -0.05021  -0.04793  -0.03514  -0.01436   0.00632   0.02111   0.06577   0.11428   0.19816
		0.90000  -0.03312  -0.04955  -0.04846  -0.03508  -0.01373   0.01485   0.06003   0.11861   0.17061   0.27107
	    </tableData>

	</table>
    </function>

    <!-- elevator -->
    <function name="aero/CS_elevator_-24">
	<table>
	    <independentVar lookup="row">velocities/mach</independentVar>
	    <independentVar lookup="column">aero/alpha-deg</independentVar>
	    <independentVar lookup="table">aero/beta-deg</independentVar>
	    <tableData breakPoint="-10.00000">
                -10.00     -5.00      0.00      5.00     10.00     15.00     20.00     25.00     30.00     40.00
		0.20000  -0.04317  -0.03909  -0.03134  -0.02778  -0.01821  -0.01382  -0.00635   0.00347   0.00637   0.02583
		0.50000  -0.04603  -0.04108  -0.03328  -0.03117  -0.02079  -0.00910  -0.01135  -0.00062   0.00765   0.02232
		0.90000  -0.05615  -0.04955  -0.03883  -0.03762  -0.03415  -0.02611  -0.01608   0.00590   0.01151   0.02582
	    </tableData>

	    <tableData breakPoint="0.00000">
                -10.00     -5.00      0.00      5.00     10.00     15.00     20.00     25.00     30.00     40.00
		0.20000   0.00000   0.00000   0.00000   0.00000   0.00000   0.00113  -0.00021   0.00019   0.00050  -0.00046
		0.50000   0.00000   0.00000   0.00000   0.00000   0.00048   0.00158   0.00015  -0.00013  -0.00152   0.00101
		0.90000   0.00000   0.00000   0.00000   0.00000   0.00000   0.00000   0.00000   0.00044  -0.00015  -0.00057
	    </tableData>

	    <tableData breakPoint="10.00000">
                -10.00     -5.00      0.00      5.00     10.00     15.00     20.00     25.00     30.00     40.00
		0.20000   0.04315   0.03910   0.03132   0.02723   0.01820   0.01323   0.00646  -0.00373  -0.00695  -0.02552
		0.50000   0.04605   0.04111   0.03327   0.03109   0.02073   0.00965   0.01159   0.00056  -0.00751  -0.02163
		0.90000   0.05660   0.04955   0.03878   0.03772   0.03410   0.02609   0.01623  -0.00647  -0.01184  -0.02603
	    </tableData>

	</table>
    </function>

    <function name="aero/CS_elevator_-9.5">
	<table>
	    <independentVar lookup="row">velocities/mach</independentVar>
	    <independentVar lookup="column">aero/alpha-deg</independentVar>
	    <independentVar lookup="table">aero/beta-deg</independentVar>
	    <tableData breakPoint="-10.00000">
                -10.00     -5.00      0.00      5.00     10.00     15.00     20.00     25.00     30.00     40.00
		0.20000  -0.01696  -0.01077  -0.00718  -0.00364  -0.00058  -0.00064   0.00488   0.00758   0.01019   0.01348
		0.50000  -0.01740  -0.01119  -0.00883  -0.00634   0.00167   0.00229   0.00608   0.00560   0.01087   0.00885
		0.90000  -0.02213  -0.01684  -0.01226  -0.00939  -0.00722  -0.00421   0.00061   0.01016   0.01457   0.01778
	    </tableData>

	    <tableData breakPoint="0.00000">
                -10.00     -5.00      0.00      5.00     10.00     15.00     20.00     25.00     30.00     40.00
		0.20000   0.00000   0.00000   0.00000   0.00000   0.00000   0.00000   0.00000   0.00022   0.00000  -0.00034
		0.50000   0.00000   0.00000   0.00000   0.00000   0.00000   0.00044   0.00010  -0.00018  -0.00113   0.00073
		0.90000   0.00000   0.00000   0.00000   0.00000   0.00000   0.00000   0.00031   0.00052   0.00000   0.00010
	    </tableData>

	    <tableData breakPoint="10.00000">
                -10.00     -5.00      0.00      5.00     10.00     15.00     20.00     25.00     30.00     40.00
		0.20000   0.01695   0.01077   0.00717   0.00363   0.00066   0.00056  -0.00505  -0.00745  -0.01051  -0.01216
		0.50000   0.01740   0.01117   0.00886   0.00631  -0.00170  -0.00206  -0.00578  -0.00552  -0.01066  -0.00951
		0.90000   0.02211   0.01684   0.01227   0.00944   0.00727   0.00405  -0.00075  -0.01070  -0.01474  -0.01846
	    </tableData>

	</table>
    </function>

    <function name="aero/CS_elevator_1.5">
	<table>
	    <independentVar lookup="row">velocities/mach</independentVar>
	    <independentVar lookup="column">aero/alpha-deg</independentVar>
	    <independentVar lookup="table">aero/beta-deg</independentVar>
	    <tableData breakPoint="-10.00000">
                -10.00     -5.00      0.00      5.00     10.00     15.00     20.00     25.00     30.00     40.00
		0.20000  -0.00089  -0.00069  -0.00100  -0.00156  -0.00296  -0.00208  -0.00117  -0.00087  -0.00140   0.00026
		0.50000  -0.00124  -0.00076  -0.00093  -0.00149  -0.00159  -0.00119  -0.00111  -0.00179  -0.00115   0.00000
		0.90000  -0.00071  -0.00081  -0.00106  -0.00130  -0.00387  -0.00252  -0.00115  -0.00108  -0.00187  -0.00309
	    </tableData>

	    <tableData breakPoint="0.00000">
                -10.00     -5.00      0.00      5.00     10.00     15.00     20.00     25.00     30.00     40.00
		0.20000   0.00000   0.00000   0.00000   0.00000   0.00000   0.00000  -0.00032   0.00018  -0.00090   0.00026
		0.50000   0.00000   0.00000   0.00000   0.00000   0.00000   0.00044   0.00000   0.00000  -0.00051   0.00068
		0.90000   0.00000   0.00000   0.00000   0.00000   0.00000   0.00000   0.00000   0.00027   0.00000   0.00051
	    </tableData>

	    <tableData breakPoint="10.00000">
                -10.00     -5.00      0.00      5.00     10.00     15.00     20.00     25.00     30.00     40.00
		0.20000   0.00086   0.00069   0.00101   0.00157   0.00296   0.00185   0.00137   0.00087   0.00095   0.00105
		0.50000   0.00120   0.00076   0.00093   0.00148   0.00230   0.00175   0.00123   0.00174   0.00132   0.00068
		0.90000   0.00102   0.00081   0.00106   0.00142   0.00387   0.00210   0.00123   0.00055   0.00191   0.00080
	    </tableData>

	</table>
    </function>

    <function name="aero/CS_elevator">
	<interpolate1d>
	    <property>fcs/surfaces/elevator-pos-deg</property>
	    <value>-24</value> <property>aero/CS_elevator_-24</property>
	    <value>-9.5</value> <property>aero/CS_elevator_-9.5</property>
	    <value>0</value> <value>0</value>
	    <value>1.5</value> <property>aero/CS_elevator_1.5</property>
	</interpolate1d>
    </function>

    <!-- flap -->
    <function name="aero/CS_flap_30">
	<table>
	    <independentVar lookup="row">velocities/mach</independentVar>
	    <independentVar lookup="column">aero/alpha-deg</independentVar>
	    <independentVar lookup="table">aero/beta-deg</independentVar>
	    <tableData breakPoint="-10.00000">
                -10.00     -5.00      0.00      5.00     10.00     15.00     20.00     25.00     30.00     40.00
		0.20000  -0.00514  -0.01975  -0.03375  -0.04207  -0.03364  -0.03895  -0.03771  -0.04075  -0.04892  -0.05015
		0.50000  -0.00665  -0.02200  -0.03632  -0.03785  -0.04385  -0.04095  -0.05073  -0.04612  -0.04649  -0.05130
		0.90000  -0.00858  -0.02644  -0.04640  -0.06504  -0.06273  -0.06204  -0.07478  -0.07684  -0.07498  -0.06921
	    </tableData>

	    <tableData breakPoint="0.00000">
                -10.00     -5.00      0.00      5.00     10.00     15.00     20.00     25.00     30.00     40.00
		0.20000   0.00000   0.00000   0.00000   0.00012  -0.00069   0.00018  -0.00061  -0.00082   0.00035  -0.00057
		0.50000   0.00000   0.00000   0.00000   0.00000   0.00110   0.00059  -0.00039  -0.00023  -0.00077   0.00051
		0.90000   0.00000   0.00000   0.00013   0.00000   0.00000   0.00076   0.00014   0.00000  -0.00082  -0.00030
	    </tableData>

	    <tableData breakPoint="10.00000">
                -10.00     -5.00      0.00      5.00     10.00     15.00     20.00     25.00     30.00     40.00
		0.20000   0.00512   0.01975   0.03395   0.04209   0.03440   0.03891   0.03785   0.04236   0.04895   0.04841
		0.50000   0.00667   0.02200   0.03648   0.03797   0.04336   0.04263   0.05125   0.04703   0.04825   0.05368
		0.90000   0.00853   0.02648   0.04644   0.06504   0.06279   0.06213   0.07444   0.07533   0.07382   0.06860
	    </tableData>

	</table>
    </function>

    <function name="aero/CS_flap_40">
	<table>
	    <independentVar lookup="row">velocities/mach</independentVar>
	    <independentVar lookup="column">aero/alpha-deg</independentVar>
	    <independentVar lookup="table">aero/beta-deg</independentVar>
	    <tableData breakPoint="-10.00000">
                -10.00     -5.00      0.00      5.00     10.00     15.00     20.00     25.00     30.00     40.00
		0.20000  -0.00925  -0.02752  -0.04181  -0.05104  -0.03709  -0.04799  -0.04303  -0.04969  -0.05798  -0.05524
		0.50000  -0.01138  -0.02822  -0.04598  -0.04482  -0.05157  -0.05337  -0.05551  -0.05286  -0.05268  -0.05398
		0.90000  -0.01548  -0.03683  -0.05809  -0.07956  -0.07295  -0.07802  -0.09256  -0.08745  -0.08674  -0.07725
	    </tableData>

	    <tableData breakPoint="0.00000">
                -10.00     -5.00      0.00      5.00     10.00     15.00     20.00     25.00     30.00     40.00
		0.20000   0.00000   0.00000  -0.00014   0.00000  -0.00027   0.00000  -0.00042  -0.00159   0.00024  -0.00038
		0.50000   0.00000   0.00000   0.00000   0.00000  -0.00093   0.00137   0.00037  -0.00121  -0.00325   0.00092
		0.90000   0.00000   0.00000   0.00000   0.00000   0.00000   0.00061   0.00052  -0.00023  -0.00337  -0.00067
	    </tableData>

	    <tableData breakPoint="10.00000">
                -10.00     -5.00      0.00      5.00     10.00     15.00     20.00     25.00     30.00     40.00
		0.20000   0.00921   0.02754   0.04260   0.05105   0.03707   0.04784   0.04383   0.04947   0.05797   0.05390
		0.50000   0.01138   0.02825   0.04690   0.04426   0.05128   0.05359   0.05621   0.05412   0.05323   0.05853
		0.90000   0.01548   0.03659   0.05796   0.07943   0.07323   0.07928   0.09210   0.08657   0.08684   0.07679
	    </tableData>

	</table>
    </function>

    <function name="aero/CS_flap">
	<interpolate1d>
	    <property>fcs/surfaces/flap-pos-deg</property>
	    <value>0</value> <value>0</value>
	    <value>30</value> <property>aero/CS_flap_30</property>
	    <value>40</value> <property>aero/CS_flap_40</property>
	</interpolate1d>
    </function>

    <!-- left-flaperon -->
    <function name="aero/CS_left-flaperon_-51">
	<table>
	    <independentVar lookup="row">velocities/mach</independentVar>
	    <independentVar lookup="column">aero/alpha-deg</independentVar>
	    <independentVar lookup="table">aero/beta-deg</independentVar>
	    <tableData breakPoint="-10.00000">
                -10.00     -5.00      0.00      5.00     10.00     15.00     20.00     25.00     30.00     40.00
		0.20000   0.01021   0.01686   0.02561   0.02244   0.01939   0.00677   0.00621   0.00769   0.01743   0.03501
		0.50000   0.01118   0.01422   0.02583   0.02405   0.02084   0.01322   0.00597   0.01001   0.02921   0.03686
		0.90000   0.00620   0.00963   0.02351   0.02611   0.02951   0.02864   0.03372   0.04539   0.05227   0.06078
	    </tableData>

	    <tableData breakPoint="0.00000">
                -10.00     -5.00      0.00      5.00     10.00     15.00     20.00     25.00     30.00     40.00
		0.20000   0.01757   0.02107   0.02105   0.01710   0.00698  -0.00177  -0.00331  -0.00227  -0.00169   0.00631
		0.50000   0.01910   0.02262   0.02221   0.01833   0.00908  -0.00085  -0.00420  -0.00567  -0.00471   0.00872
		0.90000   0.02626   0.02680   0.02697   0.02321   0.01722   0.01108   0.00987   0.00919   0.01186   0.01745
	    </tableData>

	    <tableData breakPoint="10.00000">
                -10.00     -5.00      0.00      5.00     10.00     15.00     20.00     25.00     30.00     40.00
		0.20000   0.03142   0.02962   0.02506   0.01447   0.00273  -0.00812  -0.02418  -0.03369  -0.02591  -0.02637
		0.50000   0.03365   0.03273   0.02728   0.01612   0.00268  -0.01151  -0.01654  -0.03262  -0.02784  -0.02203
		0.90000   0.04904   0.04590   0.03677   0.02575   0.01386   0.00224  -0.01318  -0.03058  -0.02902  -0.02834
	    </tableData>

	</table>
    </function>

    <function name="aero/CS_left-flaperon">
	<interpolate1d>
	    <property>fcs/surfaces/left-flaperon-pos-deg</property>
	    <value>-51</value> <property>aero/CS_left-flaperon_-51</property>
	    <value>0</value> <value>0</value>
	</interpolate1d>
    </function>

    <!-- right-flaperon -->
    <function name="aero/CS_right-flaperon_-51">
	<table>
	    <independentVar lookup="row">velocities/mach</independentVar>
	    <independentVar lookup="column">aero/alpha-deg</independentVar>
	    <independentVar lookup="table">aero/beta-deg</independentVar>
	    <tableData breakPoint="-10.00000">
                -10.00     -5.00      0.00      5.00     10.00     15.00     20.00     25.00     30.00     40.00
		0.20000  -0.02774  -0.02562  -0.02038  -0.01170  -0.00062   0.00796   0.02262   0.03108   0.02608   0.02760
		0.50000  -0.02904  -0.02793  -0.02236  -0.01247  -0.00037   0.01167   0.01602   0.02739   0.02802   0.02222
		0.90000  -0.04331  -0.03990  -0.03096  -0.02130  -0.01058   0.00014   0.01401   0.02868   0.02405   0.02604
	    </tableData>

	    <tableData breakPoint="0.00000">
                -10.00     -5.00      0.00      5.00     10.00     15.00     20.00     25.00     30.00     40.00
		0.20000  -0.01592  -0.01794  -0.01797  -0.01626  -0.00588   0.00234   0.00354   0.00254   0.00496  -0.00591
		0.50000  -0.01710  -0.01950  -0.01912  -0.01709  -0.00764   0.00170   0.00359   0.00571   0.00429  -0.00388
		0.90000  -0.02396  -0.02414  -0.02358  -0.01998  -0.01372  -0.00836  -0.00730  -0.00604  -0.00573  -0.01209
	    </tableData>

	    <tableData breakPoint="10.00000">
                -10.00     -5.00      0.00      5.00     10.00     15.00     20.00     25.00     30.00     40.00
		0.20000  -0.01096  -0.01511  -0.02212  -0.01999  -0.01616  -0.00602  -0.00403  -0.00405  -0.01225  -0.02431
		0.50000  -0.01146  -0.01331  -0.02190  -0.02166  -0.02033  -0.01071  -0.00435  -0.00700  -0.02155  -0.02776
		0.90000  -0.00730  -0.01271  -0.02310  -0.02465  -0.02592  -0.02469  -0.02817  -0.03805  -0.04255  -0.04759
	    </tableData>

	</table>
    </function>

    <function name="aero/CS_right-flaperon">
	<interpolate1d>
	    <property>fcs/surfaces/right-flaperon-pos-deg</property>
	    <value>-51</value> <property>aero/CS_right-flaperon_-51</property>
	    <value>0</value> <value>0</value>
	</interpolate1d>
    </function>

    <!-- rudder -->
    <function name="aero/CS_rudder_-35">
	<table>
	    <independentVar lookup="row">velocities/mach</independentVar>
	    <independentVar lookup="column">aero/alpha-deg</independentVar>
	    <independentVar lookup="table">aero/beta-deg</independentVar>
	    <tableData breakPoint="-10.00000">
                -10.00     -5.00      0.00      5.00     10.00     15.00     20.00     25.00     30.00     40.00
		0.20000  -0.07321  -0.07302  -0.07234  -0.06886  -0.07163  -0.06371  -0.05927  -0.05402  -0.05159  -0.03846
		0.50000  -0.07628  -0.07628  -0.07670  -0.07349  -0.06922  -0.06475  -0.06621  -0.05700  -0.05047  -0.04551
		0.90000  -0.08511  -0.08878  -0.08882  -0.08866  -0.08374  -0.08302  -0.07729  -0.07080  -0.06505  -0.05673
	    </tableData>

	    <tableData breakPoint="0.00000">
                -10.00     -5.00      0.00      5.00     10.00     15.00     20.00     25.00     30.00     40.00
		0.20000  -0.06740  -0.06970  -0.06653  -0.06921  -0.05887  -0.05729  -0.04529  -0.04750  -0.04371  -0.03769
		0.50000  -0.06960  -0.07158  -0.06996  -0.06974  -0.06265  -0.06227  -0.04820  -0.04830  -0.04966  -0.04112
		0.90000  -0.08072  -0.08308  -0.08451  -0.08460  -0.07395  -0.06989  -0.06805  -0.06159  -0.06296  -0.05188
	    </tableData>

	    <tableData breakPoint="10.00000">
                -10.00     -5.00      0.00      5.00     10.00     15.00     20.00     25.00     30.00     40.00
		0.20000  -0.06883  -0.06972  -0.06515  -0.06513  -0.06165  -0.05706  -0.07887  -0.04721  -0.04510  -0.03146
		0.50000  -0.07069  -0.07258  -0.06886  -0.06670  -0.06723  -0.06097  -0.05803  -0.04575  -0.04765  -0.03623
		0.90000  -0.07565  -0.07789  -0.07620  -0.07690  -0.07249  -0.06884  -0.06037  -0.06150  -0.05407  -0.04518
	    </tableData>

	</table>
    </function>

    <function name="aero/CS_rudder_4">
	<table>
	    <independentVar lookup="row">velocities/mach</independentVar>
	    <independentVar lookup="column">aero/alpha-deg</independentVar>
	    <independentVar lookup="table">aero/beta-deg</independentVar>
	    <tableData breakPoint="-10.00000">
                -10.00     -5.00      0.00      5.00     10.00     15.00     20.00     25.00     30.00     40.00
		0.20000   0.01057   0.01033   0.00989   0.00984   0.00960   0.00779   0.00870   0.00648   0.00652   0.00497
		0.50000   0.01056   0.01076   0.01046   0.01024   0.01096   0.00918   0.01019   0.00605   0.00678   0.00568
		0.90000   0.01162   0.01193   0.01176   0.01189   0.01127   0.01069   0.00957   0.00774   0.00846   0.00688
	    </tableData>

	    <tableData breakPoint="0.00000">
                -10.00     -5.00      0.00      5.00     10.00     15.00     20.00     25.00     30.00     40.00
		0.20000   0.01004   0.00981   0.00972   0.01029   0.00736   0.01009   0.00536   0.00792   0.00605   0.00578
		0.50000   0.01051   0.01012   0.01019   0.01002   0.00636   0.01127   0.00791   0.00774   0.00628   0.00544
		0.90000   0.01172   0.01210   0.01216   0.01236   0.01155   0.01125   0.00875   0.00967   0.00939   0.00656
	    </tableData>

	    <tableData breakPoint="10.00000">
                -10.00     -5.00      0.00      5.00     10.00     15.00     20.00     25.00     30.00     40.00
		0.20000   0.01072   0.01040   0.01014   0.00957   0.00868   0.00820   0.00921   0.00763   0.00686   0.00565
		0.50000   0.01058   0.01090   0.01059   0.01024   0.01290   0.00966   0.00961   0.00632   0.00719   0.00733
		0.90000   0.01186   0.01218   0.01202   0.01200   0.01140   0.01133   0.01082   0.00807   0.00849   0.00664
	    </tableData>

	</table>
    </function>

    <function name="aero/CS_rudder_-4">
	<table>
	    <independentVar lookup="row">velocities/mach</independentVar>
	    <independentVar lookup="column">aero/alpha-deg</independentVar>
	    <independentVar lookup="table">aero/beta-deg</independentVar>
	    <tableData breakPoint="-10.00000">
                -10.00     -5.00      0.00      5.00     10.00     15.00     20.00     25.00     30.00     40.00
		0.20000  -0.01075  -0.01039  -0.01013  -0.00955  -0.00865  -0.00830  -0.00913  -0.00754  -0.00690  -0.00556
		0.50000  -0.01059  -0.01090  -0.01065  -0.01027  -0.01287  -0.00931  -0.00955  -0.00612  -0.00693  -0.00494
		0.90000  -0.01185  -0.01217  -0.01202  -0.01200  -0.01136  -0.01136  -0.01075  -0.00885  -0.00888  -0.00737
	    </tableData>

	    <tableData breakPoint="0.00000">
                -10.00     -5.00      0.00      5.00     10.00     15.00     20.00     25.00     30.00     40.00
		0.20000  -0.01003  -0.00981  -0.00972  -0.01028  -0.00733  -0.01123  -0.00557  -0.00664  -0.00568  -0.00588
		0.50000  -0.01051  -0.01012  -0.01019  -0.01002  -0.00635  -0.01027  -0.00777  -0.00766  -0.00719  -0.00557
		0.90000  -0.01173  -0.01210  -0.01216  -0.01237  -0.01157  -0.01112  -0.00903  -0.00912  -0.00946  -0.00683
	    </tableData>

	    <tableData breakPoint="10.00000">
                -10.00     -5.00      0.00      5.00     10.00     15.00     20.00     25.00     30.00     40.00
		0.20000  -0.01056  -0.01034  -0.00989  -0.00984  -0.00955  -0.00804  -0.00876  -0.00662  -0.00665  -0.00435
		0.50000  -0.01061  -0.01076  -0.01046  -0.01027  -0.01103  -0.00887  -0.01004  -0.00627  -0.00647  -0.00522
		0.90000  -0.01162  -0.01193  -0.01176  -0.01188  -0.01127  -0.01065  -0.00973  -0.00840  -0.00855  -0.00599
	    </tableData>

	</table>
    </function>

    <function name="aero/CS_rudder_35">
	<table>
	    <independentVar lookup="row">velocities/mach</independentVar>
	    <independentVar lookup="column">aero/alpha-deg</independentVar>
	    <independentVar lookup="table">aero/beta-deg</independentVar>
	    <tableData breakPoint="-10.00000">
                -10.00     -5.00      0.00      5.00     10.00     15.00     20.00     25.00     30.00     40.00
		0.20000   0.06879   0.06969   0.06509   0.06510   0.06166   0.05696   0.07945   0.04726   0.04475   0.03205
		0.50000   0.07069   0.07256   0.06890   0.06668   0.06727   0.06047   0.05781   0.04613   0.04741   0.03627
		0.90000   0.07563   0.07790   0.07623   0.07674   0.07252   0.06886   0.06023   0.05981   0.05413   0.04448
	    </tableData>

	    <tableData breakPoint="0.00000">
                -10.00     -5.00      0.00      5.00     10.00     15.00     20.00     25.00     30.00     40.00
		0.20000   0.06740   0.06970   0.06653   0.06914   0.05931   0.05728   0.04512   0.04725   0.04423   0.03714
		0.50000   0.06960   0.07156   0.06999   0.06975   0.06260   0.06301   0.04847   0.04846   0.04742   0.04294
		0.90000   0.08065   0.08310   0.08447   0.08458   0.07405   0.07004   0.06766   0.06189   0.06270   0.05130
	    </tableData>

	    <tableData breakPoint="10.00000">
                -10.00     -5.00      0.00      5.00     10.00     15.00     20.00     25.00     30.00     40.00
		0.20000   0.07317   0.07302   0.07228   0.06881   0.07168   0.06382   0.05914   0.05649   0.05108   0.03875
		0.50000   0.07630   0.07627   0.07661   0.07347   0.06922   0.06524   0.06618   0.05698   0.05077   0.04559
		0.90000   0.08511   0.08878   0.08883   0.08869   0.08380   0.08293   0.07731   0.06985   0.06460   0.05573
	    </tableData>

	</table>
    </function>

    <function name="aero/CS_rudder">
	<interpolate1d>
	    <property>fcs/surfaces/rudder-pos-deg</property>
	    <value>-35</value> <property>aero/CS_rudder_-35</property>
	    <value>-4</value> <property>aero/CS_rudder_-4</property>
	    <value>0</value> <value>0</value>
	    <value>4</value> <property>aero/CS_rudder_4</property>
	    <value>35</value> <property>aero/CS_rudder_35</property>
	</interpolate1d>
    </function>

    <!-- slats -->
    <function name="aero/CS_slats_27.5">
	<table>
	    <independentVar lookup="row">velocities/mach</independentVar>
	    <independentVar lookup="column">aero/alpha-deg</independentVar>
	    <independentVar lookup="table">aero/beta-deg</independentVar>
	    <tableData breakPoint="-10.00000">
                -10.00     -5.00      0.00      5.00     10.00     15.00     20.00     25.00     30.00     40.00
		0.20000  -0.01065  -0.00426   0.00209   0.00955   0.01654   0.02329   0.02886   0.03368   0.03644   0.03554
		0.50000  -0.01118  -0.00466   0.00219   0.00977   0.01728   0.02548   0.03083   0.03372   0.03791   0.03833
		0.90000  -0.01566  -0.00701   0.00224   0.01179   0.02021   0.02922   0.03666   0.04254   0.04664   0.04595
	    </tableData>

	    <tableData breakPoint="0.00000">
                -10.00     -5.00      0.00      5.00     10.00     15.00     20.00     25.00     30.00     40.00
		0.20000   0.00000   0.00000   0.00000   0.00000   0.00000   0.00000  -0.00055   0.00044   0.00012  -0.00032
		0.50000   0.00000   0.00000   0.00000   0.00000   0.00000   0.00057  -0.00011  -0.00027  -0.00053   0.00032
		0.90000   0.00000   0.00000   0.00000   0.00000   0.00000   0.00010   0.00000   0.00057   0.00000  -0.00057
	    </tableData>

	    <tableData breakPoint="10.00000">
                -10.00     -5.00      0.00      5.00     10.00     15.00     20.00     25.00     30.00     40.00
		0.20000   0.01062   0.00426  -0.00207  -0.00954  -0.01650  -0.02327  -0.02880  -0.03380  -0.03640  -0.03663
		0.50000   0.01115   0.00466  -0.00220  -0.00977  -0.01729  -0.02485  -0.03058  -0.03391  -0.03762  -0.03848
		0.90000   0.01580   0.00701  -0.00223  -0.01183  -0.02021  -0.02971  -0.03696  -0.04331  -0.04678  -0.04568
	    </tableData>

	</table>
    </function>

    <function name="aero/CS_slats">
	<interpolate1d>
	    <property>fcs/surfaces/slats-pos-deg</property>
	    <value>0</value> <value>0</value>
	    <value>27.5</value> <property>aero/CS_slats_27.5</property>
	</interpolate1d>
    </function>

    <!-- speedbrake -->
    <function name="aero/CS_speedbrake_60">
	<table>
	    <independentVar lookup="row">velocities/mach</independentVar>
	    <independentVar lookup="column">aero/alpha-deg</independentVar>
	    <independentVar lookup="table">aero/beta-deg</independentVar>
	    <tableData breakPoint="-10.00000">
                -10.00     -5.00      0.00      5.00     10.00     15.00     20.00     25.00     30.00     40.00
		0.20000  -0.01190  -0.00753  -0.00341  -0.00073   0.00644   0.00861   0.01408   0.02081   0.02136   0.02270
		0.50000  -0.01400  -0.00838  -0.00414  -0.00070   0.00622   0.01193   0.01574   0.01822   0.02654   0.01875
		0.90000  -0.01469  -0.00958  -0.00292   0.00000   0.00169   0.00552   0.01494   0.02115   0.02170   0.02815
	    </tableData>

	    <tableData breakPoint="0.00000">
                -10.00     -5.00      0.00      5.00     10.00     15.00     20.00     25.00     30.00     40.00
		0.20000   0.00000   0.00000   0.00000  -0.00000   0.00000  -0.00046  -0.00032  -0.00030   0.00000   0.00000
		0.50000   0.00000   0.00000   0.00000  -0.00000   0.00000   0.00044   0.00000   0.00030  -0.00132   0.00118
		0.90000   0.00000   0.00000   0.00000   0.00000  -0.00000   0.00000  -0.00026   0.00048  -0.00011  -0.00057
	    </tableData>

	    <tableData breakPoint="10.00000">
                -10.00     -5.00      0.00      5.00     10.00     15.00     20.00     25.00     30.00     40.00
		0.20000   0.01184   0.00753   0.00341   0.00074  -0.00615  -0.00869  -0.01394  -0.02060  -0.02165  -0.02396
		0.50000   0.01402   0.00836   0.00413   0.00068  -0.00624  -0.01157  -0.01501  -0.01820  -0.02642  -0.01840
		0.90000   0.01474   0.00958   0.00293   0.00000  -0.00159  -0.00557  -0.01500  -0.02208  -0.02206  -0.02864
	    </tableData>

	</table>
    </function>

    <function name="aero/CS_speedbrake">
	<interpolate1d>
	    <property>fcs/surfaces/speedbrake-pos-deg</property>
	    <value>0</value> <value>0</value>
	    <value>60</value> <property>aero/CS_speedbrake_60</property>
	</interpolate1d>
    </function>

    <!-- CMX -->
    <!-- base -->
    <function name="aero/CMx_base">
	<table>
	    <independentVar lookup="row">velocities/mach</independentVar>
	    <independentVar lookup="column">aero/alpha-deg</independentVar>
	    <independentVar lookup="table">aero/beta-deg</independentVar>
	    <tableData breakPoint="-10.00000">
                -10.00     -5.00      0.00      5.00     10.00     15.00     20.00     25.00     30.00     40.00
		0.20000   0.01067   0.00303  -0.00558  -0.01065  -0.01678  -0.02258  -0.02904  -0.03290  -0.03522  -0.03371
		0.50000   0.01191   0.00347  -0.00613  -0.01182  -0.01838  -0.02448  -0.03044  -0.03460  -0.03752  -0.03637
		0.90000   0.01640   0.00523  -0.00734  -0.01598  -0.02404  -0.03260  -0.03914  -0.04180  -0.04394  -0.04445
	    </tableData>

	    <tableData breakPoint="0.00000">
                -10.00     -5.00      0.00      5.00     10.00     15.00     20.00     25.00     30.00     40.00
		0.20000  -0.00000   0.00000  -0.00000   0.00000   0.00000   0.00000   0.00000   0.00000   0.00000   0.00000
		0.50000  -0.00000  -0.00000  -0.00000   0.00000  -0.00000   0.00000  -0.00000   0.00000   0.00000   0.00000
		0.90000   0.00000   0.00000   0.00000   0.00000  -0.00000  -0.00000   0.00000   0.00000   0.00000   0.00000
	    </tableData>

	    <tableData breakPoint="10.00000">
                -10.00     -5.00      0.00      5.00     10.00     15.00     20.00     25.00     30.00     40.00
		0.20000  -0.01067  -0.00303   0.00558   0.01065   0.01677   0.02258   0.02906   0.03290   0.03519   0.03367
		0.50000  -0.01191  -0.00347   0.00613   0.01182   0.01839   0.02443   0.03046   0.03465   0.03754   0.03646
		0.90000  -0.01640  -0.00523   0.00735   0.01598   0.02404   0.03260   0.03916   0.04182   0.04395   0.04441
	    </tableData>

	</table>
    </function>

    <!-- elevator -->
    <function name="aero/CMx_elevator_-24">
	<table>
	    <independentVar lookup="row">velocities/mach</independentVar>
	    <independentVar lookup="column">aero/alpha-deg</independentVar>
	    <independentVar lookup="table">aero/beta-deg</independentVar>
	    <tableData breakPoint="-10.00000">
                -10.00     -5.00      0.00      5.00     10.00     15.00     20.00     25.00     30.00     40.00
		0.20000   0.00434   0.00432   0.00486   0.00255   0.00207   0.00342   0.00437   0.00411   0.00422   0.00313
		0.50000   0.00457   0.00440   0.00519   0.00233   0.00168   0.00377   0.00447   0.00415   0.00448   0.00380
		0.90000   0.00566   0.00520   0.00722   0.00119   0.00307   0.00497   0.00605   0.00477   0.00518   0.00562
	    </tableData>

	    <tableData breakPoint="0.00000">
                -10.00     -5.00      0.00      5.00     10.00     15.00     20.00     25.00     30.00     40.00
		0.20000   0.00000   0.00000   0.00000   0.00000  -0.00000  -0.00015   0.00000   0.00000   0.00000   0.00000
		0.50000   0.00000   0.00000   0.00000   0.00000   0.00000   0.00000   0.00000   0.00000   0.00000   0.00000
		0.90000   0.00000   0.00000  -0.00000   0.00000   0.00000   0.00000   0.00000   0.00000   0.00000   0.00000
	    </tableData>

	    <tableData breakPoint="10.00000">
                -10.00     -5.00      0.00      5.00     10.00     15.00     20.00     25.00     30.00     40.00
		0.20000  -0.00436  -0.00432  -0.00487  -0.00262  -0.00206  -0.00343  -0.00436  -0.00410  -0.00417  -0.00319
		0.50000  -0.00457  -0.00440  -0.00519  -0.00233  -0.00169  -0.00374  -0.00447  -0.00418  -0.00450  -0.00376
		0.90000  -0.00566  -0.00520  -0.00723  -0.00123  -0.00307  -0.00496  -0.00603  -0.00484  -0.00516  -0.00557
	    </tableData>

	</table>
    </function>

    <function name="aero/CMx_elevator_-9.5">
	<table>
	    <independentVar lookup="row">velocities/mach</independentVar>
	    <independentVar lookup="column">aero/alpha-deg</independentVar>
	    <independentVar lookup="table">aero/beta-deg</independentVar>
	    <tableData breakPoint="-10.00000">
                -10.00     -5.00      0.00      5.00     10.00     15.00     20.00     25.00     30.00     40.00
		0.20000   0.00243   0.00214   0.00263   0.00045   0.00200   0.00195   0.00188   0.00203   0.00200   0.00120
		0.50000   0.00255   0.00218   0.00283  -0.00019   0.00194   0.00233   0.00197   0.00205   0.00225   0.00169
		0.90000   0.00308   0.00289   0.00345   0.00177   0.00240   0.00324   0.00257   0.00259   0.00297   0.00198
	    </tableData>

	    <tableData breakPoint="0.00000">
                -10.00     -5.00      0.00      5.00     10.00     15.00     20.00     25.00     30.00     40.00
		0.20000   0.00000   0.00000   0.00000   0.00000   0.00000   0.00000   0.00000   0.00000   0.00000   0.00000
		0.50000   0.00000   0.00000   0.00000   0.00000   0.00000   0.00000   0.00000   0.00000  -0.00000   0.00000
		0.90000  -0.00000  -0.00000   0.00000   0.00000   0.00000   0.00000   0.00000   0.00000   0.00000   0.00000
	    </tableData>

	    <tableData breakPoint="10.00000">
                -10.00     -5.00      0.00      5.00     10.00     15.00     20.00     25.00     30.00     40.00
		0.20000  -0.00243  -0.00214  -0.00263  -0.00044  -0.00198  -0.00195  -0.00187  -0.00204  -0.00197  -0.00124
		0.50000  -0.00255  -0.00218  -0.00283   0.00020  -0.00194  -0.00227  -0.00197  -0.00208  -0.00224  -0.00170
		0.90000  -0.00308  -0.00289  -0.00346  -0.00177  -0.00239  -0.00325  -0.00256  -0.00259  -0.00300  -0.00196
	    </tableData>

	</table>
    </function>

    <function name="aero/CMx_elevator_1.5">
	<table>
	    <independentVar lookup="row">velocities/mach</independentVar>
	    <independentVar lookup="column">aero/alpha-deg</independentVar>
	    <independentVar lookup="table">aero/beta-deg</independentVar>
	    <tableData breakPoint="-10.00000">
                -10.00     -5.00      0.00      5.00     10.00     15.00     20.00     25.00     30.00     40.00
		0.20000  -0.00018  -0.00025   0.00000  -0.00023  -0.00020  -0.00027  -0.00037   0.00000  -0.00029  -0.00011
		0.50000  -0.00014  -0.00025  -0.00013  -0.00025  -0.00031   0.00000  -0.00025  -0.00015  -0.00015   0.00029
		0.90000  -0.00024  -0.00031  -0.00028  -0.00032  -0.00039  -0.00018  -0.00065  -0.00025  -0.00011  -0.00025
	    </tableData>

	    <tableData breakPoint="0.00000">
                -10.00     -5.00      0.00      5.00     10.00     15.00     20.00     25.00     30.00     40.00
		0.20000   0.00000   0.00000   0.00000   0.00000   0.00000   0.00000   0.00000   0.00000   0.00000   0.00000
		0.50000   0.00000   0.00000   0.00000  -0.00000   0.00000   0.00000   0.00000   0.00000   0.00000   0.00000
		0.90000  -0.00000   0.00000  -0.00000   0.00000   0.00000   0.00000   0.00000   0.00000   0.00000   0.00000
	    </tableData>

	    <tableData breakPoint="10.00000">
                -10.00     -5.00      0.00      5.00     10.00     15.00     20.00     25.00     30.00     40.00
		0.20000   0.00018   0.00025   0.00010   0.00023   0.00022   0.00027   0.00037   0.00000   0.00033   0.00014
		0.50000   0.00014   0.00025   0.00013   0.00025   0.00027   0.00000   0.00029   0.00011   0.00015  -0.00021
		0.90000   0.00024   0.00031   0.00027   0.00032   0.00038   0.00026   0.00062   0.00021   0.00014   0.00018
	    </tableData>

	</table>
    </function>

    <function name="aero/CMx_elevator">
	<interpolate1d>
	    <property>fcs/surfaces/elevator-pos-deg</property>
	    <value>-24</value> <property>aero/CMx_elevator_-24</property>
	    <value>-9.5</value> <property>aero/CMx_elevator_-9.5</property>
	    <value>0</value> <value>0</value>
	    <value>1.5</value> <property>aero/CMx_elevator_1.5</property>
	</interpolate1d>
    </function>

    <!-- flap -->
    <function name="aero/CMx_flap_30">
	<table>
	    <independentVar lookup="row">velocities/mach</independentVar>
	    <independentVar lookup="column">aero/alpha-deg</independentVar>
	    <independentVar lookup="table">aero/beta-deg</independentVar>
	    <tableData breakPoint="-10.00000">
                -10.00     -5.00      0.00      5.00     10.00     15.00     20.00     25.00     30.00     40.00
		0.20000  -0.01539  -0.01496  -0.00915  -0.00651  -0.00601  -0.00645  -0.00700  -0.00719  -0.00657  -0.00461
		0.50000  -0.01739  -0.01681  -0.01087  -0.00737  -0.00660  -0.00711  -0.00727  -0.00776  -0.00730  -0.00457
		0.90000  -0.01954  -0.01828  -0.01435  -0.01067  -0.01002  -0.00825  -0.00761  -0.00730  -0.00733  -0.00747
	    </tableData>

	    <tableData breakPoint="0.00000">
                -10.00     -5.00      0.00      5.00     10.00     15.00     20.00     25.00     30.00     40.00
		0.20000   0.00000  -0.00000   0.00000   0.00000   0.00000   0.00000   0.00000   0.00000   0.00000   0.00000
		0.50000   0.00000   0.00000   0.00000   0.00000   0.00000   0.00000   0.00000  -0.00000   0.00000   0.00000
		0.90000   0.00000   0.00000   0.00000  -0.00000   0.00000   0.00000   0.00000   0.00000   0.00000  -0.00017
	    </tableData>

	    <tableData breakPoint="10.00000">
                -10.00     -5.00      0.00      5.00     10.00     15.00     20.00     25.00     30.00     40.00
		0.20000   0.01539   0.01495   0.00914   0.00651   0.00598   0.00645   0.00697   0.00734   0.00667   0.00479
		0.50000   0.01739   0.01681   0.01088   0.00740   0.00657   0.00726   0.00710   0.00767   0.00732   0.00461
		0.90000   0.01953   0.01828   0.01434   0.01060   0.01001   0.00825   0.00771   0.00724   0.00737   0.00733
	    </tableData>

	</table>
    </function>

    <function name="aero/CMx_flap_40">
	<table>
	    <independentVar lookup="row">velocities/mach</independentVar>
	    <independentVar lookup="column">aero/alpha-deg</independentVar>
	    <independentVar lookup="table">aero/beta-deg</independentVar>
	    <tableData breakPoint="-10.00000">
                -10.00     -5.00      0.00      5.00     10.00     15.00     20.00     25.00     30.00     40.00
		0.20000  -0.01813  -0.01727  -0.01038  -0.00730  -0.00711  -0.00766  -0.00786  -0.00830  -0.00746  -0.00520
		0.50000  -0.02030  -0.01958  -0.01242  -0.00844  -0.00796  -0.00764  -0.00801  -0.00870  -0.00837  -0.00529
		0.90000  -0.02297  -0.02063  -0.01633  -0.01238  -0.01133  -0.00945  -0.00842  -0.00822  -0.00834  -0.00812
	    </tableData>

	    <tableData breakPoint="0.00000">
                -10.00     -5.00      0.00      5.00     10.00     15.00     20.00     25.00     30.00     40.00
		0.20000   0.00000  -0.00000   0.00000   0.00000   0.00000   0.00000   0.00000   0.00000   0.00022   0.00000
		0.50000   0.00000   0.00000   0.00000   0.00000   0.00000   0.00000   0.00000   0.00000   0.00019  -0.00011
		0.90000   0.00000   0.00000   0.00000   0.00000   0.00000   0.00000  -0.00017   0.00000   0.00016  -0.00015
	    </tableData>

	    <tableData breakPoint="10.00000">
                -10.00     -5.00      0.00      5.00     10.00     15.00     20.00     25.00     30.00     40.00
		0.20000   0.01815   0.01728   0.01014   0.00729   0.00703   0.00764   0.00783   0.00831   0.00754   0.00531
		0.50000   0.02031   0.01959   0.01241   0.00845   0.00789   0.00768   0.00790   0.00871   0.00840   0.00548
		0.90000   0.02296   0.02064   0.01628   0.01233   0.01138   0.00947   0.00829   0.00822   0.00823   0.00815
	    </tableData>

	</table>
    </function>

    <function name="aero/CMx_flap">
	<interpolate1d>
	    <property>fcs/surfaces/flap-pos-deg</property>
	    <value>0</value> <value>0</value>
	    <value>30</value> <property>aero/CMx_flap_30</property>
	    <value>40</value> <property>aero/CMx_flap_40</property>
	</interpolate1d>
    </function>

    <!-- left-flaperon -->
    <function name="aero/CMx_left-flaperon_-51">
	<table>
	    <independentVar lookup="row">velocities/mach</independentVar>
	    <independentVar lookup="column">aero/alpha-deg</independentVar>
	    <independentVar lookup="table">aero/beta-deg</independentVar>
	    <tableData breakPoint="-10.00000">
                -10.00     -5.00      0.00      5.00     10.00     15.00     20.00     25.00     30.00     40.00
		0.20000   0.08173   0.08553   0.08778   0.08862   0.08848   0.08751   0.08570   0.08186   0.07644   0.06323
		0.50000   0.08818   0.09199   0.09501   0.09571   0.09551   0.09403   0.09145   0.08700   0.08128   0.06767
		0.90000   0.12116   0.12494   0.13434   0.13288   0.13390   0.13211   0.12698   0.12006   0.11007   0.08922
	    </tableData>

	    <tableData breakPoint="0.00000">
                -10.00     -5.00      0.00      5.00     10.00     15.00     20.00     25.00     30.00     40.00
		0.20000   0.07792   0.08048   0.08214   0.08395   0.08464   0.08399   0.08127   0.07702   0.07162   0.06062
		0.50000   0.08341   0.08606   0.08815   0.09008   0.09085   0.08996   0.08698   0.08231   0.07635   0.06352
		0.90000   0.11637   0.12057   0.12411   0.12686   0.12824   0.12679   0.12199   0.11532   0.10584   0.08470
	    </tableData>

	    <tableData breakPoint="10.00000">
                -10.00     -5.00      0.00      5.00     10.00     15.00     20.00     25.00     30.00     40.00
		0.20000   0.07135   0.07221   0.07351   0.07681   0.07785   0.07735   0.07543   0.07108   0.06567   0.05536
		0.50000   0.07604   0.07687   0.07827   0.08193   0.08308   0.08235   0.08054   0.07593   0.06927   0.05782
		0.90000   0.10578   0.10925   0.11207   0.11575   0.11791   0.11637   0.11297   0.10652   0.09820   0.07987
	    </tableData>

	</table>
    </function>

    <function name="aero/CMx_left-flaperon">
	<interpolate1d>
	    <property>fcs/surfaces/left-flaperon-pos-deg</property>
	    <value>-51</value> <property>aero/CMx_left-flaperon_-51</property>
	    <value>0</value> <value>0</value>
	</interpolate1d>
    </function>

    <!-- right-flaperon -->
    <function name="aero/CMx_right-flaperon_-51">
	<table>
	    <independentVar lookup="row">velocities/mach</independentVar>
	    <independentVar lookup="column">aero/alpha-deg</independentVar>
	    <independentVar lookup="table">aero/beta-deg</independentVar>
	    <tableData breakPoint="-10.00000">
                -10.00     -5.00      0.00      5.00     10.00     15.00     20.00     25.00     30.00     40.00
		0.20000  -0.06005  -0.06076  -0.06194  -0.06509  -0.06590  -0.06551  -0.06400  -0.06050  -0.05630  -0.04756
		0.50000  -0.06416  -0.06480  -0.06609  -0.06961  -0.07052  -0.06991  -0.06852  -0.06456  -0.05952  -0.05001
		0.90000  -0.09107  -0.09402  -0.09674  -0.10000  -0.10194  -0.10055  -0.09786  -0.09237  -0.08532  -0.06984
	    </tableData>

	    <tableData breakPoint="0.00000">
                -10.00     -5.00      0.00      5.00     10.00     15.00     20.00     25.00     30.00     40.00
		0.20000  -0.06525  -0.06736  -0.06874  -0.07048  -0.07108  -0.07068  -0.06851  -0.06515  -0.06090  -0.05146
		0.50000  -0.07008  -0.07225  -0.07389  -0.07573  -0.07643  -0.07577  -0.07341  -0.06985  -0.06509  -0.05409
		0.90000  -0.09956  -0.10308  -0.10609  -0.10859  -0.10987  -0.10880  -0.10482  -0.09949  -0.09141  -0.07372
	    </tableData>

	    <tableData breakPoint="10.00000">
                -10.00     -5.00      0.00      5.00     10.00     15.00     20.00     25.00     30.00     40.00
		0.20000  -0.06838  -0.07118  -0.07340  -0.07320  -0.07362  -0.07303  -0.07192  -0.06895  -0.06453  -0.05355
		0.50000  -0.07402  -0.07669  -0.07964  -0.07929  -0.07956  -0.07864  -0.07679  -0.07336  -0.06868  -0.05785
		0.90000  -0.10326  -0.10648  -0.11507  -0.11284  -0.11375  -0.11278  -0.10839  -0.10263  -0.09445  -0.07651
	    </tableData>

	</table>
    </function>

    <function name="aero/CMx_right-flaperon">
	<interpolate1d>
	    <property>fcs/surfaces/right-flaperon-pos-deg</property>
	    <value>-51</value> <property>aero/CMx_right-flaperon_-51</property>
	    <value>0</value> <value>0</value>
	</interpolate1d>
    </function>
    <!-- rudder -->
    <function name="aero/CMx_rudder_-35">
	<table>
	    <independentVar lookup="row">velocities/mach</independentVar>
	    <independentVar lookup="column">aero/alpha-deg</independentVar>
	    <independentVar lookup="table">aero/beta-deg</independentVar>
	    <tableData breakPoint="-10.00000">
                -10.00     -5.00      0.00      5.00     10.00     15.00     20.00     25.00     30.00     40.00
		0.20000   0.00614   0.00553   0.00520   0.00389   0.00329   0.00242   0.00200   0.00139   0.00112   0.00037
		0.50000   0.00636   0.00576   0.00529   0.00427   0.00353   0.00270   0.00230   0.00157   0.00144   0.00094
		0.90000   0.00720   0.00676   0.00523   0.00599   0.00548   0.00511   0.00509   0.00408   0.00356   0.00305
	    </tableData>

	    <tableData breakPoint="0.00000">
                -10.00     -5.00      0.00      5.00     10.00     15.00     20.00     25.00     30.00     40.00
		0.20000   0.00608   0.00563   0.00493   0.00421   0.00276   0.00156   0.00044   0.00039   0.00025   0.00015
		0.50000   0.00623   0.00575   0.00523   0.00438   0.00325   0.00201   0.00107   0.00057   0.00065   0.00054
		0.90000   0.00704   0.00656   0.00702   0.00557   0.00547   0.00439   0.00400   0.00398   0.00333   0.00257
	    </tableData>

	    <tableData breakPoint="10.00000">
                -10.00     -5.00      0.00      5.00     10.00     15.00     20.00     25.00     30.00     40.00
		0.20000   0.00572   0.00522   0.00549   0.00359   0.00287   0.00248   0.00251   0.00135   0.00089   0.00024
		0.50000   0.00580   0.00543   0.00524   0.00398   0.00306   0.00295   0.00195   0.00154   0.00103   0.00056
		0.90000   0.00631   0.00596   0.00529   0.00483   0.00472   0.00417   0.00465   0.00313   0.00284   0.00297
	    </tableData>

	</table>
    </function>

    <function name="aero/CMx_rudder_4">
	<table>
	    <independentVar lookup="row">velocities/mach</independentVar>
	    <independentVar lookup="column">aero/alpha-deg</independentVar>
	    <independentVar lookup="table">aero/beta-deg</independentVar>
	    <tableData breakPoint="-10.00000">
                -10.00     -5.00      0.00      5.00     10.00     15.00     20.00     25.00     30.00     40.00
		0.20000  -0.00091  -0.00078  -0.00083  -0.00053  -0.00054  -0.00024  -0.00029  -0.00011  -0.00014   0.00000
		0.50000  -0.00089  -0.00081  -0.00076  -0.00062  -0.00051  -0.00031  -0.00035  -0.00028  -0.00017  -0.00012
		0.90000  -0.00097  -0.00092  -0.00080  -0.00073  -0.00077  -0.00065  -0.00080  -0.00048  -0.00042  -0.00044
	    </tableData>

	    <tableData breakPoint="0.00000">
                -10.00     -5.00      0.00      5.00     10.00     15.00     20.00     25.00     30.00     40.00
		0.20000  -0.00088  -0.00079  -0.00077  -0.00063  -0.00035  -0.00018   0.00000  -0.00011   0.00000  -0.00026
		0.50000  -0.00090  -0.00081  -0.00078  -0.00065  -0.00038  -0.00021  -0.00019   0.00000   0.00000  -0.00000
		0.90000  -0.00103  -0.00095  -0.00102  -0.00071  -0.00088  -0.00069  -0.00064  -0.00060  -0.00052  -0.00041
	    </tableData>

	    <tableData breakPoint="10.00000">
                -10.00     -5.00      0.00      5.00     10.00     15.00     20.00     25.00     30.00     40.00
		0.20000  -0.00091  -0.00079  -0.00078  -0.00052  -0.00044  -0.00026  -0.00022  -0.00023  -0.00016   0.00000
		0.50000  -0.00089  -0.00079  -0.00078  -0.00058  -0.00048  -0.00030  -0.00031  -0.00022  -0.00019   0.00000
		0.90000  -0.00100  -0.00093  -0.00082  -0.00079  -0.00079  -0.00069  -0.00064  -0.00057  -0.00054  -0.00038
	    </tableData>

	</table>
    </function>

    <function name="aero/CMx_rudder_-4">
	<table>
	    <independentVar lookup="row">velocities/mach</independentVar>
	    <independentVar lookup="column">aero/alpha-deg</independentVar>
	    <independentVar lookup="table">aero/beta-deg</independentVar>
	    <tableData breakPoint="-10.00000">
                -10.00     -5.00      0.00      5.00     10.00     15.00     20.00     25.00     30.00     40.00
		0.20000   0.00091   0.00079   0.00078   0.00053   0.00046   0.00027   0.00023   0.00022   0.00017   0.00000
		0.50000   0.00089   0.00079   0.00078   0.00059   0.00047   0.00036   0.00032   0.00021   0.00016   0.00000
		0.90000   0.00100   0.00093   0.00081   0.00080   0.00079   0.00068   0.00069   0.00046   0.00050   0.00039
	    </tableData>

	    <tableData breakPoint="0.00000">
                -10.00     -5.00      0.00      5.00     10.00     15.00     20.00     25.00     30.00     40.00
		0.20000   0.00088   0.00079   0.00077   0.00063   0.00035   0.00018   0.00011   0.00011   0.00000   0.00000
		0.50000   0.00090   0.00081   0.00078   0.00065   0.00038   0.00022   0.00018   0.00000   0.00000   0.00011
		0.90000   0.00103   0.00095   0.00102   0.00071   0.00087   0.00070   0.00064   0.00062   0.00046   0.00029
	    </tableData>

	    <tableData breakPoint="10.00000">
                -10.00     -5.00      0.00      5.00     10.00     15.00     20.00     25.00     30.00     40.00
		0.20000   0.00091   0.00078   0.00083   0.00053   0.00055   0.00024   0.00028   0.00010   0.00015   0.00000
		0.50000   0.00088   0.00081   0.00076   0.00062   0.00051   0.00038   0.00034   0.00025   0.00015   0.00011
		0.90000   0.00097   0.00092   0.00079   0.00074   0.00077   0.00066   0.00075   0.00041   0.00037   0.00046
	    </tableData>

	</table>
    </function>

    <function name="aero/CMx_rudder_35">
	<table>
	    <independentVar lookup="row">velocities/mach</independentVar>
	    <independentVar lookup="column">aero/alpha-deg</independentVar>
	    <independentVar lookup="table">aero/beta-deg</independentVar>
	    <tableData breakPoint="-10.00000">
                -10.00     -5.00      0.00      5.00     10.00     15.00     20.00     25.00     30.00     40.00
		0.20000  -0.00572  -0.00522  -0.00548  -0.00360  -0.00286  -0.00248  -0.00254  -0.00136  -0.00089  -0.00018
		0.50000  -0.00580  -0.00543  -0.00525  -0.00398  -0.00308  -0.00289  -0.00181  -0.00158  -0.00101  -0.00055
		0.90000  -0.00631  -0.00596  -0.00530  -0.00483  -0.00473  -0.00419  -0.00476  -0.00314  -0.00290  -0.00292
	    </tableData>

	    <tableData breakPoint="0.00000">
                -10.00     -5.00      0.00      5.00     10.00     15.00     20.00     25.00     30.00     40.00
		0.20000  -0.00608  -0.00563  -0.00493  -0.00421  -0.00276  -0.00156  -0.00043  -0.00038  -0.00024  -0.00018
		0.50000  -0.00623  -0.00575  -0.00523  -0.00438  -0.00321  -0.00200  -0.00105  -0.00056  -0.00073  -0.00049
		0.90000  -0.00704  -0.00657  -0.00702  -0.00558  -0.00548  -0.00440  -0.00400  -0.00397  -0.00345  -0.00268
	    </tableData>

	    <tableData breakPoint="10.00000">
                -10.00     -5.00      0.00      5.00     10.00     15.00     20.00     25.00     30.00     40.00
		0.20000  -0.00614  -0.00553  -0.00520  -0.00389  -0.00328  -0.00238  -0.00200  -0.00152  -0.00111  -0.00032
		0.50000  -0.00636  -0.00576  -0.00529  -0.00427  -0.00354  -0.00263  -0.00230  -0.00163  -0.00148  -0.00093
		0.90000  -0.00720  -0.00676  -0.00524  -0.00599  -0.00548  -0.00513  -0.00515  -0.00413  -0.00364  -0.00309
	    </tableData>

	</table>
    </function>

    <function name="aero/CMx_rudder">
	<interpolate1d>
	    <property>fcs/surfaces/rudder-pos-deg</property>
	    <value>-35</value> <property>aero/CMx_rudder_-35</property>
	    <value>-4</value> <property>aero/CMx_rudder_-4</property>
	    <value>0</value> <value>0</value>
	    <value>4</value> <property>aero/CMx_rudder_4</property>
	    <value>35</value> <property>aero/CMx_rudder_35</property>
	</interpolate1d>
    </function>

    <!-- slats -->
    <function name="aero/CMx_slats_27.5">
	<table>
	    <independentVar lookup="row">velocities/mach</independentVar>
	    <independentVar lookup="column">aero/alpha-deg</independentVar>
	    <independentVar lookup="table">aero/beta-deg</independentVar>
	    <tableData breakPoint="-10.00000">
                -10.00     -5.00      0.00      5.00     10.00     15.00     20.00     25.00     30.00     40.00
		0.20000   0.00033   0.00074   0.00065   0.00047   0.00000  -0.00057  -0.00134  -0.00221  -0.00334  -0.00521
		0.50000   0.00035   0.00080   0.00078   0.00050   0.00000  -0.00054  -0.00146  -0.00256  -0.00362  -0.00580
		0.90000   0.00061   0.00110   0.00113   0.00075   0.00011  -0.00081  -0.00199  -0.00335  -0.00483  -0.00779
	    </tableData>

	    <tableData breakPoint="0.00000">
                -10.00     -5.00      0.00      5.00     10.00     15.00     20.00     25.00     30.00     40.00
		0.20000   0.00000   0.00000   0.00000   0.00000   0.00000   0.00000  -0.00000  -0.00000   0.00000   0.00000
		0.50000   0.00000   0.00000   0.00000   0.00000   0.00000   0.00000   0.00000   0.00000   0.00000   0.00014
		0.90000  -0.00000   0.00000   0.00000   0.00000   0.00000   0.00000   0.00000   0.00000   0.00000   0.00000
	    </tableData>

	    <tableData breakPoint="10.00000">
                -10.00     -5.00      0.00      5.00     10.00     15.00     20.00     25.00     30.00     40.00
		0.20000  -0.00033  -0.00074  -0.00065  -0.00047   0.00000   0.00060   0.00134   0.00222   0.00332   0.00530
		0.50000  -0.00035  -0.00080  -0.00079  -0.00050   0.00000   0.00062   0.00146   0.00252   0.00360   0.00578
		0.90000  -0.00061  -0.00110  -0.00115  -0.00076  -0.00011   0.00089   0.00198   0.00322   0.00476   0.00783
	    </tableData>

	</table>
    </function>

    <function name="aero/CMx_slats">
	<interpolate1d>
	    <property>fcs/surfaces/slats-pos-deg</property>
	    <value>0</value> <value>0</value>
	    <value>27.5</value> <property>aero/CMx_slats_27.5</property>
	</interpolate1d>
    </function>

    <!-- speedbrake -->
    <function name="aero/CMx_speedbrake_60">
	<table>
	    <independentVar lookup="row">velocities/mach</independentVar>
	    <independentVar lookup="column">aero/alpha-deg</independentVar>
	    <independentVar lookup="table">aero/beta-deg</independentVar>
	    <tableData breakPoint="-10.00000">
                -10.00     -5.00      0.00      5.00     10.00     15.00     20.00     25.00     30.00     40.00
		0.20000   0.00298   0.00408   0.00396   0.00468   0.00460   0.00417   0.00337   0.00266   0.00137  -0.00132
		0.50000   0.00289   0.00416   0.00443   0.00442   0.00427   0.00354   0.00302   0.00187   0.00109  -0.00155
		0.90000   0.00556   0.00743   0.00816   0.00830   0.00598   0.00409   0.00199   0.00000  -0.00151  -0.00691
	    </tableData>

	    <tableData breakPoint="0.00000">
                -10.00     -5.00      0.00      5.00     10.00     15.00     20.00     25.00     30.00     40.00
		0.20000   0.00000  -0.00000   0.00000   0.00000   0.00000   0.00000   0.00000   0.00000   0.00000   0.00000
		0.50000   0.00000   0.00000   0.00000  -0.00000   0.00000  -0.00000   0.00000   0.00000  -0.00000   0.00000
		0.90000   0.00000  -0.00000   0.00000  -0.00000   0.00000   0.00000   0.00000   0.00000   0.00000   0.00000
	    </tableData>

	    <tableData breakPoint="10.00000">
                -10.00     -5.00      0.00      5.00     10.00     15.00     20.00     25.00     30.00     40.00
		0.20000  -0.00297  -0.00408  -0.00396  -0.00468  -0.00461  -0.00418  -0.00340  -0.00267  -0.00129   0.00149
		0.50000  -0.00289  -0.00416  -0.00444  -0.00442  -0.00428  -0.00350  -0.00303  -0.00192  -0.00109   0.00155
		0.90000  -0.00554  -0.00743  -0.00817  -0.00829  -0.00598  -0.00413  -0.00194   0.00000   0.00144   0.00684
	    </tableData>

	</table>
    </function>

    <function name="aero/CMx_speedbrake">
	<interpolate1d>
	    <property>fcs/surfaces/speedbrake-pos-deg</property>
	    <value>0</value> <value>0</value>
	    <value>60</value> <property>aero/CMx_speedbrake_60</property>
	</interpolate1d>
    </function>

    <!-- CMY -->
    <!-- base -->
    <function name="aero/CMy_base">
	<table>
	    <independentVar lookup="row">velocities/mach</independentVar>
	    <independentVar lookup="column">aero/alpha-deg</independentVar>
	    <independentVar lookup="table">aero/beta-deg</independentVar>
	    <tableData breakPoint="-10.00000">
                -10.00     -5.00      0.00      5.00     10.00     15.00     20.00     25.00     30.00     40.00
		0.20000   0.11412   0.06577   0.01690  -0.03846  -0.10103  -0.16446  -0.21957  -0.27350  -0.33622  -0.43098
		0.50000   0.12492   0.07118   0.01620  -0.04435  -0.11158  -0.17997  -0.24194  -0.30028  -0.36814  -0.46583
		0.90000   0.17048   0.09420   0.01395  -0.06997  -0.16156  -0.25633  -0.34135  -0.43103  -0.52866  -0.64869
	    </tableData>

	    <tableData breakPoint="0.00000">
                -10.00     -5.00      0.00      5.00     10.00     15.00     20.00     25.00     30.00     40.00
		0.20000   0.11200   0.06288   0.02523  -0.03101  -0.08523  -0.16242  -0.24344  -0.30512  -0.36586  -0.46323
		0.50000   0.12279   0.06818   0.02437  -0.04076  -0.09805  -0.17766  -0.26577  -0.33318  -0.40360  -0.50232
		0.90000   0.18191   0.09794   0.02390  -0.07306  -0.16894  -0.27304  -0.38389  -0.46271  -0.56799  -0.71750
	    </tableData>

	    <tableData breakPoint="10.00000">
                -10.00     -5.00      0.00      5.00     10.00     15.00     20.00     25.00     30.00     40.00
		0.20000   0.11411   0.06577   0.01691  -0.03847  -0.10109  -0.16452  -0.21968  -0.27323  -0.33619  -0.43141
		0.50000   0.12492   0.07119   0.01624  -0.04431  -0.11159  -0.18081  -0.24178  -0.30018  -0.36795  -0.46562
		0.90000   0.17047   0.09421   0.01397  -0.06991  -0.16162  -0.25648  -0.34130  -0.43098  -0.52885  -0.64887
	    </tableData>

	</table>
    </function>

    <!-- elevator -->
    <function name="aero/CMy_elevator_-24">
	<table>
	    <independentVar lookup="row">velocities/mach</independentVar>
	    <independentVar lookup="column">aero/alpha-deg</independentVar>
	    <independentVar lookup="table">aero/beta-deg</independentVar>
	    <tableData breakPoint="-10.00000">
                -10.00     -5.00      0.00      5.00     10.00     15.00     20.00     25.00     30.00     40.00
		0.20000   0.32665   0.38887   0.43297   0.47562   0.49650   0.50087   0.48939   0.46198   0.42137   0.30941
		0.50000   0.33302   0.39959   0.44730   0.49328   0.51103   0.51780   0.51043   0.48848   0.45057   0.33929
		0.90000   0.37893   0.45157   0.51196   0.56283   0.59569   0.61120   0.61333   0.60916   0.60473   0.49112
	    </tableData>

	    <tableData breakPoint="0.00000">
                -10.00     -5.00      0.00      5.00     10.00     15.00     20.00     25.00     30.00     40.00
		0.20000   0.33621   0.39609   0.43917   0.47833   0.49021   0.52233   0.51605   0.47842   0.44211   0.31707
		0.50000   0.34333   0.40679   0.45130   0.49494   0.50690   0.53905   0.53962   0.50439   0.47212   0.34312
		0.90000   0.37513   0.45971   0.52282   0.57770   0.59895   0.63018   0.64667   0.63209   0.62977   0.50786
	    </tableData>

	    <tableData breakPoint="10.00000">
                -10.00     -5.00      0.00      5.00     10.00     15.00     20.00     25.00     30.00     40.00
		0.20000   0.32664   0.38900   0.43274   0.47518   0.49649   0.49979   0.48963   0.46199   0.42152   0.30797
		0.50000   0.33294   0.39954   0.44704   0.49321   0.51115   0.51848   0.51022   0.48874   0.45044   0.33884
		0.90000   0.37884   0.45160   0.51196   0.56275   0.59587   0.61142   0.61322   0.60925   0.60467   0.49115
	    </tableData>

	</table>
    </function>

    <function name="aero/CMy_elevator_-9.5">
	<table>
	    <independentVar lookup="row">velocities/mach</independentVar>
	    <independentVar lookup="column">aero/alpha-deg</independentVar>
	    <independentVar lookup="table">aero/beta-deg</independentVar>
	    <tableData breakPoint="-10.00000">
                -10.00     -5.00      0.00      5.00     10.00     15.00     20.00     25.00     30.00     40.00
		0.20000   0.17652   0.19234   0.19597   0.20319   0.20390   0.19703   0.18956   0.16416   0.14140   0.08622
		0.50000   0.18503   0.20093   0.20592   0.21213   0.21373   0.20748   0.19965   0.17857   0.15642   0.09343
		0.90000   0.23033   0.24391   0.25597   0.25365   0.26313   0.26507   0.25764   0.23656   0.23491   0.16488
	    </tableData>

	    <tableData breakPoint="0.00000">
                -10.00     -5.00      0.00      5.00     10.00     15.00     20.00     25.00     30.00     40.00
		0.20000   0.17883   0.19363   0.19837   0.20688   0.20126   0.21688   0.19528   0.16881   0.14180   0.07690
		0.50000   0.18907   0.20235   0.20852   0.21772   0.21067   0.22582   0.20788   0.18090   0.15636   0.09233
		0.90000   0.23123   0.24914   0.25864   0.27047   0.26351   0.27435   0.25147   0.24253   0.22422   0.15348
	    </tableData>

	    <tableData breakPoint="10.00000">
                -10.00     -5.00      0.00      5.00     10.00     15.00     20.00     25.00     30.00     40.00
		0.20000   0.17654   0.19232   0.19585   0.20316   0.20396   0.19698   0.18976   0.16389   0.14155   0.08521
		0.50000   0.18503   0.20090   0.20592   0.21210   0.21366   0.20829   0.19961   0.17855   0.15575   0.09329
		0.90000   0.23023   0.24390   0.25597   0.25356   0.26318   0.26537   0.25728   0.23638   0.23509   0.16536
	    </tableData>

	</table>
    </function>

    <function name="aero/CMy_elevator_1.5">
	<table>
	    <independentVar lookup="row">velocities/mach</independentVar>
	    <independentVar lookup="column">aero/alpha-deg</independentVar>
	    <independentVar lookup="table">aero/beta-deg</independentVar>
	    <tableData breakPoint="-10.00000">
                -10.00     -5.00      0.00      5.00     10.00     15.00     20.00     25.00     30.00     40.00
		0.20000  -0.00057  -0.00043  -0.00074  -0.00213  -0.00051  -0.00314  -0.00329  -0.00203  -0.00099  -0.00218
		0.50000  -0.00063  -0.00039   0.00062  -0.00148  -0.00095  -0.00217  -0.00069  -0.00334  -0.00220  -0.00523
		0.90000  -0.00021   0.00000  -0.00062   0.00017  -0.00286   0.00258   0.00108  -0.00156   0.00437  -0.00394
	    </tableData>

	    <tableData breakPoint="0.00000">
                -10.00     -5.00      0.00      5.00     10.00     15.00     20.00     25.00     30.00     40.00
		0.20000   0.00022   0.00012   0.00026   0.00000  -0.00035   0.00225  -0.00091   0.00036  -0.00042  -0.00779
		0.50000   0.00000   0.00010   0.00013  -0.00014  -0.00067  -0.00182  -0.00064  -0.00027  -0.00073  -0.00719
		0.90000  -0.00198   0.00000  -0.00072  -0.00058  -0.00097  -0.00080   0.00074  -0.00361  -0.00563   0.00057
	    </tableData>

	    <tableData breakPoint="10.00000">
                -10.00     -5.00      0.00      5.00     10.00     15.00     20.00     25.00     30.00     40.00
		0.20000  -0.00054  -0.00043  -0.00076  -0.00215  -0.00045  -0.00314  -0.00336  -0.00226  -0.00093  -0.00292
		0.50000  -0.00065  -0.00039   0.00058  -0.00159  -0.00125  -0.00149  -0.00025  -0.00346  -0.00230  -0.00559
		0.90000  -0.00081  -0.00010  -0.00064   0.00066  -0.00276   0.00415   0.00102  -0.00182   0.00423  -0.00133
	    </tableData>

	</table>
    </function>

    <function name="aero/CMy_elevator">
	<interpolate1d>
	    <property>fcs/surfaces/elevator-pos-deg</property>
	    <value>-24</value> <property>aero/CMy_elevator_-24</property>
	    <value>-9.5</value> <property>aero/CMy_elevator_-9.5</property>
	    <value>0</value> <value>0</value>
	    <value>1.5</value> <property>aero/CMy_elevator_1.5</property>
	</interpolate1d>
    </function>

    <!-- flap -->
    <function name="aero/CMy_flap_30">
	<table>
	    <independentVar lookup="row">velocities/mach</independentVar>
	    <independentVar lookup="column">aero/alpha-deg</independentVar>
	    <independentVar lookup="table">aero/beta-deg</independentVar>
	    <tableData breakPoint="-10.00000">
                -10.00     -5.00      0.00      5.00     10.00     15.00     20.00     25.00     30.00     40.00
		0.20000  -0.09259  -0.08417  -0.07324  -0.08029  -0.07711  -0.05624  -0.06268  -0.03835  -0.04262  -0.05281
		0.50000  -0.11044  -0.10167  -0.08409  -0.08808  -0.08611  -0.05838  -0.06273  -0.04916  -0.04748  -0.06348
		0.90000  -0.22284  -0.21024  -0.20049  -0.17479  -0.14988  -0.11698  -0.11115  -0.08975  -0.07233  -0.08884
	    </tableData>

	    <tableData breakPoint="0.00000">
                -10.00     -5.00      0.00      5.00     10.00     15.00     20.00     25.00     30.00     40.00
		0.20000  -0.08916  -0.06272  -0.05479  -0.05497  -0.04358  -0.05373  -0.05553  -0.06856  -0.07005  -0.06218
		0.50000  -0.10625  -0.07720  -0.07491  -0.07164  -0.05675  -0.05921  -0.06379  -0.07209  -0.07097  -0.08596
		0.90000  -0.22891  -0.19944  -0.17628  -0.17998  -0.15291  -0.14267  -0.11376  -0.09972  -0.09811  -0.08287
	    </tableData>

	    <tableData breakPoint="10.00000">
                -10.00     -5.00      0.00      5.00     10.00     15.00     20.00     25.00     30.00     40.00
		0.20000  -0.09259  -0.08422  -0.07294  -0.08090  -0.07686  -0.05625  -0.06247  -0.03788  -0.04254  -0.05295
		0.50000  -0.11044  -0.10178  -0.08411  -0.08931  -0.08567  -0.05737  -0.06320  -0.04938  -0.04714  -0.06359
		0.90000  -0.22282  -0.21023  -0.20073  -0.17504  -0.15002  -0.11705  -0.11116  -0.08997  -0.07256  -0.08749
	    </tableData>

	</table>
    </function>

    <function name="aero/CMy_flap_40">
	<table>
	    <independentVar lookup="row">velocities/mach</independentVar>
	    <independentVar lookup="column">aero/alpha-deg</independentVar>
	    <independentVar lookup="table">aero/beta-deg</independentVar>
	    <tableData breakPoint="-10.00000">
                -10.00     -5.00      0.00      5.00     10.00     15.00     20.00     25.00     30.00     40.00
		0.20000  -0.11132  -0.10071  -0.08002  -0.09034  -0.08456  -0.06392  -0.06877  -0.04455  -0.04580  -0.05784
		0.50000  -0.12797  -0.11617  -0.09315  -0.10223  -0.09541  -0.06731  -0.06814  -0.05498  -0.05145  -0.06907
		0.90000  -0.26218  -0.24740  -0.22626  -0.20090  -0.17032  -0.12347  -0.12591  -0.09861  -0.08119  -0.09416
	    </tableData>

	    <tableData breakPoint="0.00000">
                -10.00     -5.00      0.00      5.00     10.00     15.00     20.00     25.00     30.00     40.00
		0.20000  -0.10245  -0.07218  -0.06285  -0.06217  -0.04482  -0.05773  -0.05968  -0.07618  -0.07843  -0.06564
		0.50000  -0.12199  -0.09128  -0.08617  -0.07942  -0.05660  -0.06414  -0.06960  -0.08358  -0.07389  -0.08106
		0.90000  -0.26721  -0.23341  -0.20638  -0.20662  -0.17413  -0.15794  -0.12374  -0.10901  -0.10816  -0.10073
	    </tableData>

	    <tableData breakPoint="10.00000">
                -10.00     -5.00      0.00      5.00     10.00     15.00     20.00     25.00     30.00     40.00
		0.20000  -0.11114  -0.10080  -0.08066  -0.09029  -0.08430  -0.06441  -0.06800  -0.04410  -0.04580  -0.05817
		0.50000  -0.12790  -0.11613  -0.09325  -0.10228  -0.09555  -0.06660  -0.06877  -0.05490  -0.05185  -0.06989
		0.90000  -0.26213  -0.24738  -0.22604  -0.20105  -0.17068  -0.12249  -0.12590  -0.09801  -0.08111  -0.09456
	    </tableData>

	</table>
    </function>

    <function name="aero/CMy_flap">
	<interpolate1d>
	    <property>fcs/surfaces/flap-pos-deg</property>
	    <value>0</value> <value>0</value>
	    <value>30</value> <property>aero/CMy_flap_30</property>
	    <value>40</value> <property>aero/CMy_flap_40</property>
	</interpolate1d>
    </function>

    <!-- left-flaperon -->
    <function name="aero/CMy_left-flaperon_-51">
	<table>
	    <independentVar lookup="row">velocities/mach</independentVar>
	    <independentVar lookup="column">aero/alpha-deg</independentVar>
	    <independentVar lookup="table">aero/beta-deg</independentVar>
	    <tableData breakPoint="-10.00000">
                -10.00     -5.00      0.00      5.00     10.00     15.00     20.00     25.00     30.00     40.00
		0.20000   0.00191   0.01087   0.00288   0.01477   0.02821   0.01786   0.01857   0.01985   0.03100   0.04958
		0.50000   0.00464   0.01917   0.01357   0.02361   0.03542   0.02272   0.02345   0.02517   0.03681   0.05487
		0.90000   0.04986   0.06405   0.07655   0.08373   0.08070   0.08538   0.08597   0.08372   0.08847   0.08380
	    </tableData>

	    <tableData breakPoint="0.00000">
                -10.00     -5.00      0.00      5.00     10.00     15.00     20.00     25.00     30.00     40.00
		0.20000   0.04293   0.05150   0.04260   0.05844   0.05989   0.06649   0.06998   0.06945   0.06607   0.06409
		0.50000   0.05435   0.06153   0.05302   0.07133   0.06975   0.07353   0.07954   0.07929   0.08005   0.07096
		0.90000   0.12592   0.12943   0.12133   0.14461   0.14872   0.14807   0.14196   0.13991   0.13778   0.14195
	    </tableData>

	    <tableData breakPoint="10.00000">
                -10.00     -5.00      0.00      5.00     10.00     15.00     20.00     25.00     30.00     40.00
		0.20000   0.09523   0.09815   0.10233   0.10715   0.11029   0.10798   0.10576   0.10029   0.09113   0.07664
		0.50000   0.10537   0.10911   0.11481   0.11884   0.12316   0.11870   0.11848   0.11002   0.10217   0.08370
		0.90000   0.18256   0.18946   0.19487   0.20316   0.20146   0.19616   0.18759   0.17695   0.16893   0.12896
	    </tableData>

	</table>
    </function>

    <function name="aero/CMy_left-flaperon">
	<interpolate1d>
	    <property>fcs/surfaces/left-flaperon-pos-deg</property>
	    <value>-51</value> <property>aero/CMy_left-flaperon_-51</property>
	    <value>0</value> <value>0</value>
	</interpolate1d>
    </function>

    <!-- right-flaperon -->
    <function name="aero/CMy_right-flaperon_-51">
	<table>
	    <independentVar lookup="row">velocities/mach</independentVar>
	    <independentVar lookup="column">aero/alpha-deg</independentVar>
	    <independentVar lookup="table">aero/beta-deg</independentVar>
	    <tableData breakPoint="-10.00000">
                -10.00     -5.00      0.00      5.00     10.00     15.00     20.00     25.00     30.00     40.00
		0.20000   0.08889   0.09115   0.09493   0.09975   0.10179   0.10062   0.09856   0.09230   0.08428   0.07241
		0.50000   0.09785   0.10174   0.10586   0.10969   0.11293   0.10898   0.11019   0.10148   0.09170   0.07841
		0.90000   0.17091   0.17753   0.18172   0.18910   0.18763   0.18259   0.17306   0.16217   0.15285   0.11891
	    </tableData>

	    <tableData breakPoint="0.00000">
                -10.00     -5.00      0.00      5.00     10.00     15.00     20.00     25.00     30.00     40.00
		0.20000   0.04346   0.04975   0.04033   0.05596   0.05684   0.06281   0.06508   0.06422   0.06092   0.06271
		0.50000   0.05255   0.05967   0.04986   0.06880   0.06632   0.06941   0.07335   0.07287   0.07461   0.07311
		0.90000   0.12116   0.12532   0.11612   0.13843   0.14136   0.13912   0.13343   0.12829   0.12665   0.13253
	    </tableData>

	    <tableData breakPoint="10.00000">
                -10.00     -5.00      0.00      5.00     10.00     15.00     20.00     25.00     30.00     40.00
		0.20000   0.00782   0.01989   0.01077   0.01746   0.02739   0.02053   0.01983   0.02221   0.03125   0.04956
		0.50000   0.01081   0.02550   0.01927   0.02618   0.03402   0.02629   0.02506   0.02895   0.03924   0.05210
		0.90000   0.05661   0.06978   0.07695   0.08536   0.07559   0.08467   0.08354   0.08189   0.08424   0.08211
	    </tableData>

	</table>
    </function>

    <function name="aero/CMy_right-flaperon">
	<interpolate1d>
	    <property>fcs/surfaces/right-flaperon-pos-deg</property>
	    <value>-51</value> <property>aero/CMy_right-flaperon_-51</property>
	    <value>0</value> <value>0</value>
	</interpolate1d>
    </function>

    <!-- rudder -->
    <function name="aero/CMy_rudder_-35">
	<table>
	    <independentVar lookup="row">velocities/mach</independentVar>
	    <independentVar lookup="column">aero/alpha-deg</independentVar>
	    <independentVar lookup="table">aero/beta-deg</independentVar>
	    <tableData breakPoint="-10.00000">
                -10.00     -5.00      0.00      5.00     10.00     15.00     20.00     25.00     30.00     40.00
		0.20000  -0.00495  -0.00530  -0.00856  -0.00360   0.00071   0.01464   0.01605   0.01731   0.00971   0.00535
		0.50000  -0.00617  -0.00660  -0.00868  -0.00623  -0.00098   0.00795   0.01524   0.01692   0.01515   0.00688
		0.90000  -0.00848  -0.00975  -0.01121  -0.01210  -0.00850  -0.00036   0.00561   0.00314   0.00639   0.00457
	    </tableData>

	    <tableData breakPoint="0.00000">
                -10.00     -5.00      0.00      5.00     10.00     15.00     20.00     25.00     30.00     40.00
		0.20000  -0.04220  -0.03864  -0.03334  -0.03293  -0.02392  -0.02305  -0.01624  -0.01452  -0.01182  -0.01003
		0.50000  -0.04274  -0.03957  -0.03378  -0.03119  -0.02389  -0.02598  -0.01670  -0.01446  -0.01119  -0.00412
		0.90000  -0.04562  -0.04442  -0.03852  -0.03282  -0.02628  -0.02219  -0.01570  -0.01112  -0.00726  -0.00085
	    </tableData>

	    <tableData breakPoint="10.00000">
                -10.00     -5.00      0.00      5.00     10.00     15.00     20.00     25.00     30.00     40.00
		0.20000  -0.06813  -0.06073  -0.05321  -0.06467  -0.05026  -0.05605  -0.04828  -0.03900  -0.03189  -0.01569
		0.50000  -0.07290  -0.06394  -0.05325  -0.05082  -0.04653  -0.05416  -0.04520  -0.03707  -0.02822  -0.01380
		0.90000  -0.07441  -0.07034  -0.05731  -0.05837  -0.04616  -0.04349  -0.03789  -0.02587  -0.01879  -0.01107
	    </tableData>

	</table>
    </function>

    <function name="aero/CMy_rudder_4">
	<table>
	    <independentVar lookup="row">velocities/mach</independentVar>
	    <independentVar lookup="column">aero/alpha-deg</independentVar>
	    <independentVar lookup="table">aero/beta-deg</independentVar>
	    <tableData breakPoint="-10.00000">
                -10.00     -5.00      0.00      5.00     10.00     15.00     20.00     25.00     30.00     40.00
		0.20000  -0.00587  -0.00550  -0.00446  -0.00487  -0.00621  -0.00505  -0.00718  -0.00580  -0.00310  -0.00137
		0.50000  -0.00611  -0.00552  -0.00461  -0.00561  -0.00478  -0.00579  -0.00458  -0.00378  -0.00378  -0.00158
		0.90000  -0.00600  -0.00577  -0.00480  -0.00412  -0.00389  -0.00366  -0.00484  -0.00224  -0.00224  -0.00255
	    </tableData>

	    <tableData breakPoint="0.00000">
                -10.00     -5.00      0.00      5.00     10.00     15.00     20.00     25.00     30.00     40.00
		0.20000  -0.00081  -0.00072  -0.00072  -0.00135  -0.00075  -0.00082  -0.00032   0.00000  -0.00159  -0.00307
		0.50000  -0.00079  -0.00080  -0.00069  -0.00088  -0.00097  -0.00131  -0.00045   0.00012  -0.00098   0.00078
		0.90000  -0.00096  -0.00090  -0.00083  -0.00074  -0.00047  -0.00061  -0.00037  -0.00043  -0.00068   0.00028
	    </tableData>

	    <tableData breakPoint="10.00000">
                -10.00     -5.00      0.00      5.00     10.00     15.00     20.00     25.00     30.00     40.00
		0.20000   0.00388   0.00402   0.00317   0.00406   0.00431   0.00689   0.00439   0.00438   0.00353   0.00141
		0.50000   0.00364   0.00386   0.00330   0.00265   0.00376   0.00669   0.00479   0.00451   0.00314   0.00000
		0.90000   0.00424   0.00399   0.00334   0.00265   0.00232   0.00244   0.00275   0.00170   0.00135   0.00053
	    </tableData>

	</table>
    </function>

    <function name="aero/CMy_rudder_-4">
	<table>
	    <independentVar lookup="row">velocities/mach</independentVar>
	    <independentVar lookup="column">aero/alpha-deg</independentVar>
	    <independentVar lookup="table">aero/beta-deg</independentVar>
	    <tableData breakPoint="-10.00000">
                -10.00     -5.00      0.00      5.00     10.00     15.00     20.00     25.00     30.00     40.00
		0.20000   0.00390   0.00401   0.00318   0.00396   0.00423   0.00674   0.00440   0.00434   0.00366   0.00180
		0.50000   0.00365   0.00387   0.00335   0.00268   0.00396   0.00582   0.00444   0.00449   0.00314   0.00038
		0.90000   0.00426   0.00400   0.00335   0.00281   0.00230   0.00228   0.00342   0.00160   0.00159   0.00048
	    </tableData>

	    <tableData breakPoint="0.00000">
                -10.00     -5.00      0.00      5.00     10.00     15.00     20.00     25.00     30.00     40.00
		0.20000  -0.00081  -0.00072  -0.00072  -0.00134  -0.00074  -0.00079  -0.00028   0.00000  -0.00109   0.00000
		0.50000  -0.00079  -0.00080  -0.00070  -0.00087  -0.00098  -0.00127  -0.00046   0.00016  -0.00079   0.00000
		0.90000  -0.00096  -0.00090  -0.00083  -0.00074  -0.00048  -0.00058  -0.00029  -0.00054  -0.00088   0.00021
	    </tableData>

	    <tableData breakPoint="10.00000">
                -10.00     -5.00      0.00      5.00     10.00     15.00     20.00     25.00     30.00     40.00
		0.20000  -0.00590  -0.00549  -0.00441  -0.00488  -0.00620  -0.00501  -0.00708  -0.00573  -0.00332  -0.00218
		0.50000  -0.00624  -0.00553  -0.00465  -0.00559  -0.00481  -0.00491  -0.00464  -0.00362  -0.00386  -0.00246
		0.90000  -0.00598  -0.00577  -0.00477  -0.00413  -0.00392  -0.00365  -0.00498  -0.00240  -0.00192  -0.00451
	    </tableData>

	</table>
    </function>

    <function name="aero/CMy_rudder_35">
	<table>
	    <independentVar lookup="row">velocities/mach</independentVar>
	    <independentVar lookup="column">aero/alpha-deg</independentVar>
	    <independentVar lookup="table">aero/beta-deg</independentVar>
	    <tableData breakPoint="-10.00000">
                -10.00     -5.00      0.00      5.00     10.00     15.00     20.00     25.00     30.00     40.00
		0.20000  -0.06886  -0.06084  -0.05331  -0.06466  -0.05038  -0.05618  -0.04854  -0.03907  -0.03188  -0.01621
		0.50000  -0.07298  -0.06404  -0.05326  -0.05069  -0.04656  -0.05501  -0.04496  -0.03698  -0.02823  -0.01382
		0.90000  -0.07448  -0.07040  -0.05732  -0.05814  -0.04614  -0.04359  -0.03803  -0.02485  -0.01893  -0.01108
	    </tableData>

	    <tableData breakPoint="0.00000">
                -10.00     -5.00      0.00      5.00     10.00     15.00     20.00     25.00     30.00     40.00
		0.20000  -0.04220  -0.03863  -0.03333  -0.03290  -0.02421  -0.02301  -0.01630  -0.01440  -0.01192  -0.00806
		0.50000  -0.04276  -0.03956  -0.03380  -0.03118  -0.02463  -0.02596  -0.01677  -0.01434  -0.01143  -0.00269
		0.90000  -0.04554  -0.04441  -0.03851  -0.03283  -0.02636  -0.02203  -0.01573  -0.01106  -0.00711  -0.00088
	    </tableData>

	    <tableData breakPoint="10.00000">
                -10.00     -5.00      0.00      5.00     10.00     15.00     20.00     25.00     30.00     40.00
		0.20000  -0.00497  -0.00530  -0.00857  -0.00351   0.00079   0.01483   0.01618   0.01687   0.00966   0.00571
		0.50000  -0.00612  -0.00664  -0.00873  -0.00634  -0.00098   0.00879   0.01493   0.01696   0.01539   0.00688
		0.90000  -0.00848  -0.00976  -0.01123  -0.01236  -0.00835  -0.00026   0.00497   0.00304   0.00671   0.00502
	    </tableData>

	</table>
    </function>

    <function name="aero/CMy_rudder">
	<interpolate1d>
	    <property>fcs/surfaces/rudder-pos-deg</property>
	    <value>-35</value> <property>aero/CMy_rudder_-35</property>
	    <value>-4</value> <property>aero/CMy_rudder_-4</property>
	    <value>0</value> <value>0</value>
	    <value>4</value> <property>aero/CMy_rudder_4</property>
	    <value>35</value> <property>aero/CMy_rudder_35</property>
	</interpolate1d>
    </function>

    <!-- slats -->
    <function name="aero/CMy_slats_27.5">
	<table>
	    <independentVar lookup="row">velocities/mach</independentVar>
	    <independentVar lookup="column">aero/alpha-deg</independentVar>
	    <independentVar lookup="table">aero/beta-deg</independentVar>
	    <tableData breakPoint="-10.00000">
                -10.00     -5.00      0.00      5.00     10.00     15.00     20.00     25.00     30.00     40.00
		0.20000  -0.00839  -0.00888  -0.00871  -0.00858  -0.00815  -0.00932  -0.00825  -0.00823  -0.00781  -0.00968
		0.50000  -0.00939  -0.01006  -0.00997  -0.01020  -0.00935  -0.00970  -0.00906  -0.00826  -0.00898  -0.01071
		0.90000  -0.01730  -0.01828  -0.01842  -0.01784  -0.01782  -0.01715  -0.01696  -0.01628  -0.01666  -0.02059
	    </tableData>

	    <tableData breakPoint="0.00000">
                -10.00     -5.00      0.00      5.00     10.00     15.00     20.00     25.00     30.00     40.00
		0.20000  -0.00842  -0.00922  -0.00934  -0.00878  -0.00833  -0.00773  -0.00729  -0.00722  -0.00758  -0.00525
		0.50000  -0.00963  -0.01039  -0.01053  -0.00989  -0.00968  -0.00896  -0.00831  -0.00835  -0.00853  -0.00863
		0.90000  -0.01766  -0.01888  -0.01935  -0.01861  -0.01793  -0.01675  -0.01681  -0.01639  -0.01622  -0.01691
	    </tableData>

	    <tableData breakPoint="10.00000">
                -10.00     -5.00      0.00      5.00     10.00     15.00     20.00     25.00     30.00     40.00
		0.20000  -0.00840  -0.00889  -0.00872  -0.00859  -0.00811  -0.00907  -0.00795  -0.00805  -0.00801  -0.00947
		0.50000  -0.00944  -0.01007  -0.01002  -0.01029  -0.00924  -0.00874  -0.00905  -0.00785  -0.00922  -0.01123
		0.90000  -0.01749  -0.01829  -0.01844  -0.01842  -0.01773  -0.01587  -0.01693  -0.01642  -0.01647  -0.01948
	    </tableData>

	</table>
    </function>

    <function name="aero/CMy_slats">
	<interpolate1d>
	    <property>fcs/surfaces/slats-pos-deg</property>
	    <value>0</value> <value>0</value>
	    <value>27.5</value> <property>aero/CMy_slats_27.5</property>
	</interpolate1d>
    </function>

    <!-- speedbrake -->
    <function name="aero/CMy_speedbrake_60">
	<table>
	    <independentVar lookup="row">velocities/mach</independentVar>
	    <independentVar lookup="column">aero/alpha-deg</independentVar>
	    <independentVar lookup="table">aero/beta-deg</independentVar>
	    <tableData breakPoint="-10.00000">
                -10.00     -5.00      0.00      5.00     10.00     15.00     20.00     25.00     30.00     40.00
		0.20000   0.10987   0.11563   0.12450   0.12729   0.13305   0.12253   0.10836   0.08924   0.07713   0.04628
		0.50000   0.11879   0.12687   0.13600   0.13595   0.14583   0.13440   0.11813   0.09769   0.08527   0.04925
		0.90000   0.17709   0.18484   0.19929   0.19656   0.20178   0.18830   0.17774   0.15233   0.13807   0.08700
	    </tableData>

	    <tableData breakPoint="0.00000">
                -10.00     -5.00      0.00      5.00     10.00     15.00     20.00     25.00     30.00     40.00
		0.20000   0.10914   0.12159   0.13092   0.13598   0.13046   0.12967   0.11334   0.08993   0.07199   0.03965
		0.50000   0.11991   0.13421   0.14409   0.15081   0.14320   0.14192   0.12572   0.10718   0.08256   0.04820
		0.90000   0.18983   0.20348   0.21409   0.22427   0.21684   0.21411   0.18881   0.16607   0.13229   0.09856
	    </tableData>

	    <tableData breakPoint="10.00000">
                -10.00     -5.00      0.00      5.00     10.00     15.00     20.00     25.00     30.00     40.00
		0.20000   0.10981   0.11562   0.12450   0.12733   0.13301   0.12259   0.10834   0.08905   0.07687   0.04639
		0.50000   0.11881   0.12686   0.13597   0.13586   0.14592   0.13523   0.11814   0.09755   0.08501   0.04834
		0.90000   0.17749   0.18483   0.19929   0.19646   0.20200   0.18839   0.17769   0.15223   0.13828   0.08637
	    </tableData>

	</table>
    </function>

    <function name="aero/CMy_speedbrake">
	<interpolate1d>
	    <property>fcs/surfaces/speedbrake-pos-deg</property>
	    <value>0</value> <value>0</value>
	    <value>60</value> <property>aero/CMy_speedbrake_60</property>
	</interpolate1d>
    </function>

    <!-- CMZ -->
    <!-- base -->
    <function name="aero/CMz_base">
	<table>
	    <independentVar lookup="row">velocities/mach</independentVar>
	    <independentVar lookup="column">aero/alpha-deg</independentVar>
	    <independentVar lookup="table">aero/beta-deg</independentVar>
	    <tableData breakPoint="-10.00000">
                -10.00     -5.00      0.00      5.00     10.00     15.00     20.00     25.00     30.00     40.00
		0.20000  -0.00337   0.00087   0.00045  -0.00281  -0.00395   0.00043   0.00404  -0.00416  -0.01328  -0.03276
		0.50000  -0.00419   0.00094   0.00071  -0.00247  -0.00410  -0.00109   0.00133  -0.00490  -0.01572  -0.03251
		0.90000  -0.00708  -0.00072  -0.00014  -0.00118  -0.00469  -0.00356  -0.00913  -0.02018  -0.02976  -0.04528
	    </tableData>

	    <tableData breakPoint="0.00000">
                -10.00     -5.00      0.00      5.00     10.00     15.00     20.00     25.00     30.00     40.00
		0.20000   0.00000  -0.00000   0.00000  -0.00000  -0.00000   0.00000   0.00000   0.00000   0.00000   0.00000
		0.50000  -0.00000  -0.00000   0.00000   0.00000  -0.00000   0.00000   0.00000   0.00000   0.00016   0.00000
		0.90000  -0.00000  -0.00000   0.00000  -0.00000   0.00000  -0.00000   0.00000  -0.00000   0.00000   0.00013
	    </tableData>

	    <tableData breakPoint="10.00000">
                -10.00     -5.00      0.00      5.00     10.00     15.00     20.00     25.00     30.00     40.00
		0.20000   0.00337  -0.00087  -0.00045   0.00281   0.00395  -0.00046  -0.00407   0.00415   0.01331   0.03273
		0.50000   0.00419  -0.00094  -0.00071   0.00248   0.00410   0.00133  -0.00138   0.00487   0.01567   0.03240
		0.90000   0.00708   0.00072   0.00014   0.00118   0.00468   0.00356   0.00913   0.02050   0.02984   0.04538
	    </tableData>

	</table>
    </function>

    <!-- elevator -->
    <function name="aero/CMz_elevator_-24">
	<table>
	    <independentVar lookup="row">velocities/mach</independentVar>
	    <independentVar lookup="column">aero/alpha-deg</independentVar>
	    <independentVar lookup="table">aero/beta-deg</independentVar>
	    <tableData breakPoint="-10.00000">
                -10.00     -5.00      0.00      5.00     10.00     15.00     20.00     25.00     30.00     40.00
		0.20000  -0.01810  -0.01736  -0.01485  -0.01254  -0.00970  -0.00705  -0.00474  -0.00103   0.00180   0.00924
		0.50000  -0.01887  -0.01828  -0.01560  -0.01407  -0.00998  -0.00737  -0.00599  -0.00298   0.00140   0.00810
		0.90000  -0.02371  -0.02132  -0.01690  -0.01754  -0.01408  -0.01269  -0.00828  -0.00145   0.00158   0.00865
	    </tableData>

	    <tableData breakPoint="0.00000">
                -10.00     -5.00      0.00      5.00     10.00     15.00     20.00     25.00     30.00     40.00
		0.20000   0.00000   0.00000  -0.00000   0.00000   0.00000   0.00011   0.00000   0.00000   0.00000   0.00000
		0.50000   0.00000   0.00000  -0.00000   0.00000   0.00019   0.00012   0.00000   0.00000  -0.00016   0.00000
		0.90000   0.00000   0.00000  -0.00000   0.00000   0.00000   0.00000   0.00000   0.00000   0.00000  -0.00013
	    </tableData>

	    <tableData breakPoint="10.00000">
                -10.00     -5.00      0.00      5.00     10.00     15.00     20.00     25.00     30.00     40.00
		0.20000   0.01811   0.01736   0.01485   0.01251   0.00968   0.00705   0.00476   0.00098  -0.00185  -0.00923
		0.50000   0.01887   0.01830   0.01559   0.01402   0.00996   0.00712   0.00604   0.00298  -0.00134  -0.00803
		0.90000   0.02380   0.02126   0.01687   0.01759   0.01407   0.01278   0.00832   0.00122  -0.00166  -0.00875
	    </tableData>

	</table>
    </function>

    <function name="aero/CMz_elevator_-9.5">
	<table>
	    <independentVar lookup="row">velocities/mach</independentVar>
	    <independentVar lookup="column">aero/alpha-deg</independentVar>
	    <independentVar lookup="table">aero/beta-deg</independentVar>
	    <tableData breakPoint="-10.00000">
                -10.00     -5.00      0.00      5.00     10.00     15.00     20.00     25.00     30.00     40.00
		0.20000  -0.00700  -0.00467  -0.00302  -0.00222   0.00000  -0.00074   0.00138   0.00250   0.00428   0.00538
		0.50000  -0.00663  -0.00489  -0.00384  -0.00324   0.00000  -0.00024   0.00185   0.00194   0.00386   0.00326
		0.90000  -0.00888  -0.00767  -0.00474  -0.00552  -0.00319  -0.00198   0.00052   0.00297   0.00571   0.00736
	    </tableData>

	    <tableData breakPoint="0.00000">
                -10.00     -5.00      0.00      5.00     10.00     15.00     20.00     25.00     30.00     40.00
		0.20000  -0.00000   0.00000  -0.00000   0.00000   0.00000   0.00000   0.00000   0.00000   0.00000   0.00000
		0.50000   0.00000   0.00000  -0.00000   0.00000   0.00000   0.00000   0.00000   0.00000  -0.00016   0.00000
		0.90000   0.00000   0.00000  -0.00000   0.00000   0.00000   0.00000   0.00000   0.00000   0.00000  -0.00013
	    </tableData>

	    <tableData breakPoint="10.00000">
                -10.00     -5.00      0.00      5.00     10.00     15.00     20.00     25.00     30.00     40.00
		0.20000   0.00700   0.00467   0.00302   0.00221   0.00000   0.00075  -0.00141  -0.00247  -0.00432  -0.00524
		0.50000   0.00663   0.00487   0.00385   0.00323   0.00000   0.00000  -0.00181  -0.00191  -0.00379  -0.00338
		0.90000   0.00888   0.00767   0.00475   0.00552   0.00321   0.00201  -0.00054  -0.00327  -0.00578  -0.00749
	    </tableData>

	</table>
    </function>

    <function name="aero/CMz_elevator_1.5">
	<table>
	    <independentVar lookup="row">velocities/mach</independentVar>
	    <independentVar lookup="column">aero/alpha-deg</independentVar>
	    <independentVar lookup="table">aero/beta-deg</independentVar>
	    <tableData breakPoint="-10.00000">
                -10.00     -5.00      0.00      5.00     10.00     15.00     20.00     25.00     30.00     40.00
		0.20000   0.00030  -0.00029  -0.00045  -0.00047  -0.00070  -0.00078  -0.00064  -0.00071  -0.00065   0.00000
		0.50000   0.00070  -0.00033  -0.00048  -0.00051  -0.00044  -0.00097  -0.00060  -0.00098  -0.00059  -0.00043
		0.90000   0.00010  -0.00031  -0.00046  -0.00061  -0.00100  -0.00095  -0.00062  -0.00107  -0.00106  -0.00097
	    </tableData>

	    <tableData breakPoint="0.00000">
                -10.00     -5.00      0.00      5.00     10.00     15.00     20.00     25.00     30.00     40.00
		0.20000   0.00000   0.00000   0.00000   0.00000   0.00000   0.00000   0.00000   0.00000  -0.00014   0.00011
		0.50000   0.00000   0.00000  -0.00000   0.00000   0.00000   0.00000   0.00000   0.00000  -0.00016   0.00000
		0.90000   0.00000   0.00000   0.00000   0.00000   0.00000   0.00000   0.00000   0.00000   0.00000   0.00000
	    </tableData>

	    <tableData breakPoint="10.00000">
                -10.00     -5.00      0.00      5.00     10.00     15.00     20.00     25.00     30.00     40.00
		0.20000  -0.00030   0.00029   0.00045   0.00047   0.00069   0.00079   0.00069   0.00067   0.00060   0.00029
		0.50000  -0.00071   0.00033   0.00048   0.00051   0.00066   0.00077   0.00060   0.00100   0.00064   0.00024
		0.90000   0.00000   0.00031   0.00046   0.00063   0.00100   0.00073   0.00060   0.00081   0.00110   0.00028
	    </tableData>

	</table>
    </function>

    <function name="aero/CMz_elevator">
	<interpolate1d>
	    <property>fcs/surfaces/elevator-pos-deg</property>
	    <value>-24</value> <property>aero/CMz_elevator_-24</property>
	    <value>-9.5</value> <property>aero/CMz_elevator_-9.5</property>
	    <value>0</value> <value>0</value>
	    <value>1.5</value> <property>aero/CMz_elevator_1.5</property>
	</interpolate1d>
    </function>

    <!-- flap -->
    <function name="aero/CMz_flap_30">
	<table>
	    <independentVar lookup="row">velocities/mach</independentVar>
	    <independentVar lookup="column">aero/alpha-deg</independentVar>
	    <independentVar lookup="table">aero/beta-deg</independentVar>
	    <tableData breakPoint="-10.00000">
                -10.00     -5.00      0.00      5.00     10.00     15.00     20.00     25.00     30.00     40.00
		0.20000  -0.00088  -0.00642  -0.01269  -0.01062  -0.00300  -0.00227  -0.00011   0.00104  -0.00168  -0.00347
		0.50000  -0.00055  -0.00708  -0.01296  -0.01221  -0.00581  -0.00407  -0.00347  -0.00101  -0.00057  -0.00397
		0.90000  -0.00131  -0.00714  -0.01165  -0.01724  -0.01530  -0.01159  -0.00917  -0.00922  -0.00679  -0.00422
	    </tableData>

	    <tableData breakPoint="0.00000">
                -10.00     -5.00      0.00      5.00     10.00     15.00     20.00     25.00     30.00     40.00
		0.20000  -0.00000   0.00000  -0.00000   0.00000   0.00000   0.00000  -0.00010   0.00000   0.00000   0.00000
		0.50000   0.00000   0.00000  -0.00000   0.00000   0.00000   0.00000   0.00000   0.00000  -0.00016  -0.00000
		0.90000   0.00000   0.00000   0.00000   0.00000   0.00000   0.00000   0.00000   0.00000  -0.00012  -0.00013
	    </tableData>

	    <tableData breakPoint="10.00000">
                -10.00     -5.00      0.00      5.00     10.00     15.00     20.00     25.00     30.00     40.00
		0.20000   0.00088   0.00641   0.01264   0.01062   0.00299   0.00227   0.00019  -0.00102   0.00166   0.00325
		0.50000   0.00054   0.00707   0.01304   0.01210   0.00573   0.00370   0.00357   0.00122   0.00087   0.00440
		0.90000   0.00128   0.00716   0.01174   0.01721   0.01527   0.01161   0.00910   0.00882   0.00654   0.00402
	    </tableData>

	</table>
    </function>

    <function name="aero/CMz_flap_40">
	<table>
	    <independentVar lookup="row">velocities/mach</independentVar>
	    <independentVar lookup="column">aero/alpha-deg</independentVar>
	    <independentVar lookup="table">aero/beta-deg</independentVar>
	    <tableData breakPoint="-10.00000">
                -10.00     -5.00      0.00      5.00     10.00     15.00     20.00     25.00     30.00     40.00
		0.20000  -0.00222  -0.00825  -0.01582  -0.01135  -0.00352  -0.00355   0.00000   0.00090  -0.00251  -0.00389
		0.50000  -0.00196  -0.00891  -0.01636  -0.01445  -0.00632  -0.00637  -0.00378  -0.00186  -0.00044  -0.00412
		0.90000  -0.00248  -0.00962  -0.01512  -0.02079  -0.01801  -0.01479  -0.01133  -0.01077  -0.00849  -0.00517
	    </tableData>

	    <tableData breakPoint="0.00000">
                -10.00     -5.00      0.00      5.00     10.00     15.00     20.00     25.00     30.00     40.00
		0.20000  -0.00000   0.00000   0.00000   0.00000   0.00000   0.00011   0.00000  -0.00018   0.00000   0.00000
		0.50000   0.00000   0.00000   0.00000   0.00000  -0.00012   0.00011   0.00000  -0.00017  -0.00044   0.00000
		0.90000   0.00000   0.00000   0.00000   0.00000   0.00000   0.00000   0.00027   0.00000  -0.00203  -0.00013
	    </tableData>

	    <tableData breakPoint="10.00000">
                -10.00     -5.00      0.00      5.00     10.00     15.00     20.00     25.00     30.00     40.00
		0.20000   0.00221   0.00823   0.01576   0.01153   0.00353   0.00351   0.00000  -0.00095   0.00252   0.00371
		0.50000   0.00198   0.00891   0.01643   0.01435   0.00624   0.00618   0.00392   0.00201   0.00059   0.00470
		0.90000   0.00249   0.00949   0.01512   0.02078   0.01806   0.01510   0.01143   0.01055   0.00854   0.00483
	    </tableData>

	</table>
    </function>

    <function name="aero/CMz_flap">
	<interpolate1d>
	    <property>fcs/surfaces/flap-pos-deg</property>
	    <value>0</value> <value>0</value>
	    <value>30</value> <property>aero/CMz_flap_30</property>
	    <value>40</value> <property>aero/CMz_flap_40</property>
	</interpolate1d>
    </function>

    <!-- left-flaperon -->
    <function name="aero/CMz_left-flaperon_-51">
	<table>
	    <independentVar lookup="row">velocities/mach</independentVar>
	    <independentVar lookup="column">aero/alpha-deg</independentVar>
	    <independentVar lookup="table">aero/beta-deg</independentVar>
	    <tableData breakPoint="-10.00000">
                -10.00     -5.00      0.00      5.00     10.00     15.00     20.00     25.00     30.00     40.00
		0.20000  -0.00068   0.00419   0.01099   0.01521   0.01489   0.01043   0.00811   0.01084   0.01489   0.02061
		0.50000   0.00022   0.00393   0.01139   0.01611   0.01639   0.01311   0.01145   0.01271   0.01934   0.02001
		0.90000  -0.00028   0.00359   0.01509   0.02029   0.02383   0.02480   0.02937   0.03523   0.03794   0.03492
	    </tableData>

	    <tableData breakPoint="0.00000">
                -10.00     -5.00      0.00      5.00     10.00     15.00     20.00     25.00     30.00     40.00
		0.20000  -0.00218   0.00448   0.00996   0.01435   0.01395   0.01282   0.01561   0.01844   0.02029   0.02022
		0.50000  -0.00189   0.00526   0.01078   0.01527   0.01529   0.01416   0.01607   0.01896   0.02101   0.02186
		0.90000   0.00049   0.00702   0.01397   0.01984   0.02389   0.02638   0.03081   0.03247   0.03481   0.03377
	    </tableData>

	    <tableData breakPoint="10.00000">
                -10.00     -5.00      0.00      5.00     10.00     15.00     20.00     25.00     30.00     40.00
		0.20000   0.00272   0.00648   0.01111   0.01206   0.01423   0.01504   0.01386   0.01250   0.01633   0.01508
		0.50000   0.00345   0.00714   0.01245   0.01353   0.01520   0.01643   0.01492   0.01461   0.01750   0.01912
		0.90000   0.00641   0.01194   0.01681   0.02084   0.02234   0.02732   0.02681   0.02571   0.02785   0.02687
	    </tableData>

	</table>
    </function>

    <function name="aero/CMz_left-flaperon">
	<interpolate1d>
	    <property>fcs/surfaces/left-flaperon-pos-deg</property>
	    <value>-51</value> <property>aero/CMz_left-flaperon_-51</property>
	    <value>0</value> <value>0</value>
	</interpolate1d>
    </function>

    <!-- right-flaperon -->
    <function name="aero/CMz_right-flaperon_-51">
	<table>
	    <independentVar lookup="row">velocities/mach</independentVar>
	    <independentVar lookup="column">aero/alpha-deg</independentVar>
	    <independentVar lookup="table">aero/beta-deg</independentVar>
	    <tableData breakPoint="-10.00000">
                -10.00     -5.00      0.00      5.00     10.00     15.00     20.00     25.00     30.00     40.00
		0.20000  -0.00203  -0.00498  -0.00874  -0.00938  -0.01127  -0.01177  -0.01065  -0.00956  -0.01184  -0.01144
		0.50000  -0.00266  -0.00569  -0.00971  -0.01057  -0.01213  -0.01304  -0.01164  -0.01240  -0.01292  -0.01582
		0.90000  -0.00552  -0.00969  -0.01371  -0.01714  -0.01814  -0.02262  -0.02168  -0.02105  -0.02386  -0.02346
	    </tableData>

	    <tableData breakPoint="0.00000">
                -10.00     -5.00      0.00      5.00     10.00     15.00     20.00     25.00     30.00     40.00
		0.20000   0.00193  -0.00341  -0.00793  -0.01182  -0.01121  -0.01021  -0.01266  -0.01500  -0.01602  -0.01583
		0.50000   0.00171  -0.00408  -0.00865  -0.01256  -0.01231  -0.01142  -0.01302  -0.01551  -0.01694  -0.01843
		0.90000  -0.00013  -0.00574  -0.01155  -0.01671  -0.01982  -0.02194  -0.02555  -0.02671  -0.02818  -0.02832
	    </tableData>

	    <tableData breakPoint="10.00000">
                -10.00     -5.00      0.00      5.00     10.00     15.00     20.00     25.00     30.00     40.00
		0.20000  -0.00020  -0.00322  -0.00957  -0.01281  -0.01214  -0.00845  -0.00593  -0.00787  -0.01102  -0.01545
		0.50000   0.00000  -0.00345  -0.00965  -0.01359  -0.01367  -0.01096  -0.00925  -0.00971  -0.01454  -0.01630
		0.90000   0.00016  -0.00389  -0.01338  -0.01740  -0.01958  -0.02066  -0.02446  -0.02978  -0.03154  -0.02848
	    </tableData>

	</table>
    </function>

    <function name="aero/CMz_right-flaperon">
	<interpolate1d>
	    <property>fcs/surfaces/right-flaperon-pos-deg</property>
	    <value>-51</value> <property>aero/CMz_right-flaperon_-51</property>
	    <value>0</value> <value>0</value>
	</interpolate1d>
    </function>

    <!-- rudder -->
    <function name="aero/CMz_rudder_-35">
	<table>
	    <independentVar lookup="row">velocities/mach</independentVar>
	    <independentVar lookup="column">aero/alpha-deg</independentVar>
	    <independentVar lookup="table">aero/beta-deg</independentVar>
	    <tableData breakPoint="-10.00000">
                -10.00     -5.00      0.00      5.00     10.00     15.00     20.00     25.00     30.00     40.00
		0.20000  -0.04074  -0.04126  -0.04114  -0.03959  -0.03852  -0.03627  -0.03489  -0.03053  -0.02912  -0.02250
		0.50000  -0.04207  -0.04334  -0.04359  -0.04218  -0.04049  -0.03806  -0.03575  -0.03322  -0.02993  -0.02631
		0.90000  -0.05007  -0.05223  -0.05213  -0.05222  -0.05086  -0.04925  -0.04725  -0.04319  -0.03861  -0.03350
	    </tableData>

	    <tableData breakPoint="0.00000">
                -10.00     -5.00      0.00      5.00     10.00     15.00     20.00     25.00     30.00     40.00
		0.20000  -0.03846  -0.03981  -0.03891  -0.04035  -0.03576  -0.03220  -0.02789  -0.02739  -0.02616  -0.02136
		0.50000  -0.03984  -0.04129  -0.04110  -0.04223  -0.03795  -0.03491  -0.02998  -0.02867  -0.02898  -0.02432
		0.90000  -0.04825  -0.04902  -0.05093  -0.05181  -0.04834  -0.04386  -0.04241  -0.04005  -0.03795  -0.03144
	    </tableData>

	    <tableData breakPoint="10.00000">
                -10.00     -5.00      0.00      5.00     10.00     15.00     20.00     25.00     30.00     40.00
		0.20000  -0.04034  -0.04007  -0.03848  -0.03775  -0.03591  -0.03423  -0.03301  -0.02666  -0.02542  -0.01891
		0.50000  -0.04237  -0.04185  -0.04046  -0.03928  -0.03855  -0.03599  -0.03243  -0.02749  -0.02661  -0.02027
		0.90000  -0.04538  -0.04650  -0.04569  -0.04592  -0.04366  -0.04205  -0.04025  -0.03670  -0.03275  -0.02789
	    </tableData>

	</table>
    </function>

    <function name="aero/CMz_rudder_4">
	<table>
	    <independentVar lookup="row">velocities/mach</independentVar>
	    <independentVar lookup="column">aero/alpha-deg</independentVar>
	    <independentVar lookup="table">aero/beta-deg</independentVar>
	    <tableData breakPoint="-10.00000">
                -10.00     -5.00      0.00      5.00     10.00     15.00     20.00     25.00     30.00     40.00
		0.20000   0.00553   0.00592   0.00573   0.00529   0.00552   0.00506   0.00461   0.00382   0.00374   0.00284
		0.50000   0.00630   0.00618   0.00607   0.00567   0.00573   0.00505   0.00509   0.00407   0.00396   0.00335
		0.90000   0.00687   0.00710   0.00703   0.00688   0.00686   0.00657   0.00621   0.00517   0.00487   0.00429
	    </tableData>

	    <tableData breakPoint="0.00000">
                -10.00     -5.00      0.00      5.00     10.00     15.00     20.00     25.00     30.00     40.00
		0.20000   0.00554   0.00563   0.00554   0.00581   0.00516   0.00485   0.00389   0.00400   0.00363   0.00335
		0.50000   0.00581   0.00593   0.00590   0.00599   0.00529   0.00530   0.00448   0.00420   0.00419   0.00337
		0.90000   0.00705   0.00711   0.00736   0.00760   0.00708   0.00672   0.00604   0.00594   0.00561   0.00415
	    </tableData>

	    <tableData breakPoint="10.00000">
                -10.00     -5.00      0.00      5.00     10.00     15.00     20.00     25.00     30.00     40.00
		0.20000   0.00544   0.00593   0.00581   0.00540   0.00551   0.00498   0.00497   0.00431   0.00388   0.00311
		0.50000   0.00596   0.00623   0.00613   0.00574   0.00585   0.00487   0.00501   0.00439   0.00409   0.00379
		0.90000   0.00695   0.00721   0.00715   0.00712   0.00697   0.00672   0.00649   0.00541   0.00520   0.00414
	    </tableData>

	</table>
    </function>

    <function name="aero/CMz_rudder_-4">
	<table>
	    <independentVar lookup="row">velocities/mach</independentVar>
	    <independentVar lookup="column">aero/alpha-deg</independentVar>
	    <independentVar lookup="table">aero/beta-deg</independentVar>
	    <tableData breakPoint="-10.00000">
                -10.00     -5.00      0.00      5.00     10.00     15.00     20.00     25.00     30.00     40.00
		0.20000  -0.00545  -0.00592  -0.00581  -0.00540  -0.00548  -0.00495  -0.00498  -0.00431  -0.00387  -0.00311
		0.50000  -0.00596  -0.00623  -0.00612  -0.00576  -0.00584  -0.00508  -0.00501  -0.00433  -0.00401  -0.00326
		0.90000  -0.00696  -0.00721  -0.00715  -0.00714  -0.00694  -0.00671  -0.00640  -0.00567  -0.00528  -0.00429
	    </tableData>

	    <tableData breakPoint="0.00000">
                -10.00     -5.00      0.00      5.00     10.00     15.00     20.00     25.00     30.00     40.00
		0.20000  -0.00554  -0.00563  -0.00555  -0.00580  -0.00515  -0.00501  -0.00386  -0.00383  -0.00360  -0.00316
		0.50000  -0.00581  -0.00593  -0.00590  -0.00599  -0.00528  -0.00530  -0.00447  -0.00419  -0.00433  -0.00358
		0.90000  -0.00705  -0.00711  -0.00736  -0.00760  -0.00707  -0.00672  -0.00599  -0.00596  -0.00551  -0.00423
	    </tableData>

	    <tableData breakPoint="10.00000">
                -10.00     -5.00      0.00      5.00     10.00     15.00     20.00     25.00     30.00     40.00
		0.20000  -0.00552  -0.00592  -0.00572  -0.00528  -0.00553  -0.00505  -0.00460  -0.00383  -0.00373  -0.00279
		0.50000  -0.00632  -0.00618  -0.00607  -0.00569  -0.00573  -0.00530  -0.00506  -0.00411  -0.00392  -0.00328
		0.90000  -0.00687  -0.00710  -0.00702  -0.00690  -0.00687  -0.00658  -0.00621  -0.00550  -0.00495  -0.00383
	    </tableData>

	</table>
    </function>

    <function name="aero/CMz_rudder_35">
	<table>
	    <independentVar lookup="row">velocities/mach</independentVar>
	    <independentVar lookup="column">aero/alpha-deg</independentVar>
	    <independentVar lookup="table">aero/beta-deg</independentVar>
	    <tableData breakPoint="-10.00000">
                -10.00     -5.00      0.00      5.00     10.00     15.00     20.00     25.00     30.00     40.00
		0.20000   0.04032   0.04005   0.03845   0.03774   0.03592   0.03429   0.03313   0.02665   0.02536   0.01904
		0.50000   0.04236   0.04184   0.04049   0.03927   0.03859   0.03585   0.03240   0.02756   0.02656   0.02033
		0.90000   0.04538   0.04651   0.04570   0.04590   0.04367   0.04211   0.04019   0.03611   0.03273   0.02781
	    </tableData>

	    <tableData breakPoint="0.00000">
                -10.00     -5.00      0.00      5.00     10.00     15.00     20.00     25.00     30.00     40.00
		0.20000   0.03846   0.03982   0.03892   0.04032   0.03579   0.03219   0.02802   0.02741   0.02620   0.02143
		0.50000   0.03984   0.04129   0.04112   0.04221   0.03795   0.03489   0.03001   0.02865   0.02864   0.02440
		0.90000   0.04820   0.04903   0.05091   0.05182   0.04836   0.04389   0.04243   0.03984   0.03788   0.03131
	    </tableData>

	    <tableData breakPoint="10.00000">
                -10.00     -5.00      0.00      5.00     10.00     15.00     20.00     25.00     30.00     40.00
		0.20000   0.04074   0.04126   0.04114   0.03957   0.03852   0.03629   0.03491   0.03194   0.02909   0.02264
		0.50000   0.04207   0.04333   0.04359   0.04218   0.04050   0.03783   0.03575   0.03323   0.03006   0.02633
		0.90000   0.05007   0.05223   0.05213   0.05225   0.05090   0.04927   0.04719   0.04290   0.03857   0.03321
	    </tableData>

	</table>
    </function>

    <function name="aero/CMz_rudder">
	<interpolate1d>
	    <property>fcs/surfaces/rudder-pos-deg</property>
	    <value>-35</value> <property>aero/CMz_rudder_-35</property>
	    <value>-4</value> <property>aero/CMz_rudder_-4</property>
	    <value>0</value> <value>0</value>
	    <value>4</value> <property>aero/CMz_rudder_4</property>
	    <value>35</value> <property>aero/CMz_rudder_35</property>
	</interpolate1d>
    </function>

    <!-- slats -->
    <function name="aero/CMz_slats_27.5">
	<table>
	    <independentVar lookup="row">velocities/mach</independentVar>
	    <independentVar lookup="column">aero/alpha-deg</independentVar>
	    <independentVar lookup="table">aero/beta-deg</independentVar>
	    <tableData breakPoint="-10.00000">
                -10.00     -5.00      0.00      5.00     10.00     15.00     20.00     25.00     30.00     40.00
		0.20000  -0.00197  -0.00098   0.00018   0.00151   0.00270   0.00391   0.00483   0.00580   0.00638   0.00648
		0.50000  -0.00218  -0.00107   0.00020   0.00161   0.00277   0.00374   0.00525   0.00587   0.00667   0.00674
		0.90000  -0.00311  -0.00156   0.00014   0.00192   0.00349   0.00499   0.00638   0.00732   0.00832   0.00789
	    </tableData>

	    <tableData breakPoint="0.00000">
                -10.00     -5.00      0.00      5.00     10.00     15.00     20.00     25.00     30.00     40.00
		0.20000  -0.00000   0.00000   0.00000   0.00000   0.00000   0.00000   0.00000   0.00000   0.00000   0.00000
		0.50000   0.00000   0.00000   0.00000  -0.00000   0.00000   0.00000   0.00000   0.00000   0.00000   0.00000
		0.90000   0.00000   0.00000   0.00000   0.00000  -0.00000   0.00000   0.00000   0.00000   0.00000  -0.00013
	    </tableData>

	    <tableData breakPoint="10.00000">
                -10.00     -5.00      0.00      5.00     10.00     15.00     20.00     25.00     30.00     40.00
		0.20000   0.00196   0.00098  -0.00018  -0.00151  -0.00268  -0.00388  -0.00480  -0.00583  -0.00637  -0.00663
		0.50000   0.00218   0.00107  -0.00019  -0.00163  -0.00276  -0.00397  -0.00522  -0.00588  -0.00661  -0.00681
		0.90000   0.00311   0.00156  -0.00014  -0.00192  -0.00348  -0.00522  -0.00648  -0.00767  -0.00837  -0.00788
	    </tableData>

	</table>
    </function>

    <function name="aero/CMz_slats">
	<interpolate1d>
	    <property>fcs/surfaces/slats-pos-deg</property>
	    <value>0</value> <value>0</value>
	    <value>27.5</value> <property>aero/CMz_slats_27.5</property>
	</interpolate1d>
    </function>

    <!-- speedbrake -->
    <function name="aero/CMz_speedbrake_60">
	<table>
	    <independentVar lookup="row">velocities/mach</independentVar>
	    <independentVar lookup="column">aero/alpha-deg</independentVar>
	    <independentVar lookup="table">aero/beta-deg</independentVar>
	    <tableData breakPoint="-10.00000">
                -10.00     -5.00      0.00      5.00     10.00     15.00     20.00     25.00     30.00     40.00
		0.20000  -0.00574  -0.00399  -0.00154   0.00043   0.00241   0.00274   0.00494   0.00788   0.00922   0.00990
		0.50000  -0.00584  -0.00445  -0.00181   0.00050   0.00245   0.00351   0.00535   0.00663   0.01010   0.00856
		0.90000  -0.00764  -0.00578  -0.00211  -0.00038   0.00117   0.00235   0.00757   0.00946   0.00942   0.01456
	    </tableData>

	    <tableData breakPoint="0.00000">
                -10.00     -5.00      0.00      5.00     10.00     15.00     20.00     25.00     30.00     40.00
		0.20000   0.00000   0.00000  -0.00000   0.00000   0.00000   0.00000   0.00000   0.00000   0.00000   0.00000
		0.50000   0.00000   0.00000   0.00000  -0.00000   0.00000  -0.00000   0.00000   0.00000  -0.00016   0.00000
		0.90000   0.00000   0.00000  -0.00000   0.00000  -0.00000   0.00000   0.00000   0.00000   0.00000  -0.00013
	    </tableData>

	    <tableData breakPoint="10.00000">
                -10.00     -5.00      0.00      5.00     10.00     15.00     20.00     25.00     30.00     40.00
		0.20000   0.00573   0.00399   0.00154  -0.00041  -0.00237  -0.00270  -0.00489  -0.00785  -0.00926  -0.01007
		0.50000   0.00584   0.00444   0.00181  -0.00050  -0.00244  -0.00375  -0.00524  -0.00662  -0.01006  -0.00856
		0.90000   0.00767   0.00578   0.00211   0.00038  -0.00116  -0.00235  -0.00756  -0.00979  -0.00946  -0.01456
	    </tableData>

	</table>
    </function>

    <function name="aero/CMz_speedbrake">
	<interpolate1d>
	    <property>fcs/surfaces/speedbrake-pos-deg</property>
	    <value>0</value> <value>0</value>
	    <value>60</value> <property>aero/CMz_speedbrake_60</property>
	</interpolate1d>
    </function>

    <function name="aero/s/cmlp">
	<description>Roll damping derivative</description>
	<product>
	    <property>aero/pb</property>
	    <table>
		<independentVar lookup="row">velocities/mach</independentVar>
		<independentVar lookup="column">aero/alpha-deg</independentVar>
		<independentVar lookup="table">aero/beta-deg</independentVar>
		<tableData breakPoint="-10.0">
                    -10.0        -5.0         0.0         5.0        10.0        15.0        20.0        25.0        30.0        40.0
		    0.2      0.5223226   0.5300611   0.5353976   0.5233716   0.4839807   0.4277761   0.3649043   0.2958664   0.2336387   0.1549759
		    0.5      0.5530729   0.5570197   0.5612295   0.5537364   0.5186360   0.4656256   0.4059343   0.3331323   0.2820164   0.2066159
		    0.9      0.7327804   0.6855847   0.6794863   0.7028206   0.7581018   0.8335295   0.9094559   0.9698472   1.0257546   1.0903553
		</tableData>
		<tableData breakPoint="0.0">
                    -10.0        -5.0         0.0         5.0        10.0        15.0        20.0        25.0        30.0        40.0
		    0.2      0.5276751   0.5438347   0.5432874   0.5241564   0.4813623   0.4240963   0.3532162   0.2805539   0.2224953   0.1430937
		    0.5      0.5593884   0.5716346   0.5703361   0.5536543   0.5149068   0.4608311   0.3946383   0.3259467   0.2668757   0.2009823
		    0.9      0.7457364   0.6938638   0.6828184   0.7107313   0.7694255   0.8506746   0.9334588   1.0160480   1.0869618   1.1546962
		</tableData>
		<tableData breakPoint="10.0">
                    -10.0        -5.0         0.0         5.0        10.0        15.0        20.0        25.0        30.0        40.0
		    0.2      0.5257090   0.5341060   0.5324261   0.5177509   0.4793739   0.4262472   0.3640216   0.2922769   0.2312077   0.1515753
		    0.5      0.5581230   0.5612675   0.5579573   0.5480050   0.5140986   0.4639367   0.4090617   0.3364117   0.2792790   0.2020122
		    0.9      0.7263026   0.6833144   0.6760886   0.7017557   0.7703900   0.8508580   0.9655264   1.0285595   1.1023286   1.2089490
		</tableData>
	    </table>
	</product>
    </function>

    <function name="aero/s/cmlr">
	<description>Roll moment due to yaw rate</description>
	<product>
	    <property>aero/rb</property>
	    <table>
		<independentVar lookup="row">velocities/mach</independentVar>
		<independentVar lookup="column">aero/alpha-deg</independentVar>
		<independentVar lookup="table">aero/beta-deg</independentVar>
		<tableData breakPoint="-10.0">
                    -10.0        -5.0         0.0         5.0        10.0        15.0        20.0        25.0        30.0        40.0
		    0.2      0.0534636  -0.0217844  -0.0883855  -0.1659049  -0.2335290  -0.3144724  -0.3831385  -0.4609029  -0.5099646  -0.5720787
		    0.5      0.0852211  -0.0153968  -0.1101991  -0.2098914  -0.2986501  -0.3944947  -0.4846081  -0.5635369  -0.6131821  -0.6758687
		    0.9      0.6822864   0.1340518  -0.4218258  -0.9868861  -1.5009132  -1.9166755  -2.1668465  -2.4153373  -2.4643940  -2.3065325
		</tableData>
		<tableData breakPoint="0.0">
                    -10.0        -5.0         0.0         5.0        10.0        15.0        20.0        25.0        30.0        40.0
		    0.2      0.0469876  -0.0263845  -0.0955511  -0.1596974  -0.2237197  -0.2880121  -0.3583276  -0.4309837  -0.5017427  -0.5732714
		    0.5      0.0795256  -0.0189566  -0.1161283  -0.2051924  -0.2935228  -0.3735343  -0.4569018  -0.5382456  -0.6100120  -0.6820522
		    0.9      0.6306399   0.1163229  -0.4236770  -0.9574296  -1.4265132  -1.8215247  -2.1109273  -2.2776008  -2.3416356  -2.1456271
		</tableData>
		<tableData breakPoint="10.0">
                    -10.0        -5.0         0.0         5.0        10.0        15.0        20.0        25.0        30.0        40.0
		    0.2      0.0462003  -0.0233414  -0.1144554  -0.1621256  -0.2315655  -0.3011124  -0.3885562  -0.4569934  -0.5123736  -0.5783539
		    0.5      0.0767898  -0.0167313  -0.1327263  -0.2042886  -0.2972274  -0.3827946  -0.4734665  -0.5472822  -0.6170045  -0.6862588
		    0.9      0.5370137   0.0866625  -0.3994628  -0.8416128  -1.2641487  -1.6284483  -1.9026189  -2.0482221  -2.1185449  -1.9980973
		</tableData>
	    </table>
	</product>
    </function>

    <function name="aero/s/cmmq">
	<description>Pitch damping derivative</description>
	<product>
	    <property>aero/qb</property>
	    <table>
		<independentVar lookup="row">velocities/mach</independentVar>
		<independentVar lookup="column">aero/alpha-deg</independentVar>
		<independentVar lookup="table">aero/beta-deg</independentVar>
		<tableData breakPoint="-10.0">
                    -10.0        -5.0         0.0         5.0        10.0        15.0        20.0        25.0        30.0        40.0
		    0.2     -6.1539451  -6.2559793  -6.5248270  -6.4933310  -6.6025854  -5.9111831  -5.4600729  -5.3980197  -4.5218557  -3.4602574
		    0.5     -6.5593198  -6.6235419  -6.9220527  -6.8608922  -7.1124450  -6.3957038  -5.8233694  -5.7347679  -4.9926377  -4.3634206
		    0.9     -8.6187216  -8.5176410  -8.8333064  -8.9508256  -9.5991409  -10.5682892  -11.4924758  -12.3066711  -14.6628366  -17.4502333
		</tableData>
		<tableData breakPoint="0.0">
                    -10.0        -5.0         0.0         5.0        10.0        15.0        20.0        25.0        30.0        40.0
		    0.2     -6.2426875  -6.2500708  -6.5403286  -6.5684017  -6.5105245  -6.2365038  -5.4839005  -5.6944622  -5.0748199  -3.3552194
		    0.5     -6.5946843  -6.5984019  -6.8587015  -6.9872920  -6.8934305  -6.9060095  -6.0925815  -6.0630399  -5.2028371  -3.6643333
		    0.9     -8.8144017  -8.6616614  -8.8844682  -9.3986723  -10.5201250  -12.0295897  -11.9055706  -14.2907597  -15.1715127  -17.4269562
		</tableData>
		<tableData breakPoint="10.0">
                    -10.0        -5.0         0.0         5.0        10.0        15.0        20.0        25.0        30.0        40.0
		    0.2     -6.1497650  -6.2562688  -6.5312855  -6.5073219  -6.6019352  -5.9272935  -5.4879252  -5.4230368  -4.5443118  -3.4592234
		    0.5     -6.5549042  -6.6233218  -6.9131547  -6.8627608  -7.1179336  -6.4034991  -5.8511468  -5.7546222  -4.9828209  -4.3586647
		    0.9     -8.6140874  -8.5175097  -8.8363645  -8.9799673  -9.5919808  -10.5578188  -11.6042364  -12.3272977  -14.6601344  -17.5092454
		</tableData>
	    </table>
	</product>
    </function>

    <function name="aero/s/cmnp">
	<description>Yaw moment due to roll rate</description>
	<product>
	    <property>aero/pb</property>
	    <table>
		<independentVar lookup="row">velocities/mach</independentVar>
		<independentVar lookup="column">aero/alpha-deg</independentVar>
		<independentVar lookup="table">aero/beta-deg</independentVar>
		<tableData breakPoint="-10.0">
                    -10.0        -5.0         0.0         5.0        10.0        15.0        20.0        25.0        30.0        40.0
		    0.2      0.1915092   0.1924830   0.1987001   0.1878984   0.1714303   0.1782483   0.1727724   0.1241826   0.0606744  -0.1151700
		    0.5      0.2005576   0.2020616   0.2043212   0.1974053   0.1792085   0.1862239   0.1568852   0.0657050   0.0209781  -0.1597763
		    0.9      0.1310683   0.2257922   0.2527368   0.1991206   0.0861274  -0.0841210  -0.2545218  -0.4441045  -0.6994800  -0.9188854
		</tableData>
		<tableData breakPoint="0.0">
                    -10.0        -5.0         0.0         5.0        10.0        15.0        20.0        25.0        30.0        40.0
		    0.2      0.1643531   0.1815677   0.1946376   0.1933244   0.1744898   0.1424272   0.0905516   0.0517420   0.0007326  -0.1210749
		    0.5      0.1585696   0.1841877   0.2002834   0.1942733   0.1693613   0.1351278   0.0888628   0.0173595  -0.0261906  -0.1676881
		    0.9      0.0869926   0.1862628   0.2200815   0.1660730   0.0372373  -0.1381275  -0.3595941  -0.5573427  -0.7067190  -1.0400265
		</tableData>
		<tableData breakPoint="10.0">
                    -10.0        -5.0         0.0         5.0        10.0        15.0        20.0        25.0        30.0        40.0
		    0.2      0.1566861   0.1871617   0.1987629   0.1737770   0.1649029   0.1784218   0.1949622   0.1261539   0.0442820  -0.1328807
		    0.5      0.1558745   0.1932400   0.2058323   0.1701625   0.1727254   0.1641090   0.1546251   0.1062436  -0.0010248  -0.1711239
		    0.9      0.1026491   0.2069241   0.2218387   0.1651986   0.0829616  -0.0514487  -0.2101051  -0.4361113  -0.5933205  -0.8167369
		</tableData>
	    </table>
	</product>
    </function>

    <function name="aero/s/cmnr">
	<description>Yaw damping derivative</description>
	<product>
	    <property>aero/rb</property>
	    <table>
		<independentVar lookup="row">velocities/mach</independentVar>
		<independentVar lookup="column">aero/alpha-deg</independentVar>
		<independentVar lookup="table">aero/beta-deg</independentVar>
		<tableData breakPoint="-10.0">
                    -10.0        -5.0         0.0         5.0        10.0        15.0        20.0        25.0        30.0        40.0
		    0.2     -0.1317322  -0.0516250   0.0398220   0.1104503   0.1716127   0.2043420   0.2051343   0.2199959   0.2196530   0.1368977
		    0.5     -0.1342662  -0.0543600   0.0415870   0.1162236   0.1792308   0.2246868   0.2374290   0.2507237   0.2533310   0.1793190
		    0.9     -0.2010493  -0.0755420   0.0391775   0.1390888   0.2361199   0.3312875   0.4369993   0.5524156   0.6345448   0.7360317
		</tableData>
		<tableData breakPoint="0.0">
                    -10.0        -5.0         0.0         5.0        10.0        15.0        20.0        25.0        30.0        40.0
		    0.2     -0.1411868  -0.0465725   0.0419150   0.1236158   0.1801060   0.2227258   0.2696094   0.2741750   0.2391046   0.1608319
		    0.5     -0.1497415  -0.0484755   0.0438727   0.1287099   0.1950510   0.2438928   0.2867584   0.3048538   0.2721178   0.1929148
		    0.9     -0.1912118  -0.0655702   0.0477259   0.1545665   0.2631047   0.3795940   0.5031675   0.6148001   0.7128417   0.8439827
		</tableData>
		<tableData breakPoint="10.0">
                    -10.0        -5.0         0.0         5.0        10.0        15.0        20.0        25.0        30.0        40.0
		    0.2     -0.1323060  -0.0399902   0.0506176   0.1225114   0.1863553   0.2064807   0.2190470   0.2076208   0.2167082   0.1638091
		    0.5     -0.1241429  -0.0425003   0.0536450   0.1274789   0.1858596   0.2237255   0.2395242   0.2671356   0.2398085   0.1920000
		    0.9     -0.1793260  -0.0636998   0.0531576   0.1552674   0.2599795   0.3702620   0.4773051   0.5806496   0.6971517   0.8284297
		</tableData>
	    </table>
	</product>
    </function>

    <function name="aero/s/cfyp">
	<description>Side force due to roll rate</description>
	<product>
	    <property>aero/pb</property>
	    <table>
		<independentVar lookup="row">velocities/mach</independentVar>
		<independentVar lookup="column">aero/alpha-deg</independentVar>
		<independentVar lookup="table">aero/beta-deg</independentVar>
		<tableData breakPoint="-10.0">
                    -10.0        -5.0         0.0         5.0        10.0        15.0        20.0        25.0        30.0        40.0
		    0.2      0.0546309   0.0580058   0.0561308   0.0313834   0.0129400  -0.0525778  -0.0975176  -0.1044494  -0.0670599  -0.1277882
		    0.5      0.0496654   0.0619247   0.0569453   0.0345882   0.0095229   0.0138860  -0.0823452  -0.0829451  -0.0389943  -0.0651069
		    0.9      0.0717134   0.0541769   0.0550937   0.0261950   0.0044611  -0.0299208  -0.0085175   0.0636089   0.0733457   0.0849189
		</tableData>
		<tableData breakPoint="0.0">
                    -10.0        -5.0         0.0         5.0        10.0        15.0        20.0        25.0        30.0        40.0
		    0.2      0.0511400   0.0597007   0.0531323   0.0368961  -0.0118764  -0.0317362   0.0543093   0.0033790  -0.0533226  -0.0509544
		    0.5      0.0504747   0.0641034   0.0533626   0.0357015   0.0162711  -0.0156240   0.0300238   0.0194705  -0.0379805  -0.0512944
		    0.9      0.0788353   0.0650275   0.0531944   0.0372365   0.0238745   0.0453640   0.1045477   0.1058399   0.0794030   0.1468048
		</tableData>
		<tableData breakPoint="10.0">
                    -10.0        -5.0         0.0         5.0        10.0        15.0        20.0        25.0        30.0        40.0
		    0.2      0.0568824   0.0608353   0.0587940   0.0242481   0.0530695  -0.0270564  -0.1463264  -0.1102185  -0.0691164   0.0861716
		    0.5      0.0497449   0.0637276   0.0611139   0.0258597  -0.0028903  -0.0250928  -0.1670543  -0.0386072  -0.1038044   0.0076095
		    0.9      0.0518036   0.0553344   0.0477964   0.0303040   0.0016797  -0.0170160   0.0892044   0.0729508   0.2289863   0.3716779
		</tableData>
	    </table>
	</product>
    </function>

    <function name="aero/s/cfyr">
	<description>Side force due to yaw rate</description>
	<product>
	    <property>aero/rb</property>
	    <table>
		<independentVar lookup="row">velocities/mach</independentVar>
		<independentVar lookup="column">aero/alpha-deg</independentVar>
		<independentVar lookup="table">aero/beta-deg</independentVar>
		<tableData breakPoint="-10.0">
                    -10.0        -5.0         0.0         5.0        10.0        15.0        20.0        25.0        30.0        40.0
		    0.2      0.3729582   0.3850923   0.3857779   0.3303583   0.3011038   0.3150218   0.4829135   0.3468740   0.3372512   0.1547003
		    0.5      0.3907023   0.4026053   0.3814473   0.3705943   0.3222502   0.4411253   0.3357893   0.2837108   0.3501527   0.1689181
		    0.9      0.4417325   0.4440802   0.4229744   0.3744716   0.3057540   0.2384074   0.2990137   0.1881044  -0.1645782  -0.2045471
		</tableData>
		<tableData breakPoint="0.0">
                    -10.0        -5.0         0.0         5.0        10.0        15.0        20.0        25.0        30.0        40.0
		    0.2      0.3353616   0.3555231   0.3538142   0.3816847   0.3538414   0.2662061   0.1307556   0.2007014   0.1508952   0.2495520
		    0.5      0.3357385   0.3610607   0.3651520   0.3354352   0.3519552   0.2609590   0.2115663   0.1612028   0.2001118   0.1781581
		    0.9      0.3972675   0.3955090   0.3750882   0.3342971   0.2580892   0.1718798   0.0835882   0.0147557   0.0850013  -0.1053797
		</tableData>
		<tableData breakPoint="10.0">
                    -10.0        -5.0         0.0         5.0        10.0        15.0        20.0        25.0        30.0        40.0
		    0.2      0.4108497   0.3852892   0.3760791   0.3833189   0.2903830   0.3715646   0.4159159   0.3679649   0.2870165   0.1422540
		    0.5      0.4293896   0.3924842   0.3813281   0.4083937   0.3290470   0.2682682   0.4011340   0.3420741   0.2431773   0.1757803
		    0.9      0.4198455   0.3716285   0.3341713   0.3558901   0.3728307   0.3710091   0.3179906   0.1466445   0.1426123   0.1455204
		</tableData>
	    </table>
	</product>
    </function>


    <axis name="LIFT">

	<function name="aero/force/CL">
	    <sum>
		<property>aero/CL_base</property>
		<property>aero/CL_elevator</property>
		<property>aero/CL_right-flaperon</property>
		<property>aero/CL_left-flaperon</property>
		<property>aero/CL_slats</property>
		<property>aero/CL_flap</property>
	    </sum>
	</function>

	<function name="aero/force/Lift_combined">
	    <description>Lift due to alpha</description>
	    <product>
		<property>aero/qbar-psf</property>
		<property>metrics/Sw-sqft</property>
		<product>
		    <property>aero/force/CL</property>
		    <difference>
			<value>1</value>
			<product>
			    <property>fcs/wing-fold/wing-fold-pos</property>
			    <value>0.9</value>
			</product>
		    </difference>
		</product>
	    </product>
	</function>

	<function name="aero/force/Lift_pitch_rate">
            <description>Lift due to pitch rate</description>
            <product>
		<property>aero/qbar-psf</property>
		<property>metrics/Sw-sqft</property>
		<property>velocities/q-aero-rad_sec</property>
		<property>aero/ci2vel</property>
		<value> 4.2695 </value>
            </product>
	</function>

	<function name="aero/force/Lift_alpha_rate">
            <description>Lift due to alpha rate</description>
            <product>
		<property>aero/qbar-psf</property>
		<property>metrics/Sw-sqft</property>
		<property>aero/alphadot-rad_sec</property>
		<property>aero/ci2vel</property>
		<value> 2.3362 </value>
            </product>
	</function>

    </axis>

    <axis name="DRAG">

	<function name="aero/force/CDtot">
	    <sum>
		<property>aero/CDtot_base</property>
		<property>aero/CDtot_elevator</property>
		<property>aero/CDtot_right-flaperon</property>
		<property>aero/CDtot_left-flaperon</property>
		<property>aero/CDtot_slats</property>
		<property>aero/CDtot_flap</property>
	    </sum>
	</function>

	<function name="aero/force/Drag_combined">
	    <description>Drag at zero lift</description>
	    <product>
		<property>aero/qbar-psf</property>
		<property>metrics/Sw-sqft</property>
		<property>aero/force/CDtot</property>
	    </product>
	</function>

	<function name="aero/force/CD_stores">
	    <product>
		<property>aero/qbar-psf</property>
		<sum>
		    <product>
			<property>aero/cd_p1</property>
			<property>aero/eda_p1</property>
		    </product>
		    <product>
			<property>aero/cd_p2</property>
			<property>aero/eda_p2</property>
		    </product>
		    <product>
			<property>aero/cd_p3</property>
			<property>aero/eda_p3</property>
		    </product>
		    <product>
			<property>aero/cd_p4</property>
			<property>aero/eda_p4</property>
		    </product>
		    <product>
			<property>aero/cd_p5</property>
			<property>aero/eda_p5</property>
		    </product>
		</sum>
	    </product>
	</function>

	<function name="aero/force/Drag_gear">
	    <description>Drag due to gear</description>
            <product>
		<property>aero/qbar-psf</property>
		<property>metrics/Sw-sqft</property>
		<property>gear/gear-pos-norm</property>
		<value> 0.0200 </value>
            </product>
	</function>

	<function name="aero/force/Drag_speedbrake">
	    <description>Drag due to speedbrakes</description>
            <product>
		<property>aero/qbar-psf</property>
		<property>metrics/Sw-sqft</property>
		<property>fcs/speedbrake-pos-norm</property>
		<value> 0.0800 </value>
            </product>
	</function>

    </axis>

    <axis name="SIDE">

	<function name="aero/force/CS">
	    <sum>
		<property>aero/CS_base</property>
		<property>aero/CS_rudder</property>
		<property>aero/CS_flap</property>
		<property>aero/s/cfyp</property>
		<property>aero/s/cfyr</property>
	    </sum>
	</function>

	<function name="aero/force/Side_combined">
	    <description>Side force</description>
	    <product>
		<property>aero/qbar-psf</property>
		<property>metrics/Sw-sqft</property>
		<property>aero/force/CS</property>
	    </product>
	</function>

	<function name="aero/force/Side_rudder">
	    <description>Side force due to rudder</description>
	    <product>
		<property>aero/qbar-psf</property>
		<property>metrics/Sw-sqft</property>
		<property>fcs/rudder-pos-rad</property>
		<value> 0.2108 </value>
	    </product>
	</function>

    </axis>

    <axis name="PITCH">

	<function name="aero/moment/CMy">
	    <sum>
		<property>aero/CMy_flap</property>
		<property>aero/CMy_slats</property>
		<property>aero/s/cmmq</property>
	    </sum>
	</function>

	<function name="aero/moment/Pitch_combined">
	    <description>Pitch moment due to alpha</description>
	    <product>
		<property>aero/qbar-psf</property>
		<property>metrics/Sw-sqft</property>
		<property>metrics/cbarw-ft</property>
		<property>aero/moment/CMy</property>
	    </product>
	</function>

	<function name="aero/moment/Pitch_alpha">
	    <description>Pitch moment due to alpha</description>
	    <product>
		<property>aero/qbar-psf</property>
		<property>metrics/Sw-sqft</property>
		<property>metrics/cbarw-ft</property>
		<property>aero/alpha-rad</property>
		<value> -0.1 </value>
	    </product>
	</function>

	<function name="aero/moment/Pitch_elevator">
	    <description>Pitch moment due to elevator</description>
	    <product>
		<property>aero/qbar-psf</property>
		<property>metrics/Sw-sqft</property>
		<property>metrics/cbarw-ft</property>
		<property>fcs/surfaces/elevator-pos-rad</property>
		<table>
		    <independentVar lookup="row">velocities/mach</independentVar>
		    <tableData>
			0.0    -1.2
			2.0    -0.3
		    </tableData>
		</table>
	    </product>
	</function>

	<function name="aero/moment/Pitch_damp">
	    <description>Pitch moment due to pitch rate</description>
	    <product>
		<property>aero/qbar-psf</property>
		<property>metrics/Sw-sqft</property>
		<property>metrics/cbarw-ft</property>
		<property>aero/ci2vel</property>
		<property>velocities/q-aero-rad_sec</property>
		<value> -9.7532 </value>
	    </product>
	</function>

	<function name="aero/moment/Pitch_alphadot">
	    <description>Pitch moment due to alpha rate</description>
	    <product>
		<property>aero/qbar-psf</property>
		<property>metrics/Sw-sqft</property>
		<property>metrics/cbarw-ft</property>
		<property>aero/ci2vel</property>
		<property>aero/alphadot-rad_sec</property>
		<value> -5.3369 </value>
	    </product>
	</function>

    </axis>

    <axis name="ROLL">
	<function name="aero/moment/CMx">
	    <sum>
		<!-- <property>aero/CMx_base</property> -->
		<property>aero/CMx_rudder</property>
		<property>aero/s/cmlr</property>
		<product>
		    <sum>
			<property>aero/CMx_left-flaperon</property>
			<property>aero/CMx_right-flaperon</property>
			<property>aero/s/cmlp</property>
		    </sum>
		    <value>-1</value>
		</product>
	    </sum>
	</function>

	<function name="aero/moment/Roll_combined">
	    <description>Roll moment</description>
	    <product>
		<property>aero/qbar-psf</property>
		<property>metrics/Sw-sqft</property>
		<property>metrics/bw-ft</property>
		<property>aero/moment/CMx</property>
	    </product>
	</function>
    </axis>

    <axis name="YAW">

	<function name="aero/moment/CMz">
	    <sum>
		<property>aero/CMz_base</property>
		<property>aero/CMz_left-flaperon</property>
		<property>aero/CMz_right-flaperon</property>
		<!-- <property>aero/s/cmnr</property> -->
		<property>aero/s/cmnp</property>
		<product>
		    <property>aero/CMz_rudder</property>
		    <value>-1</value>
		</product>
	    </sum>
	</function>

	<function name="aero/moment/Yaw_combined">
	    <description>Yaw moment</description>
	    <product>
		<property>aero/qbar-psf</property>
		<property>metrics/Sw-sqft</property>
		<property>metrics/bw-ft</property>
		<property>aero/moment/CMz</property>
	    </product>
	</function>

	<function name="aero/moment/Yaw_beta">
	    <description>Yaw moment due to beta</description>
	    <product>
		<property>aero/qbar-psf</property>
		<property>metrics/Sw-sqft</property>
		<property>metrics/bw-ft</property>
		<property>aero/beta-rad</property>
		<value> 0.1926 </value> <!-- 0.1626 -->
	    </product>
	</function>

	<function name="aero/moment/Yaw_stores">
	    <product>
		<property>aero/qbar-psf</property>
		<sum>
		    <product>
			<property>aero/cd_p1</property>
			<property>aero/eda_p1</property>
			<property>inertia/pointmass-location-Y-inches</property>
		    </product>
		    <product>
			<property>aero/cd_p2</property>
			<property>aero/eda_p2</property>
			<property>inertia/pointmass-location-Y-inches[1]</property>
		    </product>
		    <product>
			<property>aero/cd_p3</property>
			<property>aero/eda_p3</property>
			<property>inertia/pointmass-location-Y-inches[2]</property>
		    </product>
		    <product>
			<property>aero/cd_p4</property>
			<property>aero/eda_p4</property>
			<property>inertia/pointmass-location-Y-inches[3]</property>
		    </product>
		    <product>
			<property>aero/cd_p5</property>
			<property>aero/eda_p5</property>
			<property>inertia/pointmass-location-Y-inches[4]</property>
		    </product>
		</sum>
	    </product>
	</function>

	<function name="aero/moment/Yaw_roll_rate">
	    <description>Yaw moment due to roll rate</description>
	    <product>
		<property>aero/qbar-psf</property>
		<property>metrics/Sw-sqft</property>
		<property>metrics/bw-ft</property>
		<property>aero/bi2vel</property>
		<property>velocities/r-aero-rad_sec</property>
		<value>-1.1</value>
	    </product>
	</function>

    </axis>
</aerodynamics>
